# OpenSim document version 40000
Model Subject-test:
  gravity: 0 -9.80665 0
  length_units: meters
  force_units: N
  credits:
    Delp S.L., Loan J.P., Hoy M.G., Zajac F.E., Topp E.L., Rosen J.M., Thelen D.G., Anderson F.C., Seth A., Hamner S.R., Arnold E., Raabe M.E.
  publications:
    Notes: Raabe Full Body model combines Hamner Full Body Model 2010, Christophy 2012 Lumbar DOF torso, and Arnold patella; 3D, 23 DOF gait model created by D.G. Thelen, Univ. of Wisconsin-Madison, and Samuel Hamner, Ajay Seth, Frank C. Anderson, and Scott L. Delp, Stanford University. Lower extremity joint defintions based on Delp et al. (1990). Low back joint and anthropometry based on Anderson and Pandy (1999, 2001). Planar knee model of Yamaguchi and Zajac (1989). Hamner added arms adapted from Holzbaur et al., 2005. Hamner, S.R., Seth, A, Delp, S.L.: Muscle contributions to propulsion and support during running. Journal of Biomechanics, 2010. Delp, S.L., Loan, J.P., Hoy, M.G., Zajac, F.E., Topp E.L., Rosen, J.M.: An interactive graphics-based model of the lower extremity to study orthopaedic surgical procedures, IEEE Transactions on Biomedical Engineering, vol. 37, pp. 757-767, 1990. Yamaguchi G.T., Zajac F.E.: A planar model of the knee joint to characterize the knee extensor mechanism." J . Biomech. vol. 21. pp. 1-10. 1989. Anderson F.C., Pandy M.G.: A dynamic optimization solution for vertical jumping in three dimensions. Computer Methods in Biomechanics and Biomedical Engineering 2:201-231, 1999. Anderson F.C., Pandy M.G.: Dynamic optimization of human walking. Journal of Biomechanical Engineering 123:381-390, 2001. Holzbaur, KR, WM Murray and SL Delp, 2005. A model of the upper extremity for simulating musculoskeletal surgery and analyzing neuromuscular control. Ann Biomed Eng 33(6): 829-840.
  defaults:
    Millard2012EquilibriumMuscle default: min_control=0.01 optimal_force=1 max_isometric_force=546
        optimal_fiber_length=0.0535 tendon_slack_length=0.078 pennation_angle_at_optimal=0 [radians]
        max_contraction_velocity=10
    Millard2012EquilibriumMuscle default: min_control=0.01 optimal_force=1 max_isometric_force=546
        optimal_fiber_length=0.0535 tendon_slack_length=0.078 pennation_angle_at_optimal=0 max_contraction_velocity=10
  Ground
  BodySet:
    Body pelvis: mass=11.777 [kg] mass_center=(-0.0707 0 0) inertia=(0.1028 0.0871 0.0579 0 0 0)
        meshes=(r_pelvis.vtp l_pelvis.vtp sacrum.vtp)
      WrapCylinder Gmax1_at_pelvis_r: xyz_body_rotation=(-0.6 0.45 0) translation=(-0.1020951 -0.1033883 0.07807018)
          quadrant=-x radius=0.03437503 length=0.15
      WrapCylinder Gmax2_at_pelvis_r: xyz_body_rotation=(-0.75 0.39 0) translation=(-0.07576807 -0.07875263 0.06417577)
          quadrant=all radius=0.04 length=0.1
      WrapCylinder Gmax3_at_pelvis_r: xyz_body_rotation=(-0.1 0 0) translation=(-0.08566191 -0.07355058 0.06530659)
          quadrant=all radius=0.04 length=0.1
      WrapCylinder Gmax1_at_pelvis_l: xyz_body_rotation=(0.6 -0.45 0) translation=(-0.1020951 -0.1033883 -0.07807018)
          quadrant=-x radius=0.03437503 length=0.15
      WrapCylinder Gmax2_at_pelvis_l: xyz_body_rotation=(0.75 -0.39 0)
          translation=(-0.07576807 -0.07875263 -0.06417577) quadrant=all radius=0.04 length=0.1
      WrapCylinder Gmax3_at_pelvis_l: xyz_body_rotation=(0.1 0 0) translation=(-0.08566191 -0.07355058 -0.06530659)
          quadrant=all radius=0.04 length=0.1
      WrapCylinder PS_at_brim_r: xyz_body_rotation=(-0.25 -0.27 0.1) translation=(-0.074 -0.06 0.0656) quadrant=-y
          radius=0.05 length=0.1
      WrapCylinder PS_at_brim_l: xyz_body_rotation=(0.25 0.27 0.1) translation=(-0.074 -0.06 -0.0656) quadrant=-y
          radius=0.05 length=0.1
      WrapCylinder IL_at_brim_r: xyz_body_rotation=(-0.32 -0.24 0.9) translation=(-0.071 -0.065 0.0756) quadrant=-y
          radius=0.0549 length=0.1
      WrapCylinder IL_at_brim_l: xyz_body_rotation=(0.32 0.24 0.9) translation=(-0.071 -0.065 -0.0756) quadrant=-y
          radius=0.0549 length=0.1
      WrapTorus pelvisOITorus1_r: xyz_body_rotation=(0 -0.5 0) translation=(-0.113 -0.072 0.045) quadrant=all
          inner_radius=0.019 outer_radius=0.02
      WrapTorus pelvisOITorus2_r: xyz_body_rotation=(-0.05565675 -0.1966786 0)
          translation=(-0.1027461 -0.07900047 0.0569826) quadrant=all inner_radius=0.03476903 outer_radius=0.03641683
      WrapTorus pelvisOITorus3_r: xyz_body_rotation=(0 -0.6 0) translation=(-0.111 -0.072 0.051) quadrant=all
          inner_radius=0.019 outer_radius=0.02
      WrapCylinder GEMsup_at_Ischium_r: xyz_body_rotation=(-1.06738 0.08921519 2)
          translation=(-0.0624965 -0.0612876 0.0725775) quadrant=all radius=0.01531103 length=0.06
      WrapTorus pelvisOITorus1_l: xyz_body_rotation=(0 0.5 0) translation=(-0.113 -0.072 -0.045) quadrant=all
          inner_radius=0.019 outer_radius=0.02
      WrapTorus pelvisOITorus2_l: xyz_body_rotation=(0.05565675 0.1966786 0)
          translation=(-0.1027461 -0.07900047 -0.0569826) quadrant=all inner_radius=0.03476903 outer_radius=0.03641683
      WrapTorus pelvisOITorus3_l: xyz_body_rotation=(0 0.6 0) translation=(-0.111 -0.072 -0.051) quadrant=all
          inner_radius=0.019 outer_radius=0.02
      WrapCylinder GEMsup_at_Ischium_l: xyz_body_rotation=(1.06738 -0.08921519 2)
          translation=(-0.0624965 -0.0612876 -0.0725775) quadrant=all radius=0.01531103 length=0.06
      WrapCylinder Post_at_pelvis_r: xyz_body_rotation=(-0.1 0 0) translation=(-0.06 -0.07 0.068) quadrant=all
          radius=0.04 length=0.12
      WrapCylinder Gmed_at_pelvis_r: xyz_body_rotation=(-1 0.6 0.7) translation=(-0.03 -0.055 0.1) quadrant=-x
          radius=0.04 length=0.15
      WrapCylinder Post_at_pelvis_l: xyz_body_rotation=(0.1 0 0) translation=(-0.06 -0.07 -0.068) quadrant=all
          radius=0.04 length=0.12
      WrapCylinder Gmed_at_pelvis_l: xyz_body_rotation=(1 -0.6 0.7) translation=(-0.03 -0.055 -0.1) quadrant=-x
          radius=0.04 length=0.15
      WrapCylinder PIRI_at_Ischium3_r: xyz_body_rotation=(-1.05 0.54 1.47) translation=(-0.0747 -0.0528 0.0677)
          quadrant=y radius=0.022 length=0.05
      WrapCylinder PIRI_at_Ischium3_l: xyz_body_rotation=(1.05 -0.54 1.47) translation=(-0.0747 -0.0528 -0.0677)
          quadrant=y radius=0.022 length=0.05
      WrapCylinder GLUTMED3_at_Ischium_r: xyz_body_rotation=(-0.9085673 0.6504127 1.47)
          translation=(-0.06741086 -0.05297417 0.0775277) quadrant=y radius=0.0190482 length=0.06
      WrapCylinder GLUTMED3_at_Ischium_l: xyz_body_rotation=(0.9085673 -0.6504127 1.47)
          translation=(-0.06741086 -0.05297417 -0.0775277) quadrant=-x radius=0.0190482 length=0.06
    Body sacrum: mass=0 mass_center=(0 0 0) inertia=(0 0 0 0 0 0) meshes=sacrum.vtp
    Body femur_r: mass=9.3014 mass_center=(0 -0.17 0) inertia=(0.1339 0.0351 0.1412 0 0 0) meshes=r_femur.vtp
      WrapCylinder Gastroc_at_condyles_r: translation=(0.005 -0.41 0) quadrant=-x radius=0.025 length=0.1
      WrapCylinder KnExt_at_fem_r: xyz_body_rotation=(-0.0623366 0.0507601 0)
          translation=(0.00358828 -0.402732 0.00209111) quadrant=all radius=0.025 length=0.1
      WrapCylinder AB_at_femshaft_r: xyz_body_rotation=(1.66157 0.186644 0) translation=(0.0146434 -0.112595 0.023365)
          quadrant=all radius=0.0165 length=0.07
      WrapCylinder AL_at_femshaft_r: xyz_body_rotation=(1.77711 0.136489 0) translation=(0.0307327 -0.231909 0.0151137)
          quadrant=all radius=0.0201 length=0.1
      WrapCylinder AMprox_at_femshaft_r: xyz_body_rotation=(1.61126 0.18656 0)
          translation=(0.00518299 -0.0728948 0.025403) quadrant=all radius=0.0211 length=0.07
      WrapCylinder AMmid_at_femshaft_r: xyz_body_rotation=(1.61139 0.13656 0)
          translation=(0.0230125 -0.160711 0.0205842) quadrant=all radius=0.0214 length=0.12
      WrapCylinder AMdist_at_femshaft_r: xyz_body_rotation=(1.71188 0.186636 0)
          translation=(0.0316065 -0.260736 0.0093646) quadrant=all radius=0.0218 length=0.2
      WrapCylinder AMisch_at_condyles_r: xyz_body_rotation=(1.71115 -0.463363 0)
          translation=(-0.0226511 -0.376831 -0.00315437) quadrant=all radius=0.04 length=0.24
      WrapCylinder PECT_at_femshaft_r: xyz_body_rotation=(1.81295 0.276344 0)
          translation=(0.00608573 -0.0845029 0.0304405) quadrant=all radius=0.015 length=0.05
      WrapSphere femHeadOISphere1_r: translation=(0 0 0) quadrant=all radius=0.02770866
      WrapSphere femHeadOISphere2_r: translation=(0.001741123 -0.001757574 0.003079938) quadrant=all radius=0.0328114
      WrapSphere femHeadOISphere3_r: translation=(0 0 0) quadrant=all radius=0.05696682
      WrapSphere femHeadSphere_OE1_r: translation=(-0.002337173 0.0003480985 0.0003890992) quadrant=all
          radius=0.01480479
      WrapSphere femHeadSphere_OE2_r: translation=(0 0 0) quadrant=all radius=0.02333336
      WrapSphere femHeadSphere_OE3_r: translation=(-0.004159088 0.0004586263 0.0003028079) quadrant=all
          radius=0.01382163
      WrapSphere femHeadGEMinfSphere_r: translation=(0 0 0) quadrant=all radius=0.02333361
      WrapCylinder GasLat_at_condyles_r: translation=(0.005 -0.41 0) quadrant=all radius=0.026 length=0.1
      WrapCylinder GasMed_at_condyles_r: translation=(0.005 -0.41 0) quadrant=all radius=0.025 length=0.1
      WrapCylinder KnExtVL_at_fem_r: xyz_body_rotation=(-0.0623366 0.0507601 0)
          translation=(-0.004 -0.402732 0.00209111) quadrant=all radius=0.03 length=0.1
      WrapCylinder Flex_at_femhead_r: translation=(-0.005 0 0.01) quadrant=all radius=0.024 length=0.06
      WrapSphere femHeadGEMsupSphere_r: translation=(0.0009091917 -0.001643598 -0.001014727) quadrant=all
          radius=0.01921769
      WrapSphere femHeadPIRISphere_r: translation=(0 0 0) quadrant=all radius=0.02333361
    Body femur_l: mass=9.3014 mass_center=(0 -0.17 0) inertia=(0.1339 0.0351 0.1412 0 0 0) meshes=l_femur.vtp
      WrapCylinder Gastroc_at_condyles_l: translation=(0.005 -0.41 0) quadrant=-x radius=0.025 length=0.1
      WrapCylinder KnExt_at_fem_l: xyz_body_rotation=(0.0623366 -0.0507601 0)
          translation=(0.00358828 -0.402732 -0.00209111) quadrant=all radius=0.025 length=0.1
      WrapCylinder AB_at_femshaft_l: xyz_body_rotation=(-1.66157 -0.186644 0)
          translation=(0.0146434 -0.112595 -0.023365) quadrant=all radius=0.0165 length=0.07
      WrapCylinder AL_at_femshaft_l: xyz_body_rotation=(-1.77711 -0.136489 0)
          translation=(0.0307327 -0.231909 -0.0151137) quadrant=all radius=0.0201 length=0.1
      WrapCylinder AMprox_at_femshaft_l: xyz_body_rotation=(-1.61126 -0.18656 0)
          translation=(0.00518299 -0.0728948 -0.025403) quadrant=all radius=0.0211 length=0.07
      WrapCylinder AMmid_at_femshaft_l: xyz_body_rotation=(-1.61139 -0.13656 0)
          translation=(0.0230125 -0.160711 -0.0205842) quadrant=all radius=0.0214 length=0.12
      WrapCylinder AMdist_at_femshaft_l: xyz_body_rotation=(-1.71188 -0.186636 0)
          translation=(0.0316065 -0.260736 -0.0093646) quadrant=all radius=0.0218 length=0.2
      WrapCylinder AMisch_at_condyles_l: xyz_body_rotation=(-1.71115 0.463363 0)
          translation=(-0.0226511 -0.376831 0.00315437) quadrant=all radius=0.04 length=0.24
      WrapCylinder PECT_at_femshaft_l: xyz_body_rotation=(-1.81295 -0.276344 0)
          translation=(0.00608573 -0.0845029 -0.0304405) quadrant=all radius=0.015 length=0.05
      WrapSphere femHeadOISphere1_l: translation=(0 0 0) quadrant=all radius=0.02770866
      WrapSphere femHeadOISphere2_l: translation=(0.001741123 -0.001757574 -0.003079938) quadrant=all radius=0.0328114
      WrapSphere femHeadOISphere3_l: translation=(0 0 0) quadrant=all radius=0.05696682
      WrapSphere femHeadSphere_OE1_l: translation=(-0.002337173 0.0003480985 -0.0003890992) quadrant=all
          radius=0.01480479
      WrapSphere femHeadSphere_OE2_l: translation=(0 0 0) quadrant=all radius=0.02333336
      WrapSphere femHeadSphere_OE3_l: translation=(-0.004159088 0.0004586263 -0.0003028079) quadrant=all
          radius=0.01382163
      WrapSphere femHeadGEMinfSphere_l: translation=(0 0 0) quadrant=all radius=0.02333361
      WrapCylinder GasLat_at_condyles_l: translation=(0.005 -0.41 0) quadrant=all radius=0.026 length=0.1
      WrapCylinder Flex_at_femhead_r: translation=(-0.005 0 0.01) quadrant=all radius=0.024 length=0.06
      WrapCylinder GasMed_at_condyles_l: translation=(0.005 -0.41 0) quadrant=all radius=0.025 length=0.1
      WrapCylinder KnExtVL_at_fem_l: xyz_body_rotation=(0.0623366 -0.0507601 0)
          translation=(-0.004 -0.402732 -0.00209111) quadrant=all radius=0.03 length=0.1
      WrapCylinder Flex_at_femhead_l: translation=(-0.005 0 -0.01) quadrant=all radius=0.024 length=0.06
      WrapSphere femHeadGEMsupSphere_l: translation=(0 0 0) quadrant=all radius=0.02333361
      WrapSphere femHeadPIRISphere_l: translation=(0 0 0) quadrant=all radius=0.02333361
      WrapCylinder femNeck_Cylinder_OE_l: xyz_body_rotation=(-0.6 0.3 0) translation=(-0.00318 -0.01 -0.0137)
          quadrant=all radius=0.0154 length=0.0484
      WrapCylinder femNeck_Cylinder_OE3_l: xyz_body_rotation=(1.010096 -1.358535 0)
          translation=(-0.03075137 -0.08242342 -0.04920009) quadrant=all radius=0.0139958 length=0.0484
    Body lumbar5: mass=1.824 mass_center=(0.01728 0.0183 0) inertia=(0.178216 0.0217274 0.171486 0 0 0)
        meshes=lumbar5.vtp
    Body lumbar4: mass=1.799 mass_center=(0.0186 0.0217953 0) inertia=(0.171208 0.0206792 0.165178 0 0 0)
        meshes=lumbar4.vtp
    Body lumbar3: mass=1.67 mass_center=(0.0178939 0.0232739 0) inertia=(0.157697 0.0199107 0.152447 0 0 0)
        meshes=lumbar3.vtp
    Body lumbar2: mass=1.689 mass_center=(0.0252462 0.0202124 0) inertia=(0.162705 0.0219751 0.157705 0 0 0)
        meshes=lumbar2.vtp
    Body lumbar1: mass=1.677 mass_center=(0.03274 0.0194073 0.00132891) inertia=(0.162657 0.0241312 0.157927 0 0 0)
        meshes=lumbar1.vtp
    Body torso: mass=16.78486 mass_center=(-0.03 0.32 0) inertia=(1.19239 0.513346 1.1632 0 0 0)
        meshes=(cerv1sm.vtp cerv2sm.vtp cerv3sm.vtp cerv4sm.vtp cerv5sm.vtp cerv6sm.vtp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)
      WrapCylinder Cylinder: translation=(-0.208 0.04 0) quadrant=all radius=0.17 length=0.26
      WrapEllipsoid Chest_r: xyz_body_rotation=(0 -0.4 0.2) translation=(0 0.21 0.01) quadrant=z
          dimensions=(0.075 0.17 0.13)
      WrapEllipsoid Chest_l: xyz_body_rotation=(0 0.4 0.2) translation=(0 0.21 -0.01) quadrant=-z
          dimensions=(0.075 0.17 0.13)
      WrapEllipsoid Chest_pect: xyz_body_rotation=(0 0 0.35) translation=(0.013 0.25 0) quadrant=all
          dimensions=(0.075 0.17 0.136)
    Body Abdomen: mass=0.001 mass_center=(0.008 0 0) inertia=(1.78e-6 5.8e-7 1.36e-6 0 0 0)
      WrapEllipsoid Abdomen: translation=(0 0 0) quadrant=x dimensions=(0.01 0.08 0.05)
    Body LB_wrap: mass=0.001 mass_center=(-0.098 0.071 0) inertia=(6.85833e-6 6.85833e-6 2.45e-6 0 0 0)
      WrapCylinder Cylinder2: translation=(-0.1151 0.0768 0) quadrant=all radius=0.07 length=0.26
    Body clavicle_1: mass=0 mass_center=(0 0 0) inertia=(0 0 0 0 0 0)
    Body clavicle_2: mass=0 mass_center=(0 0 0) inertia=(0 0 0 0 0 0)
    Body clavicle_r: mass=0.1897729 mass_center=(-0.01110064 0.006371761 0.05417029)
        inertia=(0.0002676737 0.0002676737 4.901324e-5 -2.094264e-5 -7.717231e-5 5.926065e-5) meshes=clavicle.vtp
    Body scapula_1: mass=0 mass_center=(0 0 0) inertia=(0 0 0 0 0 0)
    Body scapula_2: mass=0 mass_center=(0 0 0) inertia=(0 0 0 0 0 0)
    Body scapula_r: mass=0.5015989 mass_center=(-0.05468973 -0.03503135 -0.04371461)
        inertia=(0.0008856693 0.0008193404 0.0008856693 0.0003202001 0.0002915427 0.0001717929) meshes=scapula.vtp
      WrapCylinder delt_ant: translation=(-0.0146552 -0.0400202 -0.02616044) quadrant=x radius=0.011 length=0.06
    Body humerus_r: mass=2.0325 mass_center=(0 -0.164502 0) inertia=(0.011946 0.004121 0.013409 0 0 0)
        meshes=humerus_rv.vtp
      WrapSphere deltoid: xyz_body_rotation=(-0.193033 -0.238063 0) translation=(0.0065 -0.0009 -0.0038) quadrant=all
          radius=0.0262
      WrapSphere inf_sup_sub: xyz_body_rotation=(-0.193033 -0.238063 0) translation=(0.0055 0.0018 -0.0081)
          quadrant=all radius=0.0211
      WrapCylinder infra_cyl: xyz_body_rotation=(1.56643 0.00610865 0) translation=(0.0094 -0.023 -0.002) quadrant=-x
          radius=0.015 length=0.11
      WrapCylinder ter_min_cyl: xyz_body_rotation=(1.56643 0.00610865 -1.47672) translation=(0.0011 -0.023 0)
          quadrant=-y radius=0.015 length=0.1
      WrapCylinder ter_lat_pec: xyz_body_rotation=(1.56643 0.00610865 0) translation=(0.01204 -0.053 0) quadrant=all
          radius=0.008 length=0.1
    Body ulna_r: mass=0.6075 mass_center=(0 -0.120525 0) inertia=(0.002962 0.000618 0.003213 0 0 0) meshes=ulna_rv.vtp
      WrapCylinder elbow: translation=(-0.004 -0.0045 0.0099) quadrant=y radius=0.019 length=0.048
      WrapCylinder elbow_circ: translation=(-0.015 -0.0045 0.0099) quadrant=all radius=0.015 length=0.048
    Body radius_r: mass=0.6075 mass_center=(0 -0.120525 0) inertia=(0.002962 0.000618 0.003213 0 0 0)
        meshes=radius_rv.vtp
      WrapCylinder supinator: xyz_body_rotation=(-1.78 0 -0.5) translation=(-0.0023 -0.1196 0.023) quadrant=-y
          radius=0.007 length=0.25
      WrapCylinder ulna_radius: xyz_body_rotation=(1.4 0 3) translation=(-0.002 -0.089 0.014) quadrant=-x radius=0.0071
          length=0.06
      WrapCylinder supinator2: xyz_body_rotation=(-3 1.58 3) translation=(-0.001 -0.0035 0.003) quadrant=-x
          radius=0.006 length=0.02
      WrapCylinder supinator3: xyz_body_rotation=(-1 -1.58 2) translation=(-0.001 -0.0035 0.003) quadrant=-x
          radius=0.006 length=0.02
    Body hand_r: mass=0.4575 mass_center=(0 -0.068095 0) inertia=(0.000892 0.000547 0.00134 0 0 0)
        meshes=(pisiform_rvs.vtp lunate_rvs.vtp scaphoid_rvs.vtp triquetrum_rvs.vtp hamate_rvs.vtp capitate_rvs.vtp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)
    Body clavicle_l_1: mass=0 mass_center=(0 0 0) inertia=(0 0 0 0 0 0)
    Body clavicle_l_2: mass=0 mass_center=(0 0 0) inertia=(0 0 0 0 0 0)
    Body clavicle_l: mass=0.1897729 mass_center=(-0.01110064 0.006371761 -0.05417029)
        inertia=(0.0002676737 0.0002676737 4.901324e-5 -2.094264e-5 7.717231e-5 -5.926065e-5) meshes=clavicle_l.vtp
    Body scapula_l_1: mass=0 mass_center=(0 0 0) inertia=(0 0 0 0 0 0)
    Body scapula_l_2: mass=0 mass_center=(0 0 0) inertia=(0 0 0 0 0 0)
    Body scapula_l: mass=0.5015989 mass_center=(-0.05468973 -0.03503135 0.04371461)
        inertia=(0.0008856693 0.0008193404 0.0008856693 0.0003202001 -0.0002915427 -0.0001717929) meshes=scapula_l.vtp
      WrapCylinder delt_ant_l: translation=(-0.0146552 -0.0400202 0.02616044) quadrant=x radius=0.011 length=0.06
    Body humerus_l: mass=2.0325 mass_center=(0 -0.164502 0) inertia=(0.011946 0.004121 0.013409 0 0 0)
        meshes=humerus_lv.vtp
      WrapSphere deltoid_l: xyz_body_rotation=(0.193033 0.238063 0) translation=(0.0065 -0.0009 0.0038) quadrant=all
          radius=0.0262
      WrapSphere inf_sup_sub_l: xyz_body_rotation=(-0.193033 -0.238063 0) translation=(0.0055 0.0018 0.0081)
          quadrant=all radius=0.0211
      WrapCylinder infra_cyl_l: xyz_body_rotation=(1.56643 -0.00610865 0) translation=(0.0094 -0.023 0.002) quadrant=-x
          radius=0.015 length=0.11
      WrapCylinder ter_min_cyl_l: xyz_body_rotation=(1.56643 -0.00610865 -1.47672) translation=(0.0011 -0.023 0)
          quadrant=-y radius=0.015 length=0.1
      WrapCylinder ter_lat_pec_l: xyz_body_rotation=(1.56643 -0.00610865 0) translation=(0.01204 -0.053 0) quadrant=all
          radius=0.008 length=0.1
    Body ulna_l: mass=0.6075 mass_center=(0 -0.120525 0) inertia=(0.002962 0.000618 0.003213 0 0 0) meshes=ulna_lv.vtp
      WrapCylinder elbow_l: translation=(-0.004 -0.0045 -0.0099) quadrant=y radius=0.019 length=0.048
      WrapCylinder elbow_circ_l: translation=(-0.015 -0.0045 -0.0099) quadrant=all radius=0.015 length=0.048
    Body radius_l: mass=0.6075 mass_center=(0 -0.120525 0) inertia=(0.002962 0.000618 0.003213 0 0 0)
        meshes=radius_lv.vtp
      WrapCylinder supinator_l: xyz_body_rotation=(1.78 0 -0.5) translation=(-0.0023 -0.1196 -0.023) quadrant=-y
          radius=0.007 length=0.25
      WrapCylinder ulna_radius_l: xyz_body_rotation=(-1.4 0 3) translation=(-0.002 -0.089 -0.014) quadrant=-x
          radius=0.0071 length=0.06
      WrapCylinder supinator2_l: xyz_body_rotation=(3 -1.58 3) translation=(-0.001 -0.0035 -0.003) quadrant=-x
          radius=0.006 length=0.02
      WrapCylinder supinator3_l: xyz_body_rotation=(1 1.58 2) translation=(-0.001 -0.0035 -0.003) quadrant=-x
          radius=0.006 length=0.02
    Body hand_l: mass=0.4575 mass_center=(0 -0.068095 0) inertia=(0.000892 0.000547 0.00134 0 0 0)
        meshes=(pisiform_lvs.vtp lunate_lvs.vtp scaphoid_lvs.vtp triquetrum_lvs.vtp hamate_lvs.vtp capitate_lvs.vtp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)
    Body ball: mass=0.25 mass_center=(0 0 0) inertia=(0.02 0.02 0.02 0 0 0)
        meshes=(soccer_ball_seg_Holes.obj soccer_ball.obj)
    Body femoral_cond_r: mass=0 mass_center=(0 0 0) inertia=(0 0 0 0 0 0) meshes=fem_cond.vtp
    Body sagittal_articulation_frame_r: mass=0 mass_center=(0 0 0) inertia=(0 0 0 0 0 0)
    Body med_cond_r: mass=1e-7 mass_center=(0 0 0) inertia=(1e-7 1e-7 1e-7 0 0 0) meshes=sphere.vtp
    Body lat_cond_r: mass=1e-7 mass_center=(0 0 0) inertia=(1e-7 1e-7 1e-7 0 0 0) meshes=sphere.vtp
    Body tibial_plat_r: mass=0 mass_center=(0 0 0) inertia=(0 0 0 0 0 0) meshes=tib_plat.vtp
    Body patella_r: mass=0.0862 mass_center=(0.0018 0.0264 0) inertia=(2.87e-6 1.311e-5 1.311e-5 0 0 0)
        meshes=r_patella.vtp
    Body femoral_cond_l: mass=0 mass_center=(0 0 0) inertia=(0 0 0 0 0 0) meshes=fem_cond.vtp
    Body sagittal_articulation_frame_l: mass=0 mass_center=(0 0 0) inertia=(0 0 0 0 0 0)
    Body med_cond_l: mass=0 mass_center=(0 0 0) inertia=(0 0 0 0 0 0) meshes=sphere.vtp
    Body lat_cond_l: mass=1e-7 mass_center=(0 0 0) inertia=(1e-7 1e-7 1e-7 0 0 0) meshes=sphere.vtp
    Body tibial_plat_l: mass=0 mass_center=(0 0 0) inertia=(0 0 0 0 0 0) meshes=tib_plat.vtp
    Body patella_l: mass=0.0862 mass_center=(0.0018 0.0264 0) inertia=(2.87e-6 1.311e-5 1.311e-5 0 0 0)
        meshes=l_patella.vtp
    Body tibia_r: mass=3.7075 mass_center=(0 -0.1867 0) inertia=(0.0504 0.0051 0.0511 0 0 0)
        meshes=(tibia_r.vtp r_fibula.vtp)
      WrapCylinder GasLat_at_shank_r: xyz_body_rotation=(2.96723 -0.279725 -1.47812)
          translation=(-0.0074 -0.074 -0.0033) quadrant=-y radius=0.055 length=0.1
      WrapCylinder GasMed_at_shank_r: xyz_body_rotation=(2.96723 0.0279725 -1.47812)
          translation=(-0.0074 -0.074 -0.0033) quadrant=-y radius=0.055 length=0.1
      WrapCylinder GR_at_condyles_r: xyz_body_rotation=(0 -0.4 0) translation=(-0.003 -0.02 0) quadrant=all
          radius=0.036 length=0.1
      WrapCylinder SM_at_condyles_r: xyz_body_rotation=(0 -0.1 0) translation=(-0.001 -0.02 0) quadrant=all
          radius=0.0352 length=0.1
      WrapCylinder ST_at_condyles_r: xyz_body_rotation=(0 -0.2 0) translation=(-0.002 -0.0205 0) quadrant=all
          radius=0.0425 length=0.1
      WrapCylinder BF_at_gastroc_r: translation=(-0.058 -0.06 0) quadrant=y radius=0.03 length=0.15
      WrapCylinder BF140_at_gastroc_r: translation=(-0.039 -0.06 0) quadrant=y radius=0.029 length=0.15
    Body tibia_l: mass=3.7075 mass_center=(0 -0.1867 0) inertia=(0.0504 0.0051 0.0511 0 0 0)
        meshes=(tibia_l.vtp l_fibula.vtp)
      WrapCylinder GasLat_at_shank_l: xyz_body_rotation=(-2.96723 0.279725 -1.47812)
          translation=(-0.0074 -0.074 0.0033) quadrant=-y radius=0.055 length=0.1
      WrapCylinder GasMed_at_shank_l: xyz_body_rotation=(-2.96723 -0.0279725 -1.47812)
          translation=(-0.0074 -0.074 0.0033) quadrant=-y radius=0.055 length=0.1
      WrapCylinder GR_at_condyles_l: xyz_body_rotation=(0 0.4 0) translation=(-0.003 -0.02 0) quadrant=all radius=0.036
          length=0.1
      WrapCylinder SM_at_condyles_l: xyz_body_rotation=(0 0.1 0) translation=(-0.001 -0.02 0) quadrant=all
          radius=0.0352 length=0.1
      WrapCylinder ST_at_condyles_l: xyz_body_rotation=(0 0.2 0) translation=(-0.002 -0.0205 0) quadrant=all
          radius=0.0425 length=0.1
      WrapCylinder BF_at_gastroc_l: translation=(-0.058 -0.06 0) quadrant=y radius=0.03 length=0.15
      WrapCylinder BF140_at_gastroc_l: translation=(-0.039 -0.06 0) quadrant=all radius=0.029 length=0.15
    Body talus_r: mass=0.1 mass_center=(0 0 0) inertia=(0.001 0.001 0.001 0 0 0) meshes=r_talus.vtp
    Body talus_l: mass=0.1 mass_center=(0 0 0) inertia=(0.001 0.001 0.001 0 0 0) meshes=l_talus.vtp
    Body calcn_r: mass=1.25 mass_center=(0.1 0.03 0) inertia=(0.0014 0.0039 0.0041 0 0 0) meshes=r_foot.vtp
    Body calcn_l: mass=1.25 mass_center=(0.1 0.03 0) inertia=(0.0014 0.0039 0.0041 0 0 0) meshes=l_foot.vtp
    Body toes_r: mass=0.2166 mass_center=(0.0346 0.006 -0.0175) inertia=(0.0001 0.0002 0.001 0 0 0) meshes=r_bofoot.vtp
    Body toes_l: mass=0.2166 mass_center=(0.0346 0.006 0.0175) inertia=(0.0001 0.0002 0.001 0 0 0) meshes=l_bofoot.vtp
  JointSet:
    CustomJoint ground_pelvis: socket_parent_frame=ground_offset socket_child_frame=pelvis_offset
      Coordinate pelvis_tilt: default_value=0 range=(-1.570796 1.570796) clamped=true
      Coordinate pelvis_list: default_value=0 range=(-1.570796 1.570796) clamped=true
      Coordinate pelvis_rotation: default_value=0 range=(-3.140796 3.14708) clamped=true
      Coordinate pelvis_tx: default_value=0 range=(-5 5) clamped=true
      Coordinate pelvis_ty: default_value=0.93 range=(-1 2) clamped=true
      Coordinate pelvis_tz: default_value=0 range=(-3 3) clamped=true
      PhysicalOffsetFrame ground_offset: socket_parent=/ground translation=(0 0 0) [meters]
      PhysicalOffsetFrame pelvis_offset: socket_parent=/bodyset/pelvis translation=(0 0 0)
      SpatialTransform:
        TransformAxis rotation1: coordinates=pelvis_tilt axis=(0 0 1) LinearFunction(coefficients=1 0)
        TransformAxis rotation2: coordinates=pelvis_list axis=(1 0 0) LinearFunction(coefficients=1 0)
        TransformAxis rotation3: coordinates=pelvis_rotation axis=(0 1 0) LinearFunction(coefficients=1 0)
        TransformAxis translation1: coordinates=pelvis_tx axis=(1 0 0) LinearFunction(coefficients=1 0)
        TransformAxis translation2: coordinates=pelvis_ty axis=(0 1 0) LinearFunction(coefficients=1 0)
        TransformAxis translation3: coordinates=pelvis_tz axis=(0 0 1) LinearFunction(coefficients=1 0)
    WeldJoint sacrumjnt: socket_parent_frame=pelvis_sacrum_offset socket_child_frame=sacrum_offset
      PhysicalOffsetFrame pelvis_sacrum_offset: socket_parent=/bodyset/pelvis translation=(0.01 -0.017 0)
      PhysicalOffsetFrame sacrum_offset: socket_parent=/bodyset/sacrum translation=(0 0 0)
    CustomJoint hip_r: socket_parent_frame=pelvis_offset socket_child_frame=femur_r_offset
      Coordinate hip_flexion_r: default_value=0 range=(-0.5235988 2.617994) clamped=true
      Coordinate hip_adduction_r: default_value=0 range=(-1.128876 0.5235988) clamped=true
      Coordinate hip_rotation_r: default_value=0 range=(-0.9536438 0.6981317) clamped=true
      PhysicalOffsetFrame pelvis_offset: socket_parent=/bodyset/pelvis translation=(-0.056276 -0.07849 0.07726)
      PhysicalOffsetFrame femur_r_offset: socket_parent=/bodyset/femur_r translation=(0 0 0)
      SpatialTransform: axes_held_at_zero=(translation1 translation2 translation3)
        TransformAxis rotation1: coordinates=hip_flexion_r axis=(0 0 1) LinearFunction(coefficients=1 0)
        TransformAxis rotation2: coordinates=hip_adduction_r axis=(1 0 0) LinearFunction(coefficients=1 0)
        TransformAxis rotation3: coordinates=hip_rotation_r axis=(0 1 0) LinearFunction(coefficients=1 0)
    CustomJoint hip_l: socket_parent_frame=pelvis_offset socket_child_frame=femur_l_offset
      Coordinate hip_flexion_l: default_value=0 range=(-0.5235988 2.617994) clamped=true
      Coordinate hip_adduction_l: default_value=0 range=(-1.128876 0.5235988) clamped=true
      Coordinate hip_rotation_l: default_value=0 range=(-0.954173 0.6981317) clamped=true
      PhysicalOffsetFrame pelvis_offset: socket_parent=/bodyset/pelvis translation=(-0.056276 -0.07849 -0.07726)
      PhysicalOffsetFrame femur_l_offset: socket_parent=/bodyset/femur_l translation=(0 0 0)
      SpatialTransform: axes_held_at_zero=(translation1 translation2 translation3)
        TransformAxis rotation1: coordinates=hip_flexion_l axis=(0 0 1) LinearFunction(coefficients=1 0)
        TransformAxis rotation2: coordinates=hip_adduction_l axis=(1 0 0) LinearFunction(coefficients=-1 0)
        TransformAxis rotation3: coordinates=hip_rotation_l axis=(0 1 0) LinearFunction(coefficients=-1 0)
    CustomJoint L5_S1_IVDjnt: socket_parent_frame=sacrum_offset socket_child_frame=lumbar5_offset
      Coordinate flex_extension: default_value=0 range=(-1.22173 0.4537856) clamped=true
      Coordinate lat_bending: default_value=0 range=(-0.4363323 0.4363323) clamped=true
      Coordinate axial_rotation: default_value=0 range=(-0.9791297 0.9791297) clamped=true
      PhysicalOffsetFrame sacrum_offset: socket_parent=/bodyset/sacrum translation=(-0.098 0.071 0)
      PhysicalOffsetFrame lumbar5_offset: socket_parent=/bodyset/lumbar5 translation=(0 0 0)
      SpatialTransform: axes_held_at_zero=(translation1 translation2 translation3)
        TransformAxis rotation1: coordinates=flex_extension axis=(0 0 1) LinearFunction(coefficients=0.0889273 0)
        TransformAxis rotation2: coordinates=lat_bending axis=(1 0 0)
            PiecewiseLinearFunction(x=-1.01875 1.01875, y=-0.138056 0.138056)
        TransformAxis rotation3: coordinates=axial_rotation axis=(0 1 0)
          SimmSpline: x=(-0.97913 0 0.97913) y=(-0.0296706 0 0.0279253)
    CustomJoint L4_L5_IVDjnt: socket_parent_frame=lumbar5_offset socket_child_frame=lumbar4_offset
      Coordinate L4_L5_IVDjnt_r3: default_value=0 range=(-99999.9 99999.9) clamped=false
      Coordinate L4_L5_IVD_bendjnt_r1: default_value=0 range=(-99999.9 99999.9) clamped=false
      Coordinate L4_L5_IVD_rotjnt_r2: default_value=0 range=(-99999.9 99999.9) clamped=false
      PhysicalOffsetFrame lumbar5_offset: socket_parent=/bodyset/lumbar5 translation=(0.01 0.0296 0)
      PhysicalOffsetFrame lumbar4_offset: socket_parent=/bodyset/lumbar4 translation=(0.001 -0.0025 0)
      SpatialTransform: axes_held_at_zero=(translation1 translation2 translation3)
        TransformAxis rotation1: coordinates=L4_L5_IVDjnt_r3 axis=(0 0 1) LinearFunction(coefficients=1 0)
        TransformAxis rotation2: coordinates=L4_L5_IVD_bendjnt_r1 axis=(1 0 0) LinearFunction(coefficients=1 0)
        TransformAxis rotation3: coordinates=L4_L5_IVD_rotjnt_r2 axis=(0 1 0) LinearFunction(coefficients=1 0)
    CustomJoint L3_L4_IVDjnt: socket_parent_frame=lumbar4_offset socket_child_frame=lumbar3_offset
      Coordinate L3_L4_IVDjnt_r3: default_value=0 range=(-99999.9 99999.9) clamped=false
      Coordinate L3_L4_IVD_bendjnt_r1: default_value=0 range=(-99999.9 99999.9) clamped=false
      Coordinate L3_L4_IVD_rotjnt_r2: default_value=0 range=(-99999.9 99999.9) clamped=false
      PhysicalOffsetFrame lumbar4_offset: socket_parent=/bodyset/lumbar4 translation=(0 0.032 0)
      PhysicalOffsetFrame lumbar3_offset: socket_parent=/bodyset/lumbar3 translation=(-0.0006 -0.0012 0)
      SpatialTransform: axes_held_at_zero=(translation1 translation2 translation3)
        TransformAxis rotation1: coordinates=L3_L4_IVDjnt_r3 axis=(0 0 1) LinearFunction(coefficients=1 0)
        TransformAxis rotation2: coordinates=L3_L4_IVD_bendjnt_r1 axis=(1 0 0) LinearFunction(coefficients=1 0)
        TransformAxis rotation3: coordinates=L3_L4_IVD_rotjnt_r2 axis=(0 1 0) LinearFunction(coefficients=1 0)
    CustomJoint L2_L3_IVD_jnt: socket_parent_frame=lumbar3_offset socket_child_frame=lumbar2_offset
      Coordinate L2_L3_IVDjnt_r3: default_value=0 range=(-99999.9 99999.9) clamped=false
      Coordinate L2_L3_IVD_bendjnt_r1: default_value=0 range=(-99999.9 99999.9) clamped=false
      Coordinate L2_L3_IVD_rotjnt_r2: default_value=0 range=(-99999.9 99999.9) clamped=false
      PhysicalOffsetFrame lumbar3_offset: socket_parent=/bodyset/lumbar3 translation=(-0.008 0.0312 0)
      PhysicalOffsetFrame lumbar2_offset: socket_parent=/bodyset/lumbar2 translation=(-0.0013 -0.0039 0)
      SpatialTransform: axes_held_at_zero=(translation1 translation2 translation3)
        TransformAxis rotation1: coordinates=L2_L3_IVDjnt_r3 axis=(0 0 1) LinearFunction(coefficients=1 0)
        TransformAxis rotation2: coordinates=L2_L3_IVD_bendjnt_r1 axis=(1 0 0) LinearFunction(coefficients=1 0)
        TransformAxis rotation3: coordinates=L2_L3_IVD_rotjnt_r2 axis=(0 1 0) LinearFunction(coefficients=1 0)
    CustomJoint L1_L2_IVD_jnt: socket_parent_frame=lumbar2_offset socket_child_frame=lumbar1_offset
      Coordinate L1_L2_IVDjnt_r3: default_value=0 range=(-99999.9 99999.9) clamped=false
      Coordinate L1_L2_IVD_bendjnt_r1: default_value=0 range=(-99999.9 99999.9) clamped=false
      Coordinate L1_L2_IVD_rotjnt_r2: default_value=0 range=(-99999.9 99999.9) clamped=false
      PhysicalOffsetFrame lumbar2_offset: socket_parent=/bodyset/lumbar2 translation=(-0.01 0.025 0)
      PhysicalOffsetFrame lumbar1_offset: socket_parent=/bodyset/lumbar1 translation=(0.0014 -0.0038 0)
      SpatialTransform: axes_held_at_zero=(translation1 translation2 translation3)
        TransformAxis rotation1: coordinates=L1_L2_IVDjnt_r3 axis=(0 0 1) LinearFunction(coefficients=0.85 0)
        TransformAxis rotation2: coordinates=L1_L2_IVD_bendjnt_r1 axis=(1 0 0) LinearFunction(coefficients=1 0)
        TransformAxis rotation3: coordinates=L1_L2_IVD_rotjnt_r2 axis=(0 1 0) LinearFunction(coefficients=1 0)
    CustomJoint Torsojnt: socket_parent_frame=lumbar1_offset socket_child_frame=torso_offset
      Coordinate Torso_Rot: default_value=0 range=(-1.1 1.1) clamped=true
      PhysicalOffsetFrame lumbar1_offset: socket_parent=/bodyset/lumbar1 translation=(0.0025 -0.09 0)
      PhysicalOffsetFrame torso_offset: socket_parent=/bodyset/torso translation=(0 0 0)
      SpatialTransform: axes_held_at_zero=(rotation2 rotation3 translation1 translation2 translation3)
        TransformAxis rotation1: coordinates=Torso_Rot axis=(0 1 0) LinearFunction(coefficients=1 0)
    CustomJoint Abdjnt: socket_parent_frame=sacrum_offset socket_child_frame=Abdomen_offset
      Coordinate Abs_r3: default_value=0 range=(-1.7 1.7) clamped=false
      Coordinate Abs_t1: default_value=0 range=(-99999.9 99999.9) clamped=false locked=true
      Coordinate Abs_t2: default_value=0 range=(-99999.9 99999.9) clamped=false locked=true
      PhysicalOffsetFrame sacrum_offset: socket_parent=/bodyset/sacrum translation=(-0.098 0.071 0)
      PhysicalOffsetFrame Abdomen_offset: socket_parent=/bodyset/Abdomen translation=(-0.09 -0.09 0)
      SpatialTransform: axes_held_at_zero=(rotation2 rotation3 translation3)
        TransformAxis rotation1: coordinates=Abs_r3 axis=(0 0 1) LinearFunction(coefficients=1 0)
        TransformAxis translation1: coordinates=Abs_t1 axis=(1 0 0) LinearFunction(coefficients=1 0)
        TransformAxis translation2: coordinates=Abs_t2 axis=(0 1 0) LinearFunction(coefficients=1 0)
    CustomJoint LB_wrapjnt: socket_parent_frame=sacrum_offset socket_child_frame=LB_wrap_offset
      Coordinate LB_wrapjnt_r3: default_value=0 range=(-99999.9 99999.9) clamped=false
      Coordinate LB_wrapjnt_t1: default_value=0 range=(-99999.9 99999.9) clamped=false
      Coordinate LB_wrapjnt_t2: default_value=0 range=(-99999.9 99999.9) clamped=false
      PhysicalOffsetFrame sacrum_offset: socket_parent=/bodyset/sacrum translation=(-0.098 0.071 0)
      PhysicalOffsetFrame LB_wrap_offset: socket_parent=/bodyset/LB_wrap translation=(0 0 0)
      SpatialTransform: axes_held_at_zero=(rotation2 rotation3 translation3)
        TransformAxis rotation1: coordinates=LB_wrapjnt_r3 axis=(0 0 1) LinearFunction(coefficients=1 0)
        TransformAxis translation1: coordinates=LB_wrapjnt_t1 axis=(1 0 0) LinearFunction(coefficients=1 0)
        TransformAxis translation2: coordinates=LB_wrapjnt_t2 axis=(0 1 0) LinearFunction(coefficients=1 0)
    CustomJoint sc1: socket_parent_frame=torso_offset socket_child_frame=clavicle_1_offset
      Coordinate SC_y: default_value=0 range=(-0.5235988 0.5235988) clamped=true
      PhysicalOffsetFrame torso_offset: socket_parent=/bodyset/torso translation=(0.0365312 0.377931 0.025465)
      PhysicalOffsetFrame clavicle_1_offset: socket_parent=/bodyset/clavicle_1 translation=(0 0 0)
      SpatialTransform: axes_held_at_zero=(rotation2 rotation3 translation1 translation2 translation3)
        TransformAxis rotation1: coordinates=SC_y axis=(0 1 0) LinearFunction(coefficients=1 0)
    CustomJoint sc2: socket_parent_frame=clavicle_1_offset socket_child_frame=clavicle_2_offset
      Coordinate SC_x: default_value=0 range=(-0.7853982 0.1745329) clamped=true
      PhysicalOffsetFrame clavicle_1_offset: socket_parent=/bodyset/clavicle_1 translation=(0 0 0)
      PhysicalOffsetFrame clavicle_2_offset: socket_parent=/bodyset/clavicle_2 translation=(0 0 0)
      SpatialTransform: axes_held_at_zero=(rotation1 rotation2 translation1 translation2 translation3)
        TransformAxis rotation3: coordinates=SC_x axis=(0.0873 0 0) LinearFunction(coefficients=1 0)
    CustomJoint sc3: socket_parent_frame=clavicle_2_offset socket_child_frame=clavicle_r_offset
      Coordinate SC_z: default_value=0 range=(0 0.6108652) clamped=true
      PhysicalOffsetFrame clavicle_2_offset: socket_parent=/bodyset/clavicle_2 translation=(0 0 0)
      PhysicalOffsetFrame clavicle_r_offset: socket_parent=/bodyset/clavicle_r translation=(0 0 0)
      SpatialTransform: axes_held_at_zero=(rotation1 rotation3 translation1 translation2 translation3)
        TransformAxis rotation2: coordinates=SC_z axis=(0.0873 0 0.5744638) LinearFunction(coefficients=1 0)
    WeldJoint AC1: socket_parent_frame=clavicle_r_offset socket_child_frame=scapula_1_offset
      PhysicalOffsetFrame clavicle_r_offset: socket_parent=/bodyset/clavicle_r translation=(-0.01433 0.02007 0.135535)
      PhysicalOffsetFrame scapula_1_offset: socket_parent=/bodyset/scapula_1 translation=(0 0 0)
    WeldJoint AC2: socket_parent_frame=scapula_1_offset socket_child_frame=scapula_2_offset
      PhysicalOffsetFrame scapula_1_offset: socket_parent=/bodyset/scapula_1 translation=(0 0 0)
      PhysicalOffsetFrame scapula_2_offset: socket_parent=/bodyset/scapula_2 translation=(0 0 0)
    WeldJoint AC3: socket_parent_frame=scapula_2_offset socket_child_frame=scapula_r_offset
      PhysicalOffsetFrame scapula_2_offset: socket_parent=/bodyset/scapula_2 translation=(0 0 0)
      PhysicalOffsetFrame scapula_r_offset: socket_parent=/bodyset/scapula_r translation=(0 0 0)
    CustomJoint sc1_l: socket_parent_frame=torso_offset socket_child_frame=clavicle_l_1_offset
      Coordinate SC_y_l: default_value=0 range=(-0.5235988 0.5235988) clamped=true
      PhysicalOffsetFrame torso_offset: socket_parent=/bodyset/torso translation=(0.0365312 0.377931 -0.025465)
      PhysicalOffsetFrame clavicle_l_1_offset: socket_parent=/bodyset/clavicle_l_1 translation=(0 0 0)
      SpatialTransform: axes_held_at_zero=(rotation2 rotation3 translation1 translation2 translation3)
        TransformAxis rotation1: coordinates=SC_y_l axis=(0 1 0) LinearFunction(coefficients=1 0)
    CustomJoint sc2_l: socket_parent_frame=clavicle_l_1_offset socket_child_frame=clavicle_l_2_offset
      Coordinate SC_x_l: default_value=0 range=(-0.7853982 0.1745329) clamped=true
      PhysicalOffsetFrame clavicle_l_1_offset: socket_parent=/bodyset/clavicle_l_1 translation=(0 0 0)
      PhysicalOffsetFrame clavicle_l_2_offset: socket_parent=/bodyset/clavicle_l_2 translation=(0 0 0)
      SpatialTransform: axes_held_at_zero=(rotation1 rotation2 translation1 translation2 translation3)
        TransformAxis rotation3: coordinates=SC_x_l axis=(-0.0873 0 0) LinearFunction(coefficients=1 0)
    CustomJoint sc3_l: socket_parent_frame=clavicle_l_2_offset socket_child_frame=clavicle_l_offset
      Coordinate SC_z_l: default_value=0 range=(-0.6108652 0) clamped=true
      PhysicalOffsetFrame clavicle_l_2_offset: socket_parent=/bodyset/clavicle_l_2 translation=(0 0 0)
      PhysicalOffsetFrame clavicle_l_offset: socket_parent=/bodyset/clavicle_l translation=(0 0 0)
      SpatialTransform: axes_held_at_zero=(rotation1 rotation3 translation1 translation2 translation3)
        TransformAxis rotation2: coordinates=SC_z_l axis=(-0.0873 0 -0.5744638) LinearFunction(coefficients=1 0)
    WeldJoint AC1_l: socket_parent_frame=clavicle_l_offset socket_child_frame=scapula_l_1_offset
      PhysicalOffsetFrame clavicle_l_offset: socket_parent=/bodyset/clavicle_l translation=(-0.01433 0.02007 -0.135535)
      PhysicalOffsetFrame scapula_l_1_offset: socket_parent=/bodyset/scapula_l_1 translation=(0 0 0)
    WeldJoint AC2_l: socket_parent_frame=scapula_l_1_offset socket_child_frame=scapula_l_2_offset
      PhysicalOffsetFrame scapula_l_1_offset: socket_parent=/bodyset/scapula_l_1 translation=(0 0 0)
      PhysicalOffsetFrame scapula_l_2_offset: socket_parent=/bodyset/scapula_l_2 translation=(0 0 0)
    WeldJoint AC3_l: socket_parent_frame=scapula_l_2_offset socket_child_frame=scapula_l_offset
      PhysicalOffsetFrame scapula_l_2_offset: socket_parent=/bodyset/scapula_l_2 translation=(0 0 0)
      PhysicalOffsetFrame scapula_l_offset: socket_parent=/bodyset/scapula_l translation=(0 0 0)
    CustomJoint acromial_r: socket_parent_frame=scapula_r_offset socket_child_frame=humerus_r_offset
      Coordinate arm_flex_r: default_value=0 range=(-1.570796 3.141593) clamped=true
      Coordinate arm_add_r: default_value=0 range=(-2.094395 1.570796) clamped=true
      Coordinate arm_rot_r: default_value=0 range=(-1.570796 1.570796) clamped=true
      PhysicalOffsetFrame scapula_r_offset: socket_parent=/bodyset/scapula_r
          translation=(-0.0266552 -0.0400202 0.00383956)
      PhysicalOffsetFrame humerus_r_offset: socket_parent=/bodyset/humerus_r translation=(0 0 0)
      SpatialTransform: axes_held_at_zero=(translation1 translation2 translation3)
        TransformAxis rotation1: coordinates=arm_flex_r axis=(0 0 1) LinearFunction(coefficients=1 0)
        TransformAxis rotation2: coordinates=arm_add_r axis=(1 0 0) LinearFunction(coefficients=1 0)
        TransformAxis rotation3: coordinates=arm_rot_r axis=(0 1 0) LinearFunction(coefficients=1 0)
    CustomJoint elbow_r: socket_parent_frame=humerus_r_offset socket_child_frame=ulna_r_offset
      Coordinate elbow_flex_r: default_value=0 range=(0 2.618) clamped=true
      PhysicalOffsetFrame humerus_r_offset: socket_parent=/bodyset/humerus_r translation=(0.013144 -0.286273 -0.009595)
      PhysicalOffsetFrame ulna_r_offset: socket_parent=/bodyset/ulna_r translation=(0 0 0)
      SpatialTransform: axes_held_at_zero=(rotation2 rotation3 translation1 translation2 translation3)
        TransformAxis rotation1: coordinates=elbow_flex_r axis=(0.226047 0.022269 0.9738618)
            LinearFunction(coefficients=1 0)
    CustomJoint radioulnar_r: socket_parent_frame=ulna_r_offset socket_child_frame=radius_r_offset
      Coordinate pro_sup_r: default_value=0 range=(0 1.570796) clamped=true
      PhysicalOffsetFrame ulna_r_offset: socket_parent=/bodyset/ulna_r translation=(-0.006727 -0.013007 0.026083)
      PhysicalOffsetFrame radius_r_offset: socket_parent=/bodyset/radius_r translation=(0 0 0)
      SpatialTransform: axes_held_at_zero=(rotation2 rotation3 translation1 translation2 translation3)
        TransformAxis rotation1: coordinates=pro_sup_r axis=(0.05639803 0.9984065 0.001952)
            LinearFunction(coefficients=1 0)
    CustomJoint radius_hand_r: socket_parent_frame=radius_r_offset socket_child_frame=hand_r_offset
      Coordinate wrist_flex_r: default_value=0 range=(-1.22173 1.22173) clamped=true
      Coordinate wrist_dev_r: default_value=0 range=(-0.4363323 0.6108652) clamped=true
      PhysicalOffsetFrame radius_r_offset: socket_parent=/bodyset/radius_r translation=(-0.008797 -0.235841 0.01361)
      PhysicalOffsetFrame hand_r_offset: socket_parent=/bodyset/hand_r translation=(0 0 0)
      SpatialTransform: axes_held_at_zero=(rotation3 translation1 translation2 translation3)
        TransformAxis rotation1: coordinates=wrist_flex_r axis=(0 0 1) LinearFunction(coefficients=1 0)
        TransformAxis rotation2: coordinates=wrist_dev_r axis=(1 0 0) LinearFunction(coefficients=1 0)
    CustomJoint acromial_l: socket_parent_frame=scapula_l_offset socket_child_frame=humerus_l_offset
      Coordinate arm_flex_l: default_value=0 range=(-1.570796 3.141593) clamped=true
      Coordinate arm_add_l: default_value=0 range=(-2.094395 1.570796) clamped=true
      Coordinate arm_rot_l: default_value=0 range=(-1.570796 1.570796) clamped=true
      PhysicalOffsetFrame scapula_l_offset: socket_parent=/bodyset/scapula_l
          translation=(-0.0266552 -0.0400202 -0.00383956)
      PhysicalOffsetFrame humerus_l_offset: socket_parent=/bodyset/humerus_l translation=(0 0 0)
      SpatialTransform: axes_held_at_zero=(translation1 translation2 translation3)
        TransformAxis rotation1: coordinates=arm_flex_l axis=(0 0 1) LinearFunction(coefficients=1 0)
        TransformAxis rotation2: coordinates=arm_add_l axis=(-1 0 0) LinearFunction(coefficients=1 0)
        TransformAxis rotation3: coordinates=arm_rot_l axis=(0 -1 0) LinearFunction(coefficients=1 0)
    CustomJoint elbow_l: socket_parent_frame=humerus_l_offset socket_child_frame=ulna_l_offset
      Coordinate elbow_flex_l: default_value=0 range=(0 2.618) clamped=true
      PhysicalOffsetFrame humerus_l_offset: socket_parent=/bodyset/humerus_l translation=(0.013144 -0.286273 0.009595)
      PhysicalOffsetFrame ulna_l_offset: socket_parent=/bodyset/ulna_l translation=(0 0 0)
      SpatialTransform: axes_held_at_zero=(rotation2 rotation3 translation1 translation2 translation3)
        TransformAxis rotation1: coordinates=elbow_flex_l axis=(-0.226047 -0.022269 0.9738618)
            LinearFunction(coefficients=1 0)
    CustomJoint radioulnar_l: socket_parent_frame=ulna_l_offset socket_child_frame=radius_l_offset
      Coordinate pro_sup_l: default_value=0 range=(0 1.570796) clamped=true
      PhysicalOffsetFrame ulna_l_offset: socket_parent=/bodyset/ulna_l translation=(-0.006727 -0.013007 -0.026083)
      PhysicalOffsetFrame radius_l_offset: socket_parent=/bodyset/radius_l translation=(0 0 0)
      SpatialTransform: axes_held_at_zero=(rotation2 rotation3 translation1 translation2 translation3)
        TransformAxis rotation1: coordinates=pro_sup_l axis=(-0.05639803 -0.9984065 0.001952)
            LinearFunction(coefficients=1 0)
    CustomJoint radius_hand_l: socket_parent_frame=radius_l_offset socket_child_frame=hand_l_offset
      Coordinate wrist_flex_l: default_value=0 range=(-1.22173 1.22173) clamped=true
      Coordinate wrist_dev_l: default_value=0 range=(-0.4363323 0.6108652) clamped=true
      PhysicalOffsetFrame radius_l_offset: socket_parent=/bodyset/radius_l translation=(-0.008797 -0.235841 -0.01361)
      PhysicalOffsetFrame hand_l_offset: socket_parent=/bodyset/hand_l translation=(0 0 0)
      SpatialTransform: axes_held_at_zero=(rotation3 translation1 translation2 translation3)
        TransformAxis rotation1: coordinates=wrist_flex_l axis=(0 0 1) LinearFunction(coefficients=1 0)
        TransformAxis rotation2: coordinates=wrist_dev_l axis=(-1 0 0) LinearFunction(coefficients=1 0)
    WeldJoint ball_hand_jnt: socket_parent_frame=hand_r_ball_offset socket_child_frame=ball_offset
      PhysicalOffsetFrame hand_r_ball_offset: socket_parent=/bodyset/hand_r translation=(0 0 0)
      PhysicalOffsetFrame ball_offset: socket_parent=/bodyset/ball translation=(0 0 0)
    WeldJoint femur_weld_r: socket_parent_frame=femur_r_offset socket_child_frame=femoral_cond_r_offset
      PhysicalOffsetFrame femur_r_offset: socket_parent=/bodyset/femur_r translation=(0 -0.404 0)
      PhysicalOffsetFrame femoral_cond_r_offset: socket_parent=/bodyset/femoral_cond_r translation=(0 0 0)
    CustomJoint Lerner_knee_r: socket_parent_frame=femoral_cond_r_offset
        socket_child_frame=sagittal_articulation_frame_r_offset
      Coordinate knee_angle_r: default_value=0 range=(-2.530727 0.1745329) clamped=true
      Coordinate knee_adduction_r: default_value=0 range=(-0.3626364 0.2856935) clamped=true
      PhysicalOffsetFrame femoral_cond_r_offset: socket_parent=/bodyset/femoral_cond_r translation=(0 0 0)
      PhysicalOffsetFrame sagittal_articulation_frame_r_offset: socket_parent=/bodyset/sagittal_articulation_frame_r
          translation=(0 0 0)
      SpatialTransform: axes_held_at_zero=(rotation2 translation3)
        TransformAxis rotation1: coordinates=knee_angle_r axis=(0 0 1) LinearFunction(coefficients=1 0)
        TransformAxis rotation3: coordinates=knee_adduction_r axis=(1 0 0) LinearFunction(coefficients=1 0)
        TransformAxis translation1: coordinates=knee_angle_r axis=(1 0 0)
          SimmSpline: x=(-2.53073 -2.42165 -2.31256 -2.20348 -2.0944 -1.74533 -1.39626 -1.0472 -0.698132 -0.349066 -0.174533 0.197344 0.337395 0.490178 1.52146 2.0944)
              y=(-0.00943736 -0.00787802 -0.00631868 -0.00475934 -0.0032 0.00179 0.00411 0.0041 0.00212 -0.001 -0.0031 -0.005227 -0.005435 -0.005574 -0.005435 -0.00525)
        TransformAxis translation2: coordinates=knee_angle_r axis=(0 1 0)
          SimmSpline: x=(-2.53073 -2.42165 -2.31256 -2.20348 -2.0944 -1.22173 -0.523599 -0.349066 -0.174533 0.159149 2.0944)
              y=(-0.0257999 -0.0239999 -0.0221999 -0.0204 -0.0186 -0.0042 0.005 0.0064 0.0074 0.0087 0.008)
    CustomJoint med_cond_joint_r: socket_parent_frame=sagittal_articulation_frame_r_offset
        socket_child_frame=med_cond_r_offset
      Coordinate med_cond_adduction_r: default_value=0 range=(-2.094395 2.094395) clamped=true locked=true
          is_free_to_satisfy_constraints=true
      PhysicalOffsetFrame sagittal_articulation_frame_r_offset: socket_parent=/bodyset/sagittal_articulation_frame_r
          translation=(0 -0.035 -0.02)
      PhysicalOffsetFrame med_cond_r_offset: socket_parent=/bodyset/med_cond_r translation=(0 0 0)
      SpatialTransform: axes_held_at_zero=(rotation2 rotation3 translation1 translation2 translation3)
        TransformAxis rotation1: coordinates=med_cond_adduction_r axis=(1 0 0) LinearFunction(coefficients=1 0)
    CustomJoint lat_cond_joint_r: socket_parent_frame=sagittal_articulation_frame_r_offset
        socket_child_frame=lat_cond_r_offset
      Coordinate lat_cond_adduction_r: default_value=0 range=(-2.094395 2.094395) clamped=true locked=true
          is_free_to_satisfy_constraints=true
      PhysicalOffsetFrame sagittal_articulation_frame_r_offset: socket_parent=/bodyset/sagittal_articulation_frame_r
          translation=(0 -0.035 0.02)
      PhysicalOffsetFrame lat_cond_r_offset: socket_parent=/bodyset/lat_cond_r translation=(0 0 0)
      SpatialTransform: axes_held_at_zero=(rotation2 rotation3 translation1 translation2 translation3)
        TransformAxis rotation1: coordinates=lat_cond_adduction_r axis=(1 0 0) LinearFunction(coefficients=1 0)
    WeldJoint med_cond_weld_r: socket_parent_frame=med_cond_r_offset socket_child_frame=tibial_plat_r_offset
      PhysicalOffsetFrame med_cond_r_offset: socket_parent=/bodyset/med_cond_r translation=(0 0.035 0.02)
      PhysicalOffsetFrame tibial_plat_r_offset: socket_parent=/bodyset/tibial_plat_r translation=(0 0 0)
    WeldJoint tibial_plat_weld_r: socket_parent_frame=tibial_plat_r_offset socket_child_frame=tibia_r_offset
      PhysicalOffsetFrame tibial_plat_r_offset: socket_parent=/bodyset/tibial_plat_r translation=(0 0 0)
      PhysicalOffsetFrame tibia_r_offset: socket_parent=/bodyset/tibia_r translation=(0 0 0)
    CustomJoint fem_pat_r: socket_parent_frame=femoral_cond_r_offset socket_child_frame=patella_r_offset
      Coordinate patella_r_constrained_knee_angle: default_value=0 range=(-999999.9 999999.9) clamped=true
      PhysicalOffsetFrame femoral_cond_r_offset: socket_parent=/bodyset/femoral_cond_r translation=(0 0 0.0024)
      PhysicalOffsetFrame patella_r_offset: socket_parent=/bodyset/patella_r translation=(0 0 0)
      SpatialTransform: axes_held_at_zero=(rotation2 rotation3 translation3)
        TransformAxis rotation1: coordinates=patella_r_constrained_knee_angle axis=(0 0 1)
          SimmSpline: x=(-2.53073 -2.50018 -2.46964 -2.4391 -2.40855 -2.23635 -2.06414 -1.89194 -1.71973 -1.54753 -1.37532 -1.20311 -1.03091 -0.858702 -0.686496 -0.51429 -0.342085 -0.169879 0.00232711 0.174533)
              y=(-2.09416 -2.06561 -2.03707 -2.00852 -1.97997 -1.81903 -1.65808 -1.49713 -1.33619 -1.17524 -1.01741 -0.86299 -0.70857 -0.55415 -0.39973 -0.2503 -0.166891 -0.0834819 -0.00197785 -0.1054)
        TransformAxis translation1: coordinates=patella_r_constrained_knee_angle axis=(1 0 0)
          SimmSpline: x=(-2.53073 -2.50018 -2.46964 -2.4391 -2.40855 -2.23635 -2.06414 -1.89194 -1.71973 -1.54753 -1.37532 -1.20311 -1.03091 -0.858702 -0.686496 -0.51429 -0.342085 -0.169879 0.00232711 0.174533)
              y=(-0.0317482 -0.031516 -0.0312839 -0.0310517 -0.0308195 -0.0295104 -0.0273125 -0.0241852 -0.0201302 -0.0151912 -0.00945375 -0.0030458 0.00386277 0.01106 0.0182918 0.025262 0.0316324 0.0370227 0.0410105 0.0431313)
        TransformAxis translation2: coordinates=patella_r_constrained_knee_angle axis=(0 1 0)
          SimmSpline: x=(-2.53073 -2.50018 -2.46964 -2.4391 -2.40855 -2.23635 -2.06414 -1.89194 -1.71973 -1.54753 -1.37532 -1.20311 -1.03091 -0.858702 -0.686496 -0.51429 -0.342085 -0.169879 0.00232711 0.174533)
              y=(-0.023865 -0.0243154 -0.0247658 -0.0252162 -0.0256666 -0.028206 -0.0315216 -0.0351188 -0.0385657 -0.0414925 -0.0435919 -0.044619 -0.0443914 -0.0427889 -0.0397539 -0.0352911 -0.0294675 -0.0224126 -0.0143184 -0.00543909)
    WeldJoint femur_weld_l: socket_parent_frame=femur_l_offset socket_child_frame=femoral_cond_l_offset
      PhysicalOffsetFrame femur_l_offset: socket_parent=/bodyset/femur_l translation=(0 -0.404 0)
      PhysicalOffsetFrame femoral_cond_l_offset: socket_parent=/bodyset/femoral_cond_l translation=(0 0 0)
    CustomJoint Lerner_knee_l: socket_parent_frame=femoral_cond_l_offset
        socket_child_frame=sagittal_articulation_frame_l_offset
      Coordinate knee_angle_l: default_value=0 range=(-2.530727 0.1745329) clamped=true
      Coordinate knee_adduction_l: default_value=0 range=(-0.3626364 0.2856935) clamped=true
      PhysicalOffsetFrame femoral_cond_l_offset: socket_parent=/bodyset/femoral_cond_l translation=(0 0 0)
      PhysicalOffsetFrame sagittal_articulation_frame_l_offset: socket_parent=/bodyset/sagittal_articulation_frame_l
          translation=(0 0 0)
      SpatialTransform: axes_held_at_zero=(rotation2 translation3)
        TransformAxis rotation1: coordinates=knee_angle_l axis=(0 0 1) LinearFunction(coefficients=1 0)
        TransformAxis rotation3: coordinates=knee_adduction_l axis=(1 0 0) LinearFunction(coefficients=-1 0)
        TransformAxis translation1: coordinates=knee_angle_l axis=(1 0 0)
          SimmSpline: x=(-2.53073 -2.42165 -2.31256 -2.20348 -2.0944 -1.74533 -1.39626 -1.0472 -0.698132 -0.349066 -0.174533 0.197344 0.337395 0.490178 1.52146 2.0944)
              y=(-0.00943736 -0.00787802 -0.00631868 -0.00475934 -0.0032 0.00179 0.00411 0.0041 0.00212 -0.001 -0.0031 -0.005227 -0.005435 -0.005574 -0.005435 -0.00525)
        TransformAxis translation2: coordinates=knee_angle_l axis=(0 1 0)
          SimmSpline: x=(-2.53073 -2.42165 -2.31256 -2.20348 -2.0944 -1.22173 -0.523599 -0.349066 -0.174533 0.159149 2.0944)
              y=(-0.0257999 -0.0239999 -0.0221999 -0.0204 -0.0186 -0.0042 0.005 0.0064 0.0074 0.0087 0.008)
    CustomJoint med_cond_joint_l: socket_parent_frame=sagittal_articulation_frame_l_offset
        socket_child_frame=med_cond_l_offset
      Coordinate med_cond_adduction_l: default_value=0 range=(-2.094395 2.094395) clamped=true locked=true
          is_free_to_satisfy_constraints=true
      PhysicalOffsetFrame sagittal_articulation_frame_l_offset: socket_parent=/bodyset/sagittal_articulation_frame_l
          translation=(0 -0.035 0.02)
      PhysicalOffsetFrame med_cond_l_offset: socket_parent=/bodyset/med_cond_l translation=(0 0 0)
      SpatialTransform: axes_held_at_zero=(rotation2 rotation3 translation1 translation2 translation3)
        TransformAxis rotation1: coordinates=med_cond_adduction_l axis=(1 0 0) LinearFunction(coefficients=1 0)
    CustomJoint lat_cond_joint_l: socket_parent_frame=sagittal_articulation_frame_l_offset
        socket_child_frame=lat_cond_l_offset
      Coordinate lat_cond_adduction_l: default_value=0 range=(-2.094395 2.094395) clamped=true locked=true
          is_free_to_satisfy_constraints=true
      PhysicalOffsetFrame sagittal_articulation_frame_l_offset: socket_parent=/bodyset/sagittal_articulation_frame_l
          translation=(0 -0.035 -0.02)
      PhysicalOffsetFrame lat_cond_l_offset: socket_parent=/bodyset/lat_cond_l translation=(0 0 0)
      SpatialTransform: axes_held_at_zero=(rotation2 rotation3 translation1 translation2 translation3)
        TransformAxis rotation1: coordinates=lat_cond_adduction_l axis=(1 0 0) LinearFunction(coefficients=1 0)
    WeldJoint med_cond_weld_l: socket_parent_frame=med_cond_l_offset socket_child_frame=tibial_plat_l_offset
      PhysicalOffsetFrame med_cond_l_offset: socket_parent=/bodyset/med_cond_l translation=(0 0.035 -0.02)
      PhysicalOffsetFrame tibial_plat_l_offset: socket_parent=/bodyset/tibial_plat_l translation=(0 0 0)
    WeldJoint tibial_plat_weld_l: socket_parent_frame=tibial_plat_l_offset socket_child_frame=tibia_l_offset
      PhysicalOffsetFrame tibial_plat_l_offset: socket_parent=/bodyset/tibial_plat_l translation=(0 0 0)
      PhysicalOffsetFrame tibia_l_offset: socket_parent=/bodyset/tibia_l translation=(0 0 0)
    CustomJoint fem_pat_l: socket_parent_frame=femoral_cond_l_offset socket_child_frame=patella_l_offset
      Coordinate patella_l_constrained_knee_angle: default_value=0 range=(-999999.9 999999.9) clamped=true
      PhysicalOffsetFrame femoral_cond_l_offset: socket_parent=/bodyset/femoral_cond_l translation=(0 0 -0.0024)
      PhysicalOffsetFrame patella_l_offset: socket_parent=/bodyset/patella_l translation=(0 0 0)
      SpatialTransform: axes_held_at_zero=(rotation2 rotation3 translation3)
        TransformAxis rotation1: coordinates=patella_l_constrained_knee_angle axis=(0 0 1)
          SimmSpline: x=(-2.53073 -2.50018 -2.46964 -2.4391 -2.40855 -2.23635 -2.06414 -1.89194 -1.71973 -1.54753 -1.37532 -1.20311 -1.03091 -0.858702 -0.686496 -0.51429 -0.342085 -0.169879 0.00232711 0.174533)
              y=(-2.09416 -2.06561 -2.03707 -2.00852 -1.97997 -1.81903 -1.65808 -1.49713 -1.33619 -1.17524 -1.01741 -0.86299 -0.70857 -0.55415 -0.39973 -0.2503 -0.166891 -0.0834819 -0.00197785 -0.1054)
        TransformAxis translation1: coordinates=patella_l_constrained_knee_angle axis=(1 0 0)
          SimmSpline: x=(-2.53073 -2.50018 -2.46964 -2.4391 -2.40855 -2.23635 -2.06414 -1.89194 -1.71973 -1.54753 -1.37532 -1.20311 -1.03091 -0.858702 -0.686496 -0.51429 -0.342085 -0.169879 0.00232711 0.174533)
              y=(-0.0317482 -0.031516 -0.0312839 -0.0310517 -0.0308195 -0.0295104 -0.0273125 -0.0241852 -0.0201302 -0.0151912 -0.00945375 -0.0030458 0.00386277 0.01106 0.0182918 0.025262 0.0316324 0.0370227 0.0410105 0.0431313)
        TransformAxis translation2: coordinates=patella_l_constrained_knee_angle axis=(0 1 0)
          SimmSpline: x=(-2.53073 -2.50018 -2.46964 -2.4391 -2.40855 -2.23635 -2.06414 -1.89194 -1.71973 -1.54753 -1.37532 -1.20311 -1.03091 -0.858702 -0.686496 -0.51429 -0.342085 -0.169879 0.00232711 0.174533)
              y=(-0.023865 -0.0243154 -0.0247658 -0.0252162 -0.0256666 -0.028206 -0.0315216 -0.0351188 -0.0385657 -0.0414925 -0.0435919 -0.044619 -0.0443914 -0.0427889 -0.0397539 -0.0352911 -0.0294675 -0.0224126 -0.0143184 -0.00543909)
    PinJoint ankle_r: socket_parent_frame=tibia_r_offset socket_child_frame=talus_r_offset
      Coordinate ankle_angle_r: default_value=0 range=(-0.8726646 0.8726646) clamped=true
      PhysicalOffsetFrame tibia_r_offset: socket_parent=/bodyset/tibia_r translation=(-0.01 -0.4 0)
          orientation=(0.175895 -0.105208 0.0186622) [radians]
      PhysicalOffsetFrame talus_r_offset: socket_parent=/bodyset/talus_r translation=(0 0 0)
          orientation=(0.175895 -0.105208 0.0186622)
    PinJoint ankle_l: socket_parent_frame=tibia_l_offset socket_child_frame=talus_l_offset
      Coordinate ankle_angle_l: default_value=0 range=(-0.8726646 0.8726646) clamped=true
      PhysicalOffsetFrame tibia_l_offset: socket_parent=/bodyset/tibia_l translation=(-0.01 -0.4 0)
          orientation=(-0.175895 0.105208 0.0186622)
      PhysicalOffsetFrame talus_l_offset: socket_parent=/bodyset/talus_l translation=(0 0 0)
          orientation=(-0.175895 0.105208 0.0186622)
    PinJoint subtalar_r: socket_parent_frame=talus_r_offset socket_child_frame=calcn_r_offset
      Coordinate subtalar_angle_r: default_value=0 range=(-0.3490659 0.5182387) clamped=true
      PhysicalOffsetFrame talus_r_offset: socket_parent=/bodyset/talus_r translation=(-0.04877 -0.04195 0.00792)
          orientation=(-1.76819 0.906223 1.8196)
      PhysicalOffsetFrame calcn_r_offset: socket_parent=/bodyset/calcn_r translation=(0 0 0)
          orientation=(-1.76819 0.906223 1.8196)
    PinJoint subtalar_l: socket_parent_frame=talus_l_offset socket_child_frame=calcn_l_offset
      Coordinate subtalar_angle_l: default_value=0 range=(-0.3490659 0.5182387) clamped=true
      PhysicalOffsetFrame talus_l_offset: socket_parent=/bodyset/talus_l translation=(-0.04877 -0.04195 -0.00792)
          orientation=(1.76819 -0.906223 1.8196)
      PhysicalOffsetFrame calcn_l_offset: socket_parent=/bodyset/calcn_l translation=(0 0 0)
          orientation=(1.76819 -0.906223 1.8196)
    PinJoint mtp_r: socket_parent_frame=calcn_r_offset socket_child_frame=toes_r_offset
      Coordinate mtp_angle_r: default_value=0 range=(-0.5235988 0.5235988) clamped=true locked=true
      PhysicalOffsetFrame calcn_r_offset: socket_parent=/bodyset/calcn_r translation=(0.1788 -0.002 0.00108)
          orientation=(-3.14159 0.619901 0)
      PhysicalOffsetFrame toes_r_offset: socket_parent=/bodyset/toes_r translation=(0 0 0)
          orientation=(-3.14159 0.619901 0)
    PinJoint mtp_l: socket_parent_frame=calcn_l_offset socket_child_frame=toes_l_offset
      Coordinate mtp_angle_l: default_value=0 range=(-0.5235988 0.5235988) clamped=true locked=true
      PhysicalOffsetFrame calcn_l_offset: socket_parent=/bodyset/calcn_l translation=(0.1788 -0.002 -0.00108)
          orientation=(-3.14159 -0.619901 0)
      PhysicalOffsetFrame toes_l_offset: socket_parent=/bodyset/toes_l translation=(0 0 0)
          orientation=(-3.14159 -0.619901 0)
  ConstraintSet:
    WeldConstraint Lat_Cond_r_Constraint: socket_frame1=lat_cond_r_offset socket_frame2=/bodyset/tibial_plat_r
      PhysicalOffsetFrame lat_cond_r_offset: socket_parent=/bodyset/lat_cond_r translation=(0 0.035 -0.02)
    WeldConstraint Lat_Cond_l_Constraint: socket_frame1=lat_cond_l_offset socket_frame2=/bodyset/tibial_plat_l
      PhysicalOffsetFrame lat_cond_l_offset: socket_parent=/bodyset/lat_cond_l translation=(0 0.035 0.02)
    CoordinateCouplerConstraint: independent_coordinate_names=knee_angle_r
        dependent_coordinate_name=patella_r_constrained_knee_angle scale_factor=1
      coupled_coordinates_function: SimmSpline: x=(-2.0944 -1.45752 -0.526391 0 0.0523599 0.174533)
          y=(-2.0944 -1.45752 -0.526391 0 0.0523599 0.174533)
    CoordinateCouplerConstraint coordinatecouplerconstraint_0: independent_coordinate_names=knee_angle_l
        dependent_coordinate_name=patella_l_constrained_knee_angle scale_factor=1
      coupled_coordinates_function: SimmSpline: x=(-2.0944 -1.99997 -1.45752 -0.526391 0.0279253 0.174533)
          y=(-2.0944 -1.99997 -1.45752 -0.526391 0.0279253 0.174533)
    CoordinateCouplerConstraint LB_wrapjnt_r3_con: independent_coordinate_names=flex_extension
        dependent_coordinate_name=LB_wrapjnt_r3 scale_factor=1
        coupled_coordinates_function=PiecewiseLinearFunction(x=0 1, y=0 0.6)
    CoordinateCouplerConstraint LB_wrapjnt_t1_con: independent_coordinate_names=flex_extension
        dependent_coordinate_name=LB_wrapjnt_t1 scale_factor=1
      coupled_coordinates_function: PiecewiseLinearFunction: x=(0 0.453786) y=(0 0.015)
    CoordinateCouplerConstraint LB_wrapjnt_t2_con: independent_coordinate_names=flex_extension
        dependent_coordinate_name=LB_wrapjnt_t2 scale_factor=1
      coupled_coordinates_function: PiecewiseLinearFunction: x=(0 0.453786) y=(0 0.005)
    CoordinateCouplerConstraint Abs_r3_con: independent_coordinate_names=flex_extension
        dependent_coordinate_name=Abs_r3 scale_factor=1
      coupled_coordinates_function: PiecewiseLinearFunction: x=(-1.22173 0) y=(-0.785398 0)
    CoordinateCouplerConstraint L4_L5_IVDjnt_r3_con: independent_coordinate_names=flex_extension
        dependent_coordinate_name=L4_L5_IVDjnt_r3 scale_factor=1
        coupled_coordinates_function=LinearFunction(coefficients=0.144 0)
    CoordinateCouplerConstraint L4_L5_IVD_rotjnt_r2_con: independent_coordinate_names=axial_rotation
        dependent_coordinate_name=L4_L5_IVD_rotjnt_r2 scale_factor=1
      coupled_coordinates_function: PiecewiseLinearFunction f452: x=(-0.785398 0 0.785398) y=(-0.0331613 0 0.0331613)
    CoordinateCouplerConstraint L4_L5_IVD_bendjnt_r1_con: independent_coordinate_names=lat_bending
        dependent_coordinate_name=L4_L5_IVD_bendjnt_r1 scale_factor=1
      coupled_coordinates_function: PiecewiseLinearFunction f61: x=(-1.01875 1.01875) y=(-0.184481 0.184481)
    CoordinateCouplerConstraint L3_L4_IVDjnt_r3_con: independent_coordinate_names=flex_extension
        dependent_coordinate_name=L3_L4_IVDjnt_r3 scale_factor=1
        coupled_coordinates_function=LinearFunction(coefficients=0.204745 0)
    CoordinateCouplerConstraint L3_L4_IVD_rotjnt_r2_con: independent_coordinate_names=axial_rotation
        dependent_coordinate_name=L3_L4_IVD_rotjnt_r2 scale_factor=1
      coupled_coordinates_function: PiecewiseLinearFunction f232: x=(-0.785398 0 0.785398) y=(-0.0331613 0 0.0331613)
    CoordinateCouplerConstraint L3_L4_IVD_bendjnt_r1_con: independent_coordinate_names=lat_bending
        dependent_coordinate_name=L3_L4_IVD_bendjnt_r1 scale_factor=1
      coupled_coordinates_function: PiecewiseLinearFunction f51: x=(-1.01875 1.01875) y=(-0.249931 0.249931)
    CoordinateCouplerConstraint L2_L3_IVDjnt_r3_con: independent_coordinate_names=flex_extension
        dependent_coordinate_name=L2_L3_IVDjnt_r3 scale_factor=1
        coupled_coordinates_function=LinearFunction(coefficients=0.246618 0)
    CoordinateCouplerConstraint L2_L3_IVD_rotjnt_r2_con: independent_coordinate_names=axial_rotation
        dependent_coordinate_name=L2_L3_IVD_rotjnt_r2 scale_factor=1
      coupled_coordinates_function: PiecewiseLinearFunction f232: x=(-0.785398 0 0.785398) y=(-0.0261799 0 0.0261799)
    CoordinateCouplerConstraint L2_L3_IVD_bendjnt_r1_con: independent_coordinate_names=lat_bending
        dependent_coordinate_name=L2_L3_IVD_bendjnt_r1 scale_factor=1
      coupled_coordinates_function: PiecewiseLinearFunction f41: x=(-1.01875 1.01875) y=(-0.254818 0.254818)
    CoordinateCouplerConstraint L1_L2_IVDjnt_r3_con: independent_coordinate_names=flex_extension
        dependent_coordinate_name=L1_L2_IVDjnt_r3 scale_factor=1
        coupled_coordinates_function=LinearFunction(coefficients=0.294182 0)
    CoordinateCouplerConstraint L1_L2_IVD_rotjnt_r2_con: independent_coordinate_names=axial_rotation
        dependent_coordinate_name=L1_L2_IVD_rotjnt_r2 scale_factor=1
      coupled_coordinates_function: PiecewiseLinearFunction f32: x=(-0.785398 0 0.785398) y=(-0.0226893 0 0.0226893)
    CoordinateCouplerConstraint L1_L2_IVD_bendjnt_r1_con: independent_coordinate_names=lat_bending
        dependent_coordinate_name=L1_L2_IVD_bendjnt_r1 scale_factor=1
      coupled_coordinates_function: PiecewiseLinearFunction f31: x=(-1.01875 1.01875) y=(-0.191463 0.191463)
    CoordinateCouplerConstraint Torso_rot_con: independent_coordinate_names=axial_rotation
        dependent_coordinate_name=Torso_Rot scale_factor=1
      coupled_coordinates_function: PiecewiseLinearFunction f40: x=(-0.11 0 0.11) y=(-0.0226209 0 0.0226209)
  ForceSet:
    Thelen2003Muscle delt_scap_1: max_isometric_force=289 optimal_fiber_length=0.1128 tendon_slack_length=0.08
        pennation_angle_at_optimal=0.08726646 [radians]
      PathPoint P1: scapula_r (-0.0774343 -0.01207359 -0.05538443)
      PathPoint P2: scapula_r (-0.0671888 -0.0558577 -0.0279543)
      PathPoint P3: humerus_r (0.0005713052 -0.1048075 0.0115706)
      PathWrap: wrap_object=deltoid
    Thelen2003Muscle delt_scap_2: max_isometric_force=211 optimal_fiber_length=0.0949 tendon_slack_length=0.076
        pennation_angle_at_optimal=0.08726646
      PathPoint P1: scapula_r (-0.06340201 -0.004682045 -0.03074478)
      PathPoint P2: scapula_r (-0.0541878 -0.0466692 -0.0155712)
      PathPoint P3: humerus_r (0.00417972 -0.09645 0.011915)
      PathWrap: wrap_object=deltoid
    Thelen2003Muscle delt_scap_3: max_isometric_force=446 optimal_fiber_length=0.0833 tendon_slack_length=0.062
        pennation_angle_at_optimal=0.08726646
      PathPoint P1: scapula_r (-0.04970237 -0.002457137 -0.005610517)
      PathPoint P2: humerus_r (-0.0199587 -0.0043804 -0.00344616)
      PathPoint P3: humerus_r (0.00417972 -0.09645 0.011915)
      PathWrap: wrap_object=deltoid
    Thelen2003Muscle delt_scap_4: max_isometric_force=117 optimal_fiber_length=0.0666 tendon_slack_length=0.045
        pennation_angle_at_optimal=0.08726646
      PathPoint P1: scapula_r (-0.04234182 -0.008336195 0.002399382)
      PathPoint P2: humerus_r (-0.0176295 -0.0027225 0.00689424)
      PathPoint P3: humerus_r (0.00541972 -0.08467 0.012075)
      PathWrap: wrap_object=deltoid
    Thelen2003Muscle delt_scap_5: max_isometric_force=120 optimal_fiber_length=0.0656 tendon_slack_length=0.035
        pennation_angle_at_optimal=0.08726646
      PathPoint P1: scapula_r (-0.0295073 -0.005419535 0.01182243)
      PathPoint P2: humerus_r (0.00879972 -0.07377634 0.013145)
      PathWrap: wrap_object=deltoid
    Thelen2003Muscle delt_scap_6: max_isometric_force=285 optimal_fiber_length=0.0767 tendon_slack_length=0.067
        pennation_angle_at_optimal=0.08726646
      PathPoint P1: scapula_r (-0.04020042 -0.002551036 0.004828647)
      PathPoint P2: humerus_r (0.00284972 -0.10894 0.012825)
      PathWrap: wrap_object=deltoid
    Thelen2003Muscle delt_scap_7: max_isometric_force=149 optimal_fiber_length=0.0754 tendon_slack_length=0.082
        pennation_angle_at_optimal=0.08726646
      PathPoint P1: scapula_r (-0.0364156 -0.005113805 0.01070173)
      PathPoint P2: humerus_r (0.004299716 -0.1316 0.012155)
      PathWrap: wrap_object=deltoid
    Thelen2003Muscle delt_scap_8: max_isometric_force=215 optimal_fiber_length=0.071 tendon_slack_length=0.065
        pennation_angle_at_optimal=0.08726646
      PathPoint P1: scapula_r (-0.02753274 -0.002379408 0.01047473)
      PathPoint P2: humerus_r (0.00284972 -0.10894 0.012825)
      PathWrap: wrap_object=deltoid
    Thelen2003Muscle delt_scap_9: max_isometric_force=286 optimal_fiber_length=0.0732 tendon_slack_length=0.071
        pennation_angle_at_optimal=0.08726646
      PathPoint P1: scapula_r (-0.02183232 -0.004518785 0.0094797)
      PathPoint P2: humerus_r (0.01439972 -0.11738 0.014835)
      PathWrap: wrap_object=deltoid
    Thelen2003Muscle delt_scap10: max_isometric_force=445 optimal_fiber_length=0.0748 tendon_slack_length=0.064
        pennation_angle_at_optimal=0.08726646
      PathPoint P1: scapula_r (-0.0126511 -0.004586979 0.01059341)
      PathPoint P2: humerus_r (0.01730394 -0.1094604 0.014665)
      PathWrap: wrap_object=deltoid
    Thelen2003Muscle delt_scap11: max_isometric_force=239 optimal_fiber_length=0.0737 tendon_slack_length=0.048
        pennation_angle_at_optimal=0.08726646
      PathPoint P1: scapula_r (-0.0008942115 -0.00636429 0.00570052)
      PathPoint P2: humerus_r (0.02275301 -0.09719311 0.0143532)
      PathWrap: wrap_object=deltoid
    Thelen2003Muscle delt_clav_1: max_isometric_force=128 optimal_fiber_length=0.0836 tendon_slack_length=0.062
        pennation_angle_at_optimal=0.08726646
      PathPoint P1: clavicle_r (-0.02470019 0.01855479 0.119176)
      PathPoint P2: humerus_r (0.02275301 -0.09719311 0.0143532)
      PathWrap pathwrap-1: wrap_object=delt_ant
    Thelen2003Muscle delt_clav_2: max_isometric_force=160 optimal_fiber_length=0.094 tendon_slack_length=0.088
        pennation_angle_at_optimal=0.08726646
      PathPoint P1: clavicle_r (-0.02035392 0.01828981 0.09919288)
      PathPoint P2: humerus_r (0.02054069 -0.1183424 0.01277083)
      PathWrap pathwrap-1: wrap_object=delt_ant
    Thelen2003Muscle delt_clav_3: max_isometric_force=105 optimal_fiber_length=0.0824 tendon_slack_length=0.067
        pennation_angle_at_optimal=0.08726646
      PathPoint P1: clavicle_r (-0.01909004 0.01611285 0.1057081)
      PathPoint P2: humerus_r (0.02262611 -0.104215 0.01334821)
      PathWrap pathwrap-1: wrap_object=delt_ant
    Thelen2003Muscle delt_clav_4: max_isometric_force=112 optimal_fiber_length=0.0991 tendon_slack_length=0.073
        pennation_angle_at_optimal=0.08726646
      PathPoint P1: clavicle_r (-0.0175212 0.01205567 0.1026736)
      PathPoint P2: humerus_r (0.02054069 -0.1183424 0.01277083)
      PathWrap pathwrap-1: wrap_object=delt_ant
    Thelen2003Muscle tric_long_1: max_isometric_force=223 optimal_fiber_length=0.1008 tendon_slack_length=0.2041
        pennation_angle_at_optimal=0.1745329
      PathPoint P1: ulna_r (-0.02326509 0.003876004 -0.005915874)
      PathPoint P2: scapula_r (-0.05181497 -0.05790836 -0.0181085)
      PathWrap: wrap_object=elbow
    Thelen2003Muscle tric_long_2: max_isometric_force=296 optimal_fiber_length=0.0881 tendon_slack_length=0.2193
        pennation_angle_at_optimal=0.1745329
      PathPoint P1: ulna_r (-0.02297798 0.01377156 0.003528567)
      PathPoint P2: scapula_r (-0.0275186 -0.05534161 -0.02052511)
      PathWrap: wrap_object=elbow
    Thelen2003Muscle tric_long_3: max_isometric_force=283 optimal_fiber_length=0.1183 tendon_slack_length=0.218
        pennation_angle_at_optimal=0.1745329
      PathPoint P1: ulna_r (-0.02870441 0.009541448 0.004022867)
      PathPoint P2: scapula_r (-0.04235109 -0.05110921 -0.01278281)
      PathWrap: wrap_object=elbow
    Thelen2003Muscle tric_long_4: max_isometric_force=327 optimal_fiber_length=0.1226 tendon_slack_length=0.2197
        pennation_angle_at_optimal=0
      PathPoint P1: ulna_r (-0.02515781 0.008703394 0.008066565)
      PathPoint P2: scapula_r (-0.0275186 -0.05534161 -0.02052511)
      PathWrap: wrap_object=elbow
    Thelen2003Muscle tric_med_1: max_isometric_force=263 optimal_fiber_length=0.0807 tendon_slack_length=0.0875
        pennation_angle_at_optimal=0.296706
      PathPoint P1: humerus_r (0.004785276 -0.1190375 -0.0070372)
      PathPoint P2: ulna_r (-0.03434926 -0.003322025 0.001167951)
      PathWrap: wrap_object=elbow
    Thelen2003Muscle tric_med_2: max_isometric_force=256 optimal_fiber_length=0.0773 tendon_slack_length=0.1122
        pennation_angle_at_optimal=0
      PathPoint P1: humerus_r (0.003870147 -0.1456587 -0.009539806)
      PathPoint P2: ulna_r (-0.03434926 -0.003322025 0.001167951)
      PathWrap: wrap_object=elbow
    Thelen2003Muscle tric_med_3: max_isometric_force=240 optimal_fiber_length=0.0602 tendon_slack_length=0.0107
        pennation_angle_at_optimal=0
      PathPoint P1: humerus_r (-0.003480074 -0.2420573 0.006131038)
      PathPoint P2: ulna_r (-0.03434926 -0.003322025 0.001167951)
      PathWrap: wrap_object=elbow
    Thelen2003Muscle tric_med_4: max_isometric_force=211 optimal_fiber_length=0.0746 tendon_slack_length=0.0404
        pennation_angle_at_optimal=0.1396263
      PathPoint P1: humerus_r (-0.002093265 -0.19989 0.001185331)
      PathPoint P2: ulna_r (-0.03434926 -0.003322025 0.001167951)
      PathWrap: wrap_object=elbow
    Thelen2003Muscle tric_med_5: max_isometric_force=107 optimal_fiber_length=0.0807 tendon_slack_length=0.0738
        pennation_angle_at_optimal=0
      PathPoint P1: humerus_r (-0.002254821 -0.1526764 -0.0053962)
      PathPoint P2: ulna_r (-0.03434926 -0.003322025 0.001167951)
      PathWrap: wrap_object=elbow
    Thelen2003Muscle tric_lat_1: max_isometric_force=153 optimal_fiber_length=0.0758 tendon_slack_length=0.1707
        pennation_angle_at_optimal=0
      PathPoint P1: humerus_r (-0.002030329 -0.06504134 0.004068515)
      PathPoint P2: ulna_r (-0.02665086 0.01210694 -0.003528463)
      PathWrap: wrap_object=elbow
    Thelen2003Muscle tric_lat_2: max_isometric_force=410 optimal_fiber_length=0.0766 tendon_slack_length=0.177
        pennation_angle_at_optimal=0.08726646
      PathPoint P1: humerus_r (-0.002030329 -0.06504134 0.004068515)
      PathPoint P2: ulna_r (-0.0278508 0.0095769 -0.00263846)
      PathWrap: wrap_object=elbow
    Thelen2003Muscle tric_lat_3: max_isometric_force=219 optimal_fiber_length=0.0656 tendon_slack_length=0.1911
        pennation_angle_at_optimal=0.1745329
      PathPoint P1: humerus_r (-0.002030329 -0.06504134 0.004068515)
      PathPoint P2: ulna_r (-0.0259008 0.0041769 0.00654154)
      PathWrap: wrap_object=elbow
    Thelen2003Muscle tric_lat_4: max_isometric_force=275 optimal_fiber_length=0.0638 tendon_slack_length=0.157
        pennation_angle_at_optimal=0.1745329
      PathPoint P1: humerus_r (0.002583983 -0.1033531 0.006317285)
      PathPoint P2: ulna_r (-0.0259008 0.0041769 0.00654154)
      PathWrap: wrap_object=elbow
    Thelen2003Muscle tric_lat_5: max_isometric_force=87 optimal_fiber_length=0.0638 tendon_slack_length=0.157
        pennation_angle_at_optimal=0.296706
      PathPoint P1: humerus_r (0.002583983 -0.1033531 0.006317285)
      PathPoint P2: ulna_r (-0.02721 0.0082369 0.00420154)
      PathWrap: wrap_object=elbow
    Thelen2003Muscle bic_l: max_isometric_force=347 optimal_fiber_length=0.1292 tendon_slack_length=0.2335
        pennation_angle_at_optimal=0
      PathPoint P1: scapula_r (-0.02477583 -0.02122581 -0.01240182)
      PathPoint P2: humerus_r (0.02346387 -0.005960594 0.006517655)
      PathPoint P3: radius_r (0.003543668 -0.032 -0.007)
      PathWrap: wrap_object=inf_sup_sub
      PathWrap pathwrap_0: wrap_object=elbow_circ
    Thelen2003Muscle bic_s: max_isometric_force=173 optimal_fiber_length=0.117 tendon_slack_length=0.1913
        pennation_angle_at_optimal=0
      PathPoint P1: scapula_r (0.01034834 -0.03746206 -0.02389202)
      PathPoint P2: radius_r (0.003543668 -0.032 -0.007)
      PathWrap: wrap_object=elbow_circ
    Thelen2003Muscle coracobr_1: max_isometric_force=201 optimal_fiber_length=0.066 tendon_slack_length=0.092
        pennation_angle_at_optimal=0
      PathPoint P1: scapula_r (0.004504278 -0.03404124 -0.02333062)
      PathPoint P2: humerus_r (0.01533729 -0.1542258 -0.004486911)
    Thelen2003Muscle coracobr_2: max_isometric_force=148 optimal_fiber_length=0.0683 tendon_slack_length=0.104
        pennation_angle_at_optimal=0
      PathPoint P1: scapula_r (0.005151845 -0.04227049 -0.02810935)
      PathPoint P2: humerus_r (0.01008221 -0.1742095 -0.006517584)
    Thelen2003Muscle coracobr_3: max_isometric_force=114 optimal_fiber_length=0.0727 tendon_slack_length=0.113
        pennation_angle_at_optimal=0
      PathPoint P1: scapula_r (0.01027667 -0.03505521 -0.02331086)
      PathPoint P2: humerus_r (0.01729802 -0.1824746 -0.008253526)
    Thelen2003Muscle brachialis_1: max_isometric_force=314 optimal_fiber_length=0.0876 tendon_slack_length=0.0807
        pennation_angle_at_optimal=0
      PathPoint P1: humerus_r (0.004059593 -0.1526255 0.007926382)
      PathPoint P2: ulna_r (-0.01354664 -0.03901236 -0.003371178)
      PathWrap: wrap_object=elbow_circ
    Thelen2003Muscle brachialis_2: max_isometric_force=158 optimal_fiber_length=0.0953 tendon_slack_length=0.0592
        pennation_angle_at_optimal=0
      PathPoint P1: humerus_r (0.01453025 -0.1602496 -0.003956686)
      PathPoint P2: ulna_r (-0.01602513 -0.03857375 -0.007941834)
      PathWrap: wrap_object=elbow_circ
    Thelen2003Muscle brachialis_3: max_isometric_force=157 optimal_fiber_length=0.087 tendon_slack_length=0.0394
        pennation_angle_at_optimal=0
      PathPoint P1: humerus_r (0.007199371 -0.188698 -0.006986979)
      PathPoint P2: ulna_r (-0.01495359 -0.02753959 -0.01280781)
      PathWrap: wrap_object=elbow_circ
    Thelen2003Muscle brachialis_4: max_isometric_force=87 optimal_fiber_length=0.0758 tendon_slack_length=0.0317
        pennation_angle_at_optimal=0
      PathPoint P1: humerus_r (0.01095676 -0.1978332 -0.002245731)
      PathPoint P2: ulna_r (-0.01590519 -0.03812187 -0.004173573)
      PathWrap: wrap_object=elbow_circ
    Thelen2003Muscle brachialis_5: max_isometric_force=101 optimal_fiber_length=0.0619 tendon_slack_length=0.0209
        pennation_angle_at_optimal=0
      PathPoint P1: humerus_r (0.007011171 -0.2275226 -0.006735896)
      PathPoint P2: ulna_r (-0.01743762 -0.03531149 -0.01073541)
      PathWrap: wrap_object=elbow_circ
    Thelen2003Muscle brachialis_6: max_isometric_force=104 optimal_fiber_length=0.0472 tendon_slack_length=0.035
        pennation_angle_at_optimal=0
      PathPoint P1: humerus_r (0.01092751 -0.22967 -0.00179514)
      PathPoint P2: ulna_r (-0.01620994 -0.02988505 -0.01339537)
      PathWrap: wrap_object=elbow_circ
    Thelen2003Muscle brachialis_7: max_isometric_force=118 optimal_fiber_length=0.0621 tendon_slack_length=0.0076
        pennation_angle_at_optimal=0
      PathPoint P1: humerus_r (0.006553556 -0.2425357 -0.009758524)
      PathPoint P2: ulna_r (-0.01422706 -0.03782449 1.835298e-5)
      PathWrap: wrap_object=elbow_circ
    Thelen2003Muscle brachiorad_1: max_isometric_force=30 optimal_fiber_length=0.1613 tendon_slack_length=0.1197
        pennation_angle_at_optimal=0
      PathPoint P1: humerus_r (0.003034397 -0.2165512 0.004271378)
      PathPoint P2: radius_r (-0.001 -0.224 0.032)
    Thelen2003Muscle brachiorad_2: max_isometric_force=82 optimal_fiber_length=0.1613 tendon_slack_length=0.1197
        pennation_angle_at_optimal=0
      PathPoint P1: humerus_r (-0.0002561463 -0.2346339 0.0043249)
      PathPoint P2: radius_r (-0.001 -0.224 0.032)
    Thelen2003Muscle brachiorad_3: max_isometric_force=52 optimal_fiber_length=0.1066 tendon_slack_length=0.1542
        pennation_angle_at_optimal=0
      PathPoint P1: humerus_r (7.991054e-5 -0.2487113 0.006244565)
      PathPoint P2: radius_r (-0.001 -0.224 0.032)
    Thelen2003Muscle pron_teres_1: max_isometric_force=510 optimal_fiber_length=0.061 tendon_slack_length=0.0851
        pennation_angle_at_optimal=0
      PathPoint P1: humerus_r (0.01272057 -0.2840464 -0.02569797)
      PathPoint P2: radius_r (0.001366283 -0.09409756 0.02123285)
      PathWrap: wrap_object=ulna_radius method=hybrid
    Thelen2003Muscle pron_teres_2: max_isometric_force=141 optimal_fiber_length=0.0391 tendon_slack_length=0.0484
        pennation_angle_at_optimal=0
      PathPoint P1: ulna_r (0.002526098 -0.003524385 -0.006049464)
      PathPoint P2: radius_r (0.001099879 -0.07652805 0.01926891)
      PathWrap: wrap_object=ulna_radius
    Thelen2003Muscle pron_quad_1: max_isometric_force=73 optimal_fiber_length=0.0377 tendon_slack_length=0.005
        pennation_angle_at_optimal=0
      PathPoint P1: radius_r (-0.003382183 -0.1951796 0.02160053)
      PathPoint P2: ulna_r (-0.02025875 -0.2073272 0.01832444)
    Thelen2003Muscle pron_quad_2: max_isometric_force=178 optimal_fiber_length=0.0386 tendon_slack_length=0.005
        pennation_angle_at_optimal=0
      PathPoint P1: radius_r (-0.003101176 -0.205007 0.02228421)
      PathPoint P2: ulna_r (-0.02103664 -0.2157292 0.02025689)
    Thelen2003Muscle pron_quad_3: max_isometric_force=219 optimal_fiber_length=0.0352 tendon_slack_length=0.005
        pennation_angle_at_optimal=0
      PathPoint P1: radius_r (-0.002138275 -0.2164831 0.02355373)
      PathPoint P2: ulna_r (-0.02046207 -0.2278356 0.02194115)
    Thelen2003Muscle anconeus_1: max_isometric_force=31 optimal_fiber_length=0.0252 tendon_slack_length=0.0064
        pennation_angle_at_optimal=0
      PathPoint P1: humerus_r (0.002299873 -0.2820824 0.01442546)
      PathPoint P2: ulna_r (-0.02837028 -0.02784974 0.01564964)
    Thelen2003Muscle anconeus_2: max_isometric_force=70 optimal_fiber_length=0.0202 tendon_slack_length=0.008
        pennation_angle_at_optimal=0.2617994
      PathPoint P1: humerus_r (0.004633847 -0.2849363 0.01262661)
      PathPoint P2: ulna_r (-0.03024051 -0.03140905 0.01681829)
    Thelen2003Muscle anconeus_3: max_isometric_force=25 optimal_fiber_length=0.0228 tendon_slack_length=0.0043
        pennation_angle_at_optimal=0
      PathPoint P1: humerus_r (0.002959427 -0.278005 0.01436673)
      PathPoint P2: ulna_r (-0.02783948 -0.02054533 0.01529055)
    Thelen2003Muscle anconeus_4: max_isometric_force=118 optimal_fiber_length=0.027 tendon_slack_length=0.03
        pennation_angle_at_optimal=0.3141593
      PathPoint P1: humerus_r (0.004881705 -0.2854418 0.02212419)
      PathPoint P2: ulna_r (-0.03438127 -0.06049653 0.02149589)
    Thelen2003Muscle anconeus_5: max_isometric_force=118 optimal_fiber_length=0.0266 tendon_slack_length=0.02
        pennation_angle_at_optimal=0.4014257
      PathPoint P1: humerus_r (0.003606484 -0.2843441 0.02075254)
      PathPoint P2: ulna_r (-0.0328031 -0.04506481 0.0209072)
    Thelen2003Muscle supinator_1: max_isometric_force=47 optimal_fiber_length=0.0267 tendon_slack_length=0.0254
        pennation_angle_at_optimal=0
      PathPoint P1: humerus_r (0.01255614 -0.2857112 0.02214551)
      PathPoint P2: radius_r (0.003152408 -0.03723377 0.005032545)
      PathWrap: wrap_object=supinator2
    Thelen2003Muscle supinator_2: max_isometric_force=148 optimal_fiber_length=0.0263 tendon_slack_length=0.0145
        pennation_angle_at_optimal=0
      PathPoint P1: humerus_r (0.007840662 -0.2850337 0.02074224)
      PathPoint P2: radius_r (0.001737549 -0.0436478 0.005685002)
      PathWrap: wrap_object=supinator3
    Thelen2003Muscle supinator_3: max_isometric_force=285 optimal_fiber_length=0.0274 tendon_slack_length=0.0139
        pennation_angle_at_optimal=0.03490659
      PathPoint P1: ulna_r (-0.0154749 -0.02730991 0.01968268)
      PathPoint P2: radius_r (0.005558091 -0.0560739 0.006978911)
      PathWrap: wrap_object=supinator
    Thelen2003Muscle supinator_4: max_isometric_force=126 optimal_fiber_length=0.0252 tendon_slack_length=0.015
        pennation_angle_at_optimal=0
      PathPoint P1: ulna_r (-0.01739868 -0.03724108 0.01984808)
      PathPoint P2: radius_r (0.005386614 -0.07011362 0.01156085)
      PathWrap: wrap_object=supinator
    Thelen2003Muscle supinator_5: max_isometric_force=232 optimal_fiber_length=0.026 tendon_slack_length=0.0231
        pennation_angle_at_optimal=0
      PathPoint P1: ulna_r (-0.01830921 -0.04828064 0.01478807)
      PathPoint P2: radius_r (0.005226477 -0.08431051 0.01429829)
      PathWrap: wrap_object=supinator
    Thelen2003Muscle trap_scap_1: max_isometric_force=118 optimal_fiber_length=0.1446 tendon_slack_length=0.003
        pennation_angle_at_optimal=0
      PathPoint P1: torso (-0.0493575 0.482401 0)
      PathPoint P2: scapula_r (-0.0344578 0.005287137 -0.01335434)
    Thelen2003Muscle trap_scap_2: max_isometric_force=168 optimal_fiber_length=0.1127 tendon_slack_length=0.027
        pennation_angle_at_optimal=0
      PathPoint P1: torso (-0.0505575 0.479501 0.0001)
      PathPoint P2: scapula_r (-0.0527478 0.00763481 -0.0225152)
    Thelen2003Muscle trap_scap_3: max_isometric_force=199 optimal_fiber_length=0.107 tendon_slack_length=0.054
        pennation_angle_at_optimal=0
      PathPoint P1: torso (-0.0530575 0.471501 0.0038)
      PathPoint P2: scapula_r (-0.0611691 0.001317177 -0.0383883)
    Thelen2003Muscle trap_scap_4: max_isometric_force=138 optimal_fiber_length=0.0952 tendon_slack_length=0.053
        pennation_angle_at_optimal=0
      PathPoint P1: torso (-0.0566575 0.466201 0.0044)
      PathPoint P2: scapula_r (-0.07032184 -0.0003220867 -0.04618208)
    Thelen2003Muscle trap_scap_5: max_isometric_force=122 optimal_fiber_length=0.0924 tendon_slack_length=0.035
        pennation_angle_at_optimal=0
      PathPoint P1: torso (-0.0602575 0.455101 0.005)
      PathPoint P2: scapula_r (-0.06886427 -0.0001861173 -0.06047379)
    Thelen2003Muscle trap_scap_6: max_isometric_force=101 optimal_fiber_length=0.0893 tendon_slack_length=0.033
        pennation_angle_at_optimal=0
      PathPoint P1: torso (-0.0715575 0.428801 0.0038)
      PathPoint P2: scapula_r (-0.0741678 -0.0004769346 -0.05025131)
    Thelen2003Muscle trap_scap_7: max_isometric_force=97 optimal_fiber_length=0.0868 tendon_slack_length=0.036
        pennation_angle_at_optimal=0
      PathPoint P1: torso (-0.0821575 0.395101 0.0065)
      PathPoint P2: scapula_r (-0.06886427 -0.0001861173 -0.06047379)
    Thelen2003Muscle trap_scap_8: max_isometric_force=138 optimal_fiber_length=0.077 tendon_slack_length=0.048
        pennation_angle_at_optimal=0
      PathPoint P1: torso (-0.0863575 0.366101 0.0118)
      PathPoint P2: scapula_r (-0.07651808 -0.002977323 -0.05813862)
    Thelen2003Muscle trap_scap_9: max_isometric_force=123 optimal_fiber_length=0.1011 tendon_slack_length=0.034
        pennation_angle_at_optimal=0
      PathPoint P1: torso (-0.0874575 0.318101 0.0147)
      PathPoint P2: scapula_r (-0.08244096 -0.009001399 -0.07892014)
    Thelen2003Muscle trap_scap10: max_isometric_force=81 optimal_fiber_length=0.1264 tendon_slack_length=0.035
        pennation_angle_at_optimal=0
      PathPoint P1: torso (-0.0892575 0.281101 0.0183)
      PathPoint P2: scapula_r (-0.08054655 -0.01154427 -0.07281754)
    Thelen2003Muscle trap_scap11: max_isometric_force=92 optimal_fiber_length=0.1355 tendon_slack_length=0.031
        pennation_angle_at_optimal=0
      PathPoint P1: torso (-0.0829575 0.249601 0.0216)
      PathPoint P2: scapula_r (-0.07742263 -0.01004892 -0.0644429)
    Thelen2003Muscle ter_min_1: max_isometric_force=122 optimal_fiber_length=0.0501 tendon_slack_length=0.049
        pennation_angle_at_optimal=0
      PathPoint P1: scapula_r (-0.07148657 -0.07121419 -0.03644207)
      PathPoint P2: humerus_r (0.005861355 -0.01350542 0.01715412)
      PathWrap: wrap_object=ter_min_cyl
    Thelen2003Muscle ter_min_2: max_isometric_force=195 optimal_fiber_length=0.055 tendon_slack_length=0.051
        pennation_angle_at_optimal=0
      PathPoint P1: scapula_r (-0.06885908 -0.06881485 -0.04327879)
      PathPoint P2: humerus_r (0.00816135 -0.0077154 0.0163541)
      PathWrap: wrap_object=ter_min_cyl
    Thelen2003Muscle ter_min_3: max_isometric_force=180 optimal_fiber_length=0.0506 tendon_slack_length=0.018
        pennation_angle_at_optimal=0
      PathPoint P1: scapula_r (-0.05551588 -0.05356441 -0.02278678)
      PathPoint P2: humerus_r (0.005861355 -0.01350542 0.01715412)
      PathWrap: wrap_object=ter_min_cyl
    Thelen2003Muscle ter_maj_1: max_isometric_force=165 optimal_fiber_length=0.1411 tendon_slack_length=0.006
        pennation_angle_at_optimal=0
      PathPoint P1: scapula_r (-0.08580312 -0.1068842 -0.06003626)
      PathPoint P2: humerus_r (0.0117516 -0.046557 -0.01098683)
      PathWrap: wrap_object=ter_lat_pec
    Thelen2003Muscle ter_maj_2: max_isometric_force=85 optimal_fiber_length=0.1595 tendon_slack_length=0.012
        pennation_angle_at_optimal=0
      PathPoint P1: scapula_r (-0.0957341 -0.1107579 -0.07595941)
      PathPoint P2: humerus_r (0.0118016 -0.065227 -0.00783683)
      PathWrap: wrap_object=ter_lat_pec
    Thelen2003Muscle ter_maj_3: max_isometric_force=200 optimal_fiber_length=0.1526 tendon_slack_length=0.015
        pennation_angle_at_optimal=0
      PathPoint P1: scapula_r (-0.0928359 -0.08581728 -0.06236695)
      PathPoint P2: humerus_r (0.01123163 -0.059377 -0.008776828)
      PathWrap: wrap_object=ter_lat_pec
    Thelen2003Muscle ter_maj_4: max_isometric_force=158 optimal_fiber_length=0.1093 tendon_slack_length=0.034
        pennation_angle_at_optimal=0
      PathPoint P1: scapula_r (-0.08342344 -0.09338415 -0.05623828)
      PathPoint P2: humerus_r (0.0130116 -0.030767 -0.01149683)
      PathWrap: wrap_object=ter_lat_pec
    Thelen2003Muscle supra_1: max_isometric_force=120 optimal_fiber_length=0.0541 tendon_slack_length=0.017
        pennation_angle_at_optimal=0
      PathPoint P1: scapula_r (-0.06646623 -0.0159076 -0.06794214)
      PathPoint P2: humerus_r (0.02354609 0.006303723 0.01054921)
      PathWrap: wrap_object=inf_sup_sub
    Thelen2003Muscle supra_2: max_isometric_force=113 optimal_fiber_length=0.0591 tendon_slack_length=0.025
        pennation_angle_at_optimal=0
      PathPoint P1: scapula_r (-0.06816797 -0.004173387 -0.08551856)
      PathPoint P2: humerus_r (0.02354609 0.006303723 0.01054921)
      PathWrap: wrap_object=inf_sup_sub
    Thelen2003Muscle supra_3: max_isometric_force=258 optimal_fiber_length=0.0564 tendon_slack_length=0.052
        pennation_angle_at_optimal=0
      PathPoint P1: scapula_r (-0.06328913 0.004625468 -0.08425267)
      PathPoint P2: humerus_r (0.02822441 0.006016287 0.006847973)
      PathWrap: wrap_object=inf_sup_sub
    Thelen2003Muscle supra_4: max_isometric_force=130 optimal_fiber_length=0.0554 tendon_slack_length=0.031
        pennation_angle_at_optimal=0
      PathPoint P1: scapula_r (-0.05315338 0.007015655 -0.07596011)
      PathPoint P2: humerus_r (0.02822441 0.006016287 0.006847973)
      PathWrap: wrap_object=inf_sup_sub
    Thelen2003Muscle infra_1: max_isometric_force=272 optimal_fiber_length=0.0633 tendon_slack_length=0.038
        pennation_angle_at_optimal=0
      PathPoint P1: scapula_r (-0.06894966 -0.05148125 -0.03825686)
      ConditionalPathPoint P3: scapula_r (-0.0555091 -0.0438419 -0.0225988)
          socket_coordinate=/jointset/acromial_r/arm_flex_r range=(0 3.14) [radians]
      PathPoint P2: humerus_r (0.0008017005 0.0084394 0.01207457)
      PathWrap: wrap_object=infra_cyl
    Thelen2003Muscle infra_2: max_isometric_force=275 optimal_fiber_length=0.0719 tendon_slack_length=0.107
        pennation_angle_at_optimal=0
      PathPoint P1: scapula_r (-0.1053127 -0.08486695 -0.08351463)
      ConditionalPathPoint P3: scapula_r (-0.0859322 -0.0617372 -0.0415752)
          socket_coordinate=/jointset/acromial_r/arm_flex_r range=(0 3.14)
      PathPoint P2: humerus_r (0.005232242 0.0146194 0.0126034)
      PathWrap: wrap_object=infra_cyl
    Thelen2003Muscle infra_3: max_isometric_force=194 optimal_fiber_length=0.0677 tendon_slack_length=0.084
        pennation_angle_at_optimal=0
      PathPoint P1: scapula_r (-0.09853345 -0.06828163 -0.07653244)
      ConditionalPathPoint P3: scapula_r (-0.0760965 -0.0512103 -0.0402293)
          socket_coordinate=/jointset/acromial_r/arm_flex_r range=(0 3.14)
      PathPoint P2: humerus_r (0.005232242 0.0146194 0.0126034)
      PathWrap: wrap_object=infra_cyl
    Thelen2003Muscle infra_4: max_isometric_force=207 optimal_fiber_length=0.0693 tendon_slack_length=0.071
        pennation_angle_at_optimal=0
      PathPoint P1: scapula_r (-0.09157947 -0.04631476 -0.07885719)
      ConditionalPathPoint P3: scapula_r (-0.0527897 -0.0371965 -0.0232298)
          socket_coordinate=/jointset/acromial_r/arm_flex_r range=(0 3.14)
      PathPoint P2: humerus_r (0.004748996 0.009627295 0.01297316)
      PathWrap: wrap_object=infra_cyl
    Thelen2003Muscle infra_5: max_isometric_force=302 optimal_fiber_length=0.0698 tendon_slack_length=0.05
        pennation_angle_at_optimal=0
      PathPoint P1: scapula_r (-0.08019709 -0.02505513 -0.08065633)
      ConditionalPathPoint P3: scapula_r (-0.0527897 -0.0249076 -0.0232298)
          socket_coordinate=/jointset/acromial_r/arm_flex_r range=(0 3.14)
      PathPoint P2: humerus_r (0.002554945 0.01394239 0.01441814)
      PathWrap: wrap_object=infra_cyl
    Thelen2003Muscle infra_6: max_isometric_force=182 optimal_fiber_length=0.0753 tendon_slack_length=0.035
        pennation_angle_at_optimal=0
      PathPoint P1: scapula_r (-0.07158911 -0.01579782 -0.05905608)
      ConditionalPathPoint P3: scapula_r (-0.0510759 -0.0222316 -0.0208786)
          socket_coordinate=/jointset/acromial_r/arm_flex_r range=(0 3.14)
      PathPoint P2: humerus_r (0.003782242 0.0113594 0.0134234)
      PathWrap: wrap_object=infra_cyl
    Thelen2003Muscle trap_scap_1_l: max_isometric_force=118 optimal_fiber_length=0.1446 tendon_slack_length=0.003
        pennation_angle_at_optimal=0
      PathPoint trap_scap_1-P1_l: torso (-0.0493575 0.482401 0)
      PathPoint trap_scap_1-P2_l: scapula_l (-0.0344578 0.005287137 0.01335434)
    Thelen2003Muscle trap_scap_2_l: max_isometric_force=168 optimal_fiber_length=0.1127 tendon_slack_length=0.027
        pennation_angle_at_optimal=0
      PathPoint trap_scap_2-P1_l: torso (-0.0505575 0.479501 -0.0001)
      PathPoint trap_scap_2-P2_l: scapula_l (-0.0527478 0.00763481 0.0225152)
    Thelen2003Muscle trap_scap_3_l: max_isometric_force=199 optimal_fiber_length=0.107 tendon_slack_length=0.054
        pennation_angle_at_optimal=0
      PathPoint trap_scap_3-P1_l: torso (-0.0530575 0.471501 -0.0038)
      PathPoint trap_scap_3-P2_l: scapula_l (-0.0611691 0.001317177 0.0383883)
    Thelen2003Muscle trap_scap_4_l: max_isometric_force=138 optimal_fiber_length=0.0952 tendon_slack_length=0.053
        pennation_angle_at_optimal=0
      PathPoint trap_scap_4-P1_l: torso (-0.0566575 0.466201 -0.0044)
      PathPoint trap_scap_4-P2_l: scapula_l (-0.07032184 -0.0003220867 0.04618208)
    Thelen2003Muscle trap_scap_5_l: max_isometric_force=122 optimal_fiber_length=0.0924 tendon_slack_length=0.035
        pennation_angle_at_optimal=0
      PathPoint trap_scap_5-P1_l: torso (-0.0602575 0.455101 -0.005)
      PathPoint trap_scap_5-P2_l: scapula_l (-0.06886427 -0.0001861173 0.06047379)
    Thelen2003Muscle trap_scap_6_l: max_isometric_force=101 optimal_fiber_length=0.0893 tendon_slack_length=0.033
        pennation_angle_at_optimal=0
      PathPoint trap_scap_6-P1_l: torso (-0.0715575 0.428801 -0.0038)
      PathPoint trap_scap_6-P2_l: scapula_l (-0.0741678 -0.0004769346 0.05025131)
    Thelen2003Muscle trap_scap_7_l: max_isometric_force=97 optimal_fiber_length=0.0868 tendon_slack_length=0.036
        pennation_angle_at_optimal=0
      PathPoint trap_scap_7-P1_l: torso (-0.0821575 0.395101 -0.0065)
      PathPoint trap_scap_7-P2_l: scapula_l (-0.06886427 -0.0001861173 0.06047379)
    Thelen2003Muscle trap_scap_8_l: max_isometric_force=138 optimal_fiber_length=0.077 tendon_slack_length=0.048
        pennation_angle_at_optimal=0
      PathPoint trap_scap_8-P1_l: torso (-0.0863575 0.366101 -0.0118)
      PathPoint trap_scap_8-P2_l: scapula_l (-0.07651808 -0.002977323 0.05813862)
    Thelen2003Muscle trap_scap_9_l: max_isometric_force=123 optimal_fiber_length=0.1011 tendon_slack_length=0.034
        pennation_angle_at_optimal=0
      PathPoint trap_scap_9-P1_l: torso (-0.0874575 0.318101 -0.0147)
      PathPoint trap_scap_9-P2_l: scapula_l (-0.08244096 -0.009001399 0.07892014)
    Thelen2003Muscle trap_scap10_l: max_isometric_force=81 optimal_fiber_length=0.1264 tendon_slack_length=0.035
        pennation_angle_at_optimal=0
      PathPoint trap_scap10-P1_l: torso (-0.0892575 0.281101 -0.0183)
      PathPoint trap_scap10-P2_l: scapula_l (-0.08054655 -0.01154427 0.07281754)
    Thelen2003Muscle trap_scap11_l: max_isometric_force=92 optimal_fiber_length=0.1355 tendon_slack_length=0.031
        pennation_angle_at_optimal=0
      PathPoint trap_scap11-P1_l: torso (-0.0829575 0.249601 -0.0216)
      PathPoint trap_scap11-P2_l: scapula_l (-0.07742263 -0.01004892 0.0644429)
    Thelen2003Muscle ter_min_1_l: max_isometric_force=122 optimal_fiber_length=0.0501 tendon_slack_length=0.049
        pennation_angle_at_optimal=0
      PathPoint ter_min_1-P1_l: scapula_l (-0.07148657 -0.07121419 0.03644207)
      PathPoint ter_min_1-P2_l: humerus_l (0.005861355 -0.01350542 -0.01715412)
      PathWrap: wrap_object=ter_min_cyl_l
    Thelen2003Muscle ter_min_2_l: max_isometric_force=195 optimal_fiber_length=0.055 tendon_slack_length=0.051
        pennation_angle_at_optimal=0
      PathPoint ter_min_2-P1_l: scapula_l (-0.06885908 -0.06881485 0.04327879)
      PathPoint ter_min_2-P2_l: humerus_l (0.00816135 -0.0077154 -0.0163541)
      PathWrap: wrap_object=ter_min_cyl_l
    Thelen2003Muscle ter_min_3_l: max_isometric_force=180 optimal_fiber_length=0.0506 tendon_slack_length=0.018
        pennation_angle_at_optimal=0
      PathPoint ter_min_3-P1_l: scapula_l (-0.05551588 -0.05356441 0.02278678)
      PathPoint ter_min_3-P2_l: humerus_l (0.005861355 -0.01350542 -0.01715412)
      PathWrap: wrap_object=ter_min_cyl_l
    Thelen2003Muscle ter_maj_1_l: max_isometric_force=165 optimal_fiber_length=0.1411 tendon_slack_length=0.006
        pennation_angle_at_optimal=0
      PathPoint ter_maj_1-P1_l: scapula_l (-0.08580312 -0.1068842 0.06003626)
      PathPoint ter_maj_1-P2_l: humerus_l (0.0117516 -0.046557 0.01098683)
      PathWrap: wrap_object=ter_lat_pec_l
    Thelen2003Muscle ter_maj_2_l: max_isometric_force=85 optimal_fiber_length=0.1595 tendon_slack_length=0.012
        pennation_angle_at_optimal=0
      PathPoint ter_maj_2-P1_l: scapula_l (-0.0957341 -0.1107579 0.07595941)
      PathPoint ter_maj_2-P2_l: humerus_l (0.0118016 -0.065227 0.00783683)
      PathWrap: wrap_object=ter_lat_pec_l
    Thelen2003Muscle ter_maj_3_l: max_isometric_force=200 optimal_fiber_length=0.1526 tendon_slack_length=0.015
        pennation_angle_at_optimal=0
      PathPoint ter_maj_3-P1_l: scapula_l (-0.0928359 -0.08581728 0.06236695)
      PathPoint ter_maj_3-P2_l: humerus_l (0.01123163 -0.059377 0.008776828)
      PathWrap: wrap_object=ter_lat_pec_l
    Thelen2003Muscle ter_maj_4_l: max_isometric_force=158 optimal_fiber_length=0.1093 tendon_slack_length=0.034
        pennation_angle_at_optimal=0
      PathPoint ter_maj_4-P1_l: scapula_l (-0.08342344 -0.09338415 0.05623828)
      PathPoint ter_maj_4-P2_l: humerus_l (0.0130116 -0.030767 0.01149683)
      PathWrap: wrap_object=ter_lat_pec_l
    Thelen2003Muscle supra_1_l: max_isometric_force=120 optimal_fiber_length=0.0541 tendon_slack_length=0.017
        pennation_angle_at_optimal=0
      PathPoint supra_1-P1_l: scapula_l (-0.06646623 -0.0159076 0.06794214)
      PathPoint supra_1-P2_l: humerus_l (0.02354609 0.006303723 -0.01054921)
      PathWrap: wrap_object=inf_sup_sub_l
    Thelen2003Muscle supra_2_l: max_isometric_force=113 optimal_fiber_length=0.0591 tendon_slack_length=0.025
        pennation_angle_at_optimal=0
      PathPoint supra_2-P1_l: scapula_l (-0.06816797 -0.004173387 0.08551856)
      PathPoint supra_2-P2_l: humerus_l (0.02354609 0.006303723 -0.01054921)
      PathWrap: wrap_object=inf_sup_sub_l
    Thelen2003Muscle supra_3_l: max_isometric_force=258 optimal_fiber_length=0.0564 tendon_slack_length=0.052
        pennation_angle_at_optimal=0
      PathPoint supra_3-P1_l: scapula_l (-0.06328913 0.004625468 0.08425267)
      PathPoint supra_3-P2_l: humerus_l (0.02822441 0.006016287 -0.006847973)
      PathWrap: wrap_object=inf_sup_sub_l
    Thelen2003Muscle supra_4_l: max_isometric_force=130 optimal_fiber_length=0.0554 tendon_slack_length=0.031
        pennation_angle_at_optimal=0
      PathPoint supra_4-P1_l: scapula_l (-0.05315338 0.007015655 0.07596011)
      PathPoint supra_4-P2_l: humerus_l (0.02822441 0.006016287 -0.006847973)
      PathWrap: wrap_object=inf_sup_sub_l
    Thelen2003Muscle infra_1_l: max_isometric_force=272 optimal_fiber_length=0.0633 tendon_slack_length=0.038
        pennation_angle_at_optimal=0
      PathPoint infra_1-P1_l: scapula_l (-0.06894966 -0.05148125 0.03825686)
      ConditionalPathPoint infra_1-P3_l: scapula_l (-0.0555091 -0.0438419 0.0225988)
          socket_coordinate=/jointset/acromial_l/arm_flex_l range=(0 3.14)
      PathPoint infra_1-P2_l: humerus_l (0.0008017005 0.0084394 -0.01207457)
      PathWrap: wrap_object=infra_cyl_l
    Thelen2003Muscle infra_2_l: max_isometric_force=275 optimal_fiber_length=0.0719 tendon_slack_length=0.107
        pennation_angle_at_optimal=0
      PathPoint infra_2-P1_l: scapula_l (-0.1053127 -0.08486695 0.08351463)
      ConditionalPathPoint infra_2-P3_l: scapula_l (-0.0859322 -0.0617372 0.0415752)
          socket_coordinate=/jointset/acromial_l/arm_flex_l range=(0 3.14)
      PathPoint infra_2-P2_l: humerus_l (0.005232242 0.0146194 -0.0126034)
      PathWrap: wrap_object=infra_cyl_l
    Thelen2003Muscle infra_3_l: max_isometric_force=194 optimal_fiber_length=0.0677 tendon_slack_length=0.084
        pennation_angle_at_optimal=0
      PathPoint infra_3-P1_l: scapula_l (-0.09853345 -0.06828163 0.07653244)
      ConditionalPathPoint infra_3-P3_l: scapula_l (-0.0760965 -0.0512103 0.0402293)
          socket_coordinate=/jointset/acromial_l/arm_flex_l range=(0 3.14)
      PathPoint infra_3-P2_l: humerus_l (0.005232242 0.0146194 -0.0126034)
      PathWrap: wrap_object=infra_cyl_l
    Thelen2003Muscle infra_4_l: max_isometric_force=207 optimal_fiber_length=0.0693 tendon_slack_length=0.071
        pennation_angle_at_optimal=0
      PathPoint infra_4-P1_l: scapula_l (-0.09157947 -0.04631476 0.07885719)
      ConditionalPathPoint infra_4-P3_l: scapula_l (-0.0527897 -0.0371965 0.0232298)
          socket_coordinate=/jointset/acromial_l/arm_flex_l range=(0 3.14)
      PathPoint infra_4-P2_l: humerus_l (0.004748996 0.009627295 -0.01297316)
      PathWrap: wrap_object=infra_cyl_l
    Thelen2003Muscle infra_5_l: max_isometric_force=302 optimal_fiber_length=0.0698 tendon_slack_length=0.05
        pennation_angle_at_optimal=0
      PathPoint infra_5-P1_l: scapula_l (-0.08019709 -0.02505513 0.08065633)
      ConditionalPathPoint infra_5-P3_l: scapula_l (-0.0527897 -0.0249076 0.0232298)
          socket_coordinate=/jointset/acromial_l/arm_flex_l range=(0 3.14)
      PathPoint infra_5-P2_l: humerus_l (0.002554945 0.01394239 -0.01441814)
      PathWrap: wrap_object=infra_cyl_l
    Thelen2003Muscle infra_6_l: max_isometric_force=182 optimal_fiber_length=0.0753 tendon_slack_length=0.035
        pennation_angle_at_optimal=0
      PathPoint infra_6-P1_l: scapula_l (-0.07158911 -0.01579782 0.05905608)
      ConditionalPathPoint infra_6-P3_l: scapula_l (-0.0510759 -0.0222316 0.0208786)
          socket_coordinate=/jointset/acromial_l/arm_flex_l range=(0 3.14)
      PathPoint infra_6-P2_l: humerus_l (0.003782242 0.0113594 -0.0134234)
      PathWrap: wrap_object=infra_cyl_l
    Thelen2003Muscle delt_scap_1_l: max_isometric_force=289 optimal_fiber_length=0.1128 tendon_slack_length=0.08
        pennation_angle_at_optimal=0.08726646
      PathPoint delt_scap_1-P1_l: scapula_l (-0.0774343 -0.01207359 0.05538443)
      PathPoint delt_scap_1-P2_l: scapula_l (-0.0671888 -0.0558577 0.0279543)
      PathPoint delt_scap_1-P3_l: humerus_l (0.0005713052 -0.1048075 -0.0115706)
      PathWrap: wrap_object=deltoid_l
    Thelen2003Muscle delt_scap_2_l: max_isometric_force=211 optimal_fiber_length=0.0949 tendon_slack_length=0.076
        pennation_angle_at_optimal=0.08726646
      PathPoint delt_scap_2-P1_l: scapula_l (-0.06340201 -0.004682045 0.03074478)
      PathPoint delt_scap_2-P2_l: scapula_l (-0.0541878 -0.0466692 0.0155712)
      PathPoint delt_scap_2-P3_l: humerus_l (0.00417972 -0.09645 -0.011915)
      PathWrap: wrap_object=deltoid_l
    Thelen2003Muscle delt_scap_3_l: max_isometric_force=446 optimal_fiber_length=0.0833 tendon_slack_length=0.062
        pennation_angle_at_optimal=0.08726646
      PathPoint delt_scap_3-P1_l: scapula_l (-0.04970237 -0.002457137 0.005610517)
      PathPoint delt_scap_3-P2_l: humerus_l (-0.0199587 -0.0043804 0.00344616)
      PathPoint delt_scap_3-P3_l: humerus_l (0.00417972 -0.09645 -0.011915)
      PathWrap: wrap_object=deltoid_l
    Thelen2003Muscle delt_scap_4_l: max_isometric_force=117 optimal_fiber_length=0.0666 tendon_slack_length=0.045
        pennation_angle_at_optimal=0.08726646
      PathPoint delt_scap_4-P1_l: scapula_l (-0.04234182 -0.008336195 -0.002399382)
      PathPoint delt_scap_4-P2_l: humerus_l (-0.0176295 -0.0027225 -0.00689424)
      PathPoint delt_scap_4-P3_l: humerus_l (0.00541972 -0.08467 -0.012075)
      PathWrap: wrap_object=deltoid_l
    Thelen2003Muscle delt_scap_5_l: max_isometric_force=120 optimal_fiber_length=0.0656 tendon_slack_length=0.035
        pennation_angle_at_optimal=0.08726646
      PathPoint delt_scap_5-P1_l: scapula_l (-0.0295073 -0.005419535 -0.01182243)
      PathPoint delt_scap_5-P2_l: humerus_l (0.00879972 -0.07377634 -0.013145)
      PathWrap: wrap_object=deltoid_l
    Thelen2003Muscle delt_scap_6_l: max_isometric_force=285 optimal_fiber_length=0.0767 tendon_slack_length=0.067
        pennation_angle_at_optimal=0.08726646
      PathPoint delt_scap_6-P1_l: scapula_l (-0.04020042 -0.002551036 -0.004828647)
      PathPoint delt_scap_6-P2_l: humerus_l (0.00284972 -0.10894 -0.012825)
      PathWrap: wrap_object=deltoid_l
    Thelen2003Muscle delt_scap_7_l: max_isometric_force=149 optimal_fiber_length=0.0754 tendon_slack_length=0.082
        pennation_angle_at_optimal=0.08726646
      PathPoint delt_scap_7-P1_l: scapula_l (-0.0364156 -0.005113805 -0.01070173)
      PathPoint delt_scap_7-P2_l: humerus_l (0.004299716 -0.1316 -0.012155)
      PathWrap: wrap_object=deltoid_l
    Thelen2003Muscle delt_scap_8_l: max_isometric_force=215 optimal_fiber_length=0.071 tendon_slack_length=0.065
        pennation_angle_at_optimal=0.08726646
      PathPoint delt_scap_8-P1_l: scapula_l (-0.02753274 -0.002379408 -0.01047473)
      PathPoint delt_scap_8-P2_l: humerus_l (0.00284972 -0.10894 -0.012825)
      PathWrap: wrap_object=deltoid_l
    Thelen2003Muscle delt_scap_9_l: max_isometric_force=286 optimal_fiber_length=0.0732 tendon_slack_length=0.071
        pennation_angle_at_optimal=0.08726646
      PathPoint delt_scap_9-P1_l: scapula_l (-0.02183232 -0.004518785 -0.0094797)
      PathPoint delt_scap_9-P2_l: humerus_l (0.01439972 -0.11738 -0.014835)
      PathWrap: wrap_object=deltoid_l
    Thelen2003Muscle delt_scap10_l: max_isometric_force=445 optimal_fiber_length=0.0748 tendon_slack_length=0.064
        pennation_angle_at_optimal=0.08726646
      PathPoint delt_scap10-P1_l: scapula_l (-0.0126511 -0.004586979 -0.01059341)
      PathPoint delt_scap10-P2_l: humerus_l (0.01730394 -0.1094604 -0.014665)
      PathWrap: wrap_object=deltoid_l
    Thelen2003Muscle delt_scap11_l: max_isometric_force=239 optimal_fiber_length=0.0737 tendon_slack_length=0.048
        pennation_angle_at_optimal=0.08726646
      PathPoint delt_scap11-P1_l: scapula_l (-0.0008942115 -0.00636429 -0.00570052)
      PathPoint delt_scap11-P2_l: humerus_l (0.02275301 -0.09719311 -0.0143532)
      PathWrap: wrap_object=deltoid_l
    Thelen2003Muscle delt_clav_1_l: max_isometric_force=128 optimal_fiber_length=0.0836 tendon_slack_length=0.062
        pennation_angle_at_optimal=0.08726646
      PathPoint delt_clav_1-P1_l: clavicle_l (-0.02470019 0.01855479 -0.119176)
      PathPoint delt_clav_1-P2_l: humerus_l (0.02275301 -0.09719311 -0.0143532)
      PathWrap: wrap_object=delt_ant_l
    Thelen2003Muscle delt_clav_2_l: max_isometric_force=160 optimal_fiber_length=0.094 tendon_slack_length=0.088
        pennation_angle_at_optimal=0.08726646
      PathPoint delt_clav_2-P1_l: clavicle_l (-0.02035392 0.01828981 -0.09919288)
      PathPoint delt_clav_2-P2_l: humerus_l (0.02054069 -0.1183424 -0.01277083)
      PathWrap pathwrap-1: wrap_object=delt_ant_l
    Thelen2003Muscle delt_clav_3_l: max_isometric_force=105 optimal_fiber_length=0.0824 tendon_slack_length=0.067
        pennation_angle_at_optimal=0.08726646
      PathPoint delt_clav_3-P1_l: clavicle_l (-0.01909004 0.01611285 -0.1057081)
      PathPoint delt_clav_3-P2_l: humerus_l (0.02262611 -0.104215 -0.01334821)
      PathWrap pathwrap-1: wrap_object=delt_ant_l
    Thelen2003Muscle delt_clav_4_l: max_isometric_force=112 optimal_fiber_length=0.0991 tendon_slack_length=0.073
        pennation_angle_at_optimal=0.08726646
      PathPoint delt_clav_4-P1_l: clavicle_l (-0.0175212 0.01205567 -0.1026736)
      PathPoint delt_clav_4-P2_l: humerus_l (0.02054069 -0.1183424 -0.01277083)
      PathWrap pathwrap-1: wrap_object=delt_ant_l
    Thelen2003Muscle tric_long_1_l: max_isometric_force=223 optimal_fiber_length=0.1008 tendon_slack_length=0.2041
        pennation_angle_at_optimal=0.1745329
      PathPoint tric_long_1-P1_l: ulna_l (-0.02326509 0.003876004 0.005915874)
      PathPoint tric_long_1-P2_l: scapula_l (-0.05181497 -0.05790836 0.0181085)
      PathWrap: wrap_object=elbow_l
    Thelen2003Muscle tric_long_2_l: max_isometric_force=296 optimal_fiber_length=0.0881 tendon_slack_length=0.2193
        pennation_angle_at_optimal=0.1745329
      PathPoint tric_long_2-P1_l: ulna_l (-0.02297798 0.01377156 -0.003528567)
      PathPoint tric_long_2-P2_l: scapula_l (-0.0275186 -0.05534161 0.02052511)
      PathWrap: wrap_object=elbow_l
    Thelen2003Muscle tric_long_3_l: max_isometric_force=283 optimal_fiber_length=0.1183 tendon_slack_length=0.218
        pennation_angle_at_optimal=0.1745329
      PathPoint tric_long_3-P1_l: ulna_l (-0.02870441 0.009541448 -0.004022867)
      PathPoint tric_long_3-P2_l: scapula_l (-0.04235109 -0.05110921 0.01278281)
      PathWrap: wrap_object=elbow_l
    Thelen2003Muscle tric_long_4_l: max_isometric_force=327 optimal_fiber_length=0.1226 tendon_slack_length=0.2197
        pennation_angle_at_optimal=0
      PathPoint tric_long_4-P1_l: ulna_l (-0.02515781 0.008703394 -0.008066565)
      PathPoint tric_long_4-P2_l: scapula_l (-0.0275186 -0.05534161 0.02052511)
      PathWrap: wrap_object=elbow_l
    Thelen2003Muscle tric_med_1_l: max_isometric_force=263 optimal_fiber_length=0.0807 tendon_slack_length=0.0875
        pennation_angle_at_optimal=0.296706
      PathPoint tric_med_1-P1_l: humerus_l (0.004785276 -0.1190375 0.0070372)
      PathPoint tric_med_1-P2_l: ulna_l (-0.03434926 -0.003322025 -0.001167951)
      PathWrap: wrap_object=elbow_l
    Thelen2003Muscle tric_med_2_l: max_isometric_force=256 optimal_fiber_length=0.0773 tendon_slack_length=0.1122
        pennation_angle_at_optimal=0
      PathPoint tric_med_2-P1_l: humerus_l (0.003870147 -0.1456587 0.009539806)
      PathPoint tric_med_2-P2_l: ulna_l (-0.03434926 -0.003322025 -0.001167951)
      PathWrap: wrap_object=elbow_l
    Thelen2003Muscle tric_med_3_l: max_isometric_force=240 optimal_fiber_length=0.0602 tendon_slack_length=0.0107
        pennation_angle_at_optimal=0
      PathPoint tric_med_3-P1_l: humerus_l (-0.003480074 -0.2420573 -0.006131038)
      PathPoint tric_med_3-P2_l: ulna_l (-0.03434926 -0.003322025 -0.001167951)
      PathWrap: wrap_object=elbow_l
    Thelen2003Muscle tric_med_4_l: max_isometric_force=211 optimal_fiber_length=0.0746 tendon_slack_length=0.0404
        pennation_angle_at_optimal=0.1396263
      PathPoint tric_med_4-P1_l: humerus_l (-0.002093265 -0.19989 -0.001185331)
      PathPoint tric_med_4-P2_l: ulna_l (-0.03434926 -0.003322025 -0.001167951)
      PathWrap: wrap_object=elbow_l
    Thelen2003Muscle tric_med_5_l: max_isometric_force=107 optimal_fiber_length=0.0807 tendon_slack_length=0.0738
        pennation_angle_at_optimal=0
      PathPoint tric_med_5-P1_l: humerus_l (-0.002254821 -0.1526764 0.0053962)
      PathPoint tric_med_5-P2_l: ulna_l (-0.03434926 -0.003322025 -0.001167951)
      PathWrap: wrap_object=elbow_l
    Thelen2003Muscle tric_lat_1_l: max_isometric_force=153 optimal_fiber_length=0.0758 tendon_slack_length=0.1707
        pennation_angle_at_optimal=0
      PathPoint tric_lat_1-P1_l: humerus_l (-0.002030329 -0.06504134 -0.004068515)
      PathPoint tric_lat_1-P2_l: ulna_l (-0.02665086 0.01210694 0.003528463)
      PathWrap: wrap_object=elbow_l
    Thelen2003Muscle tric_lat_2_l: max_isometric_force=410 optimal_fiber_length=0.0766 tendon_slack_length=0.177
        pennation_angle_at_optimal=0.08726646
      PathPoint tric_lat_2-P1_l: humerus_l (-0.002030329 -0.06504134 -0.004068515)
      PathPoint tric_lat_2-P2_l: ulna_l (-0.0278508 0.0095769 0.00263846)
      PathWrap: wrap_object=elbow_l
    Thelen2003Muscle tric_lat_3_l: max_isometric_force=219 optimal_fiber_length=0.0656 tendon_slack_length=0.1911
        pennation_angle_at_optimal=0.1745329
      PathPoint tric_lat_3-P1_l: humerus_l (-0.002030329 -0.06504134 -0.004068515)
      PathPoint tric_lat_3-P2_l: ulna_l (-0.0259008 0.0041769 -0.00654154)
      PathWrap: wrap_object=elbow_l
    Thelen2003Muscle tric_lat_4_l: max_isometric_force=275 optimal_fiber_length=0.0638 tendon_slack_length=0.157
        pennation_angle_at_optimal=0.1745329
      PathPoint tric_lat_4-P1_l: humerus_l (0.002583983 -0.1033531 -0.006317285)
      PathPoint tric_lat_4-P2_l: ulna_l (-0.0259008 0.0041769 -0.00654154)
      PathWrap: wrap_object=elbow_l
    Thelen2003Muscle tric_lat_5_l: max_isometric_force=87 optimal_fiber_length=0.0638 tendon_slack_length=0.157
        pennation_angle_at_optimal=0.296706
      PathPoint tric_lat_5-P1_l: humerus_l (0.002583983 -0.1033531 -0.006317285)
      PathPoint tric_lat_5-P2_l: ulna_l (-0.02721 0.0082369 -0.00420154)
      PathWrap: wrap_object=elbow_l
    Thelen2003Muscle bic_l_l: max_isometric_force=347 optimal_fiber_length=0.1292 tendon_slack_length=0.2335
        pennation_angle_at_optimal=0
      PathPoint bic_l-P1_l: scapula_l (-0.02477583 -0.02122581 0.01240182)
      PathPoint bic_l-P2_l: humerus_l (0.02346387 -0.005960594 -0.006517655)
      PathPoint bic_l-P3_l: radius_l (0.003543668 -0.032 0.007)
      PathWrap: wrap_object=inf_sup_sub_l
      PathWrap pathwrap_0: wrap_object=elbow_circ_l
    Thelen2003Muscle bic_s_l: max_isometric_force=173 optimal_fiber_length=0.117 tendon_slack_length=0.1913
        pennation_angle_at_optimal=0
      PathPoint bic_s-P1_l: scapula_l (0.01034834 -0.03746206 0.02389202)
      PathPoint bic_s-P2_l: radius_l (0.003543668 -0.032 0.007)
      PathWrap: wrap_object=elbow_circ_l
    Thelen2003Muscle brachiorad_1_l: max_isometric_force=30 optimal_fiber_length=0.1613 tendon_slack_length=0.1197
        pennation_angle_at_optimal=0
      PathPoint brachiorad_1-P1_l: humerus_l (0.003034397 -0.2165512 -0.004271378)
      PathPoint brachiorad_1-P2_l: radius_l (-0.001 -0.224 -0.032)
    Thelen2003Muscle brachiorad_2_l: max_isometric_force=82 optimal_fiber_length=0.1613 tendon_slack_length=0.1197
        pennation_angle_at_optimal=0
      PathPoint brachiorad_2-P1_l: humerus_l (-0.0002561463 -0.2346339 -0.0043249)
      PathPoint brachiorad_2-P2_l: radius_l (-0.001 -0.224 -0.032)
    Thelen2003Muscle brachiorad_3_l: max_isometric_force=52 optimal_fiber_length=0.1066 tendon_slack_length=0.1542
        pennation_angle_at_optimal=0
      PathPoint brachiorad_3-P1_l: humerus_l (7.991054e-5 -0.2487113 -0.006244565)
      PathPoint brachiorad_3-P2_l: radius_l (-0.001 -0.224 -0.032)
    Thelen2003Muscle brachialis_1_l: max_isometric_force=314 optimal_fiber_length=0.0876 tendon_slack_length=0.0807
        pennation_angle_at_optimal=0
      PathPoint brachialis_1-P1_l: humerus_l (0.004059593 -0.1526255 -0.007926382)
      PathPoint brachialis_1-P2_l: ulna_l (-0.01354664 -0.03901236 0.003371178)
      PathWrap: wrap_object=elbow_circ_l
    Thelen2003Muscle brachialis_2_l: max_isometric_force=158 optimal_fiber_length=0.0953 tendon_slack_length=0.0592
        pennation_angle_at_optimal=0
      PathPoint brachialis_2-P1_l: humerus_l (0.01453025 -0.1602496 0.003956686)
      PathPoint brachialis_2-P2_l: ulna_l (-0.01602513 -0.03857375 0.007941834)
      PathWrap: wrap_object=elbow_circ_l
    Thelen2003Muscle brachialis_3_l: max_isometric_force=157 optimal_fiber_length=0.087 tendon_slack_length=0.0394
        pennation_angle_at_optimal=0
      PathPoint brachialis_3-P1_l: humerus_l (0.007199371 -0.188698 0.006986979)
      PathPoint brachialis_3-P2_l: ulna_l (-0.01495359 -0.02753959 0.01280781)
      PathWrap: wrap_object=elbow_circ_l
    Thelen2003Muscle brachialis_4_l: max_isometric_force=87 optimal_fiber_length=0.0758 tendon_slack_length=0.0317
        pennation_angle_at_optimal=0
      PathPoint brachialis_4-P1_l: humerus_l (0.01095676 -0.1978332 0.002245731)
      PathPoint brachialis_4-P2_l: ulna_l (-0.01590519 -0.03812187 0.004173573)
      PathWrap: wrap_object=elbow_circ_l
    Thelen2003Muscle brachialis_5_l: max_isometric_force=101 optimal_fiber_length=0.0619 tendon_slack_length=0.0209
        pennation_angle_at_optimal=0
      PathPoint brachialis_5-P1_l: humerus_l (0.007011171 -0.2275226 0.006735896)
      PathPoint brachialis_5-P2_l: ulna_l (-0.01743762 -0.03531149 0.01073541)
      PathWrap: wrap_object=elbow_circ_l
    Thelen2003Muscle brachialis_6_l: max_isometric_force=104 optimal_fiber_length=0.0472 tendon_slack_length=0.035
        pennation_angle_at_optimal=0
      PathPoint brachialis_6-P1_l: humerus_l (0.01092751 -0.22967 0.00179514)
      PathPoint brachialis_6-P2_l: ulna_l (-0.01620994 -0.02988505 0.01339537)
      PathWrap: wrap_object=elbow_circ_l
    Thelen2003Muscle brachialis_7_l: max_isometric_force=118 optimal_fiber_length=0.0621 tendon_slack_length=0.0076
        pennation_angle_at_optimal=0
      PathPoint brachialis_7-P1_l: humerus_l (0.006553556 -0.2425357 0.009758524)
      PathPoint brachialis_7-P2_l: ulna_l (-0.01422706 -0.03782449 -1.835298e-5)
      PathWrap: wrap_object=elbow_circ_l
    Thelen2003Muscle anconeus_1_l: max_isometric_force=31 optimal_fiber_length=0.0252 tendon_slack_length=0.0064
        pennation_angle_at_optimal=0
      PathPoint anconeus_1-P1_l: humerus_l (0.002299873 -0.2820824 -0.01442546)
      PathPoint anconeus_1-P2_l: ulna_l (-0.02837028 -0.02784974 -0.01564964)
    Thelen2003Muscle anconeus_2_l: max_isometric_force=70 optimal_fiber_length=0.0202 tendon_slack_length=0.008
        pennation_angle_at_optimal=0.2617994
      PathPoint anconeus_2-P1_l: humerus_l (0.004633847 -0.2849363 -0.01262661)
      PathPoint anconeus_2-P2_l: ulna_l (-0.03024051 -0.03140905 -0.01681829)
    Thelen2003Muscle anconeus_3_l: max_isometric_force=25 optimal_fiber_length=0.0228 tendon_slack_length=0.0043
        pennation_angle_at_optimal=0
      PathPoint anconeus_3-P1_l: humerus_l (0.002959427 -0.278005 -0.01436673)
      PathPoint anconeus_3-P2_l: ulna_l (-0.02783948 -0.02054533 -0.01529055)
    Thelen2003Muscle anconeus_4_l: max_isometric_force=118 optimal_fiber_length=0.027 tendon_slack_length=0.03
        pennation_angle_at_optimal=0.3141593
      PathPoint anconeus_4-P1_l: humerus_l (0.004881705 -0.2854418 -0.02212419)
      PathPoint anconeus_4-P2_l: ulna_l (-0.03438127 -0.06049653 -0.02149589)
    Thelen2003Muscle anconeus_5_l: max_isometric_force=118 optimal_fiber_length=0.0266 tendon_slack_length=0.02
        pennation_angle_at_optimal=0.4014257
      PathPoint anconeus_5-P1_l: humerus_l (0.003606484 -0.2843441 -0.02075254)
      PathPoint anconeus_5-P2_l: ulna_l (-0.0328031 -0.04506481 -0.0209072)
    Thelen2003Muscle pron_quad_1_l: max_isometric_force=73 optimal_fiber_length=0.0377 tendon_slack_length=0.005
        pennation_angle_at_optimal=0
      PathPoint pron_quad_1-P1_l: radius_l (-0.003382183 -0.1951796 -0.02160053)
      PathPoint pron_quad_1-P2_l: ulna_l (-0.02025875 -0.2073272 -0.01832444)
    Thelen2003Muscle pron_quad_2_l: max_isometric_force=178 optimal_fiber_length=0.0386 tendon_slack_length=0.005
        pennation_angle_at_optimal=0
      PathPoint pron_quad_2-P1_l: radius_l (-0.003101176 -0.205007 -0.02228421)
      PathPoint pron_quad_2-P2_l: ulna_l (-0.02103664 -0.2157292 -0.02025689)
    Thelen2003Muscle pron_quad_3_l: max_isometric_force=219 optimal_fiber_length=0.0352 tendon_slack_length=0.005
        pennation_angle_at_optimal=0
      PathPoint pron_quad_3-P1_l: radius_l (-0.002138275 -0.2164831 -0.02355373)
      PathPoint pron_quad_3-P2_l: ulna_l (-0.02046207 -0.2278356 -0.02194115)
    Thelen2003Muscle pron_teres_1_l: max_isometric_force=510 optimal_fiber_length=0.061 tendon_slack_length=0.0851
        pennation_angle_at_optimal=0
      PathPoint pron_teres_1-P1_l: humerus_l (0.01272057 -0.2840464 0.02569797)
      PathPoint pron_teres_1-P2_l: radius_l (0.001366283 -0.09409756 -0.02123285)
      PathWrap: wrap_object=ulna_radius_l method=hybrid
    Thelen2003Muscle pron_teres_2_l: max_isometric_force=141 optimal_fiber_length=0.0391 tendon_slack_length=0.0484
        pennation_angle_at_optimal=0
      PathPoint pron_teres_2-P1_l: ulna_l (0.002526098 -0.003524385 0.006049464)
      PathPoint pron_teres_2-P2_l: radius_l (0.001099879 -0.07652805 -0.01926891)
      PathWrap: wrap_object=ulna_radius_l
    Thelen2003Muscle supinator_1_l: max_isometric_force=47 optimal_fiber_length=0.0267 tendon_slack_length=0.0254
        pennation_angle_at_optimal=0
      PathPoint supinator_1-P1_l: humerus_l (0.01255614 -0.2857112 -0.02214551)
      PathPoint supinator_1-P2_l: radius_l (0.003152408 -0.03723377 -0.005032545)
      PathWrap: wrap_object=supinator2_l
    Thelen2003Muscle supinator_2_l: max_isometric_force=148 optimal_fiber_length=0.0263 tendon_slack_length=0.0145
        pennation_angle_at_optimal=0
      PathPoint supinator_2-P1_l: humerus_l (0.007840662 -0.2850337 -0.02074224)
      PathPoint supinator_2-P2_l: radius_l (0.001737549 -0.0436478 -0.005685002)
      PathWrap: wrap_object=supinator3_l
    Thelen2003Muscle supinator_3_l: max_isometric_force=285 optimal_fiber_length=0.0274 tendon_slack_length=0.0139
        pennation_angle_at_optimal=0.03490659
      PathPoint supinator_3-P1_l: ulna_l (-0.0154749 -0.02730991 -0.01968268)
      PathPoint supinator_3-P2_l: radius_l (0.005558091 -0.0560739 -0.006978911)
      PathWrap: wrap_object=supinator_l
    Thelen2003Muscle supinator_4_l: max_isometric_force=126 optimal_fiber_length=0.0252 tendon_slack_length=0.015
        pennation_angle_at_optimal=0
      PathPoint supinator_4-P1_l: ulna_l (-0.01739868 -0.03724108 -0.01984808)
      PathPoint supinator_4-P2_l: radius_l (0.005386614 -0.07011362 -0.01156085)
      PathWrap: wrap_object=supinator_l
    Thelen2003Muscle supinator_5_l: max_isometric_force=232 optimal_fiber_length=0.026 tendon_slack_length=0.0231
        pennation_angle_at_optimal=0
      PathPoint supinator_5-P1_l: ulna_l (-0.01830921 -0.04828064 -0.01478807)
      PathPoint supinator_5-P2_l: radius_l (0.005226477 -0.08431051 -0.01429829)
      PathWrap: wrap_object=supinator_l
    Thelen2003Muscle coracobr_1_l: max_isometric_force=201 optimal_fiber_length=0.066 tendon_slack_length=0.092
        pennation_angle_at_optimal=0
      PathPoint coracobr_1-P1_l: scapula_l (0.004504278 -0.03404124 0.02333062)
      PathPoint coracobr_1-P2_l: humerus_l (0.01533729 -0.1542258 0.004486911)
    Thelen2003Muscle coracobr_2_l: max_isometric_force=148 optimal_fiber_length=0.0683 tendon_slack_length=0.104
        pennation_angle_at_optimal=0
      PathPoint coracobr_2-P1_l: scapula_l (0.005151845 -0.04227049 0.02810935)
      PathPoint coracobr_2-P2_l: humerus_l (0.01120953 -0.1742095 0.008399297)
    Thelen2003Muscle coracobr_3_l: max_isometric_force=114 optimal_fiber_length=0.0727 tendon_slack_length=0.113
        pennation_angle_at_optimal=0
      PathPoint coracobr_3-P1_l: scapula_l (0.01027667 -0.03505521 0.02331086)
      PathPoint coracobr_3-P2_l: humerus_l (0.01692915 -0.1824746 0.002470639)
    Thelen2003Muscle rhomboid_1: max_isometric_force=51 optimal_fiber_length=0.0986 tendon_slack_length=0.015
        pennation_angle_at_optimal=0
      PathPoint P1: torso (-0.06757234 0.4338824 0.0005064459)
      PathPoint P2: scapula_r (-0.07219726 -0.01818371 -0.08655778)
    Thelen2003Muscle rhomboid_2: max_isometric_force=92 optimal_fiber_length=0.1077 tendon_slack_length=0.066
        pennation_angle_at_optimal=0
      PathPoint P1: torso (-0.071118 0.4219695 0.00106222)
      PathPoint P2: scapula_r (-0.09679448 -0.08505983 -0.09318897)
    Thelen2003Muscle rhomboid_3: max_isometric_force=142 optimal_fiber_length=0.1259 tendon_slack_length=0.032
        pennation_angle_at_optimal=0
      PathPoint P1: torso (-0.07744571 0.4058506 0.01082971)
      PathPoint P2: scapula_r (-0.09667613 -0.08884217 -0.09178321)
    Thelen2003Muscle rhomboid_4: max_isometric_force=82 optimal_fiber_length=0.1267 tendon_slack_length=0.031
        pennation_angle_at_optimal=0
      PathPoint P1: torso (-0.08491737 0.3718096 0.003540398)
      PathPoint P2: scapula_r (-0.09968096 -0.09817458 -0.08879123)
    Thelen2003Muscle rhomboid_5: max_isometric_force=67 optimal_fiber_length=0.117 tendon_slack_length=0.04
        pennation_angle_at_optimal=0
      PathPoint P1: torso (-0.08687998 0.3409321 0.00591012)
      PathPoint P2: scapula_r (-0.1035169 -0.10446 -0.09098113)
    Thelen2003Muscle rhomboid_1_l: max_isometric_force=51 optimal_fiber_length=0.0986 tendon_slack_length=0.015
        pennation_angle_at_optimal=0
      PathPoint rhomboid_1-P1_l: torso (-0.06757234 0.4338824 -0.0005064459)
      PathPoint rhomboid_1-P2_l: scapula_l (-0.07219726 -0.01818371 0.08655778)
    Thelen2003Muscle rhomboid_2_l: max_isometric_force=92 optimal_fiber_length=0.1077 tendon_slack_length=0.066
        pennation_angle_at_optimal=0
      PathPoint rhomboid_2-P1_l: torso (-0.071118 0.4219695 -0.00106222)
      PathPoint rhomboid_2-P2_l: scapula_l (-0.09679448 -0.08505983 0.09318897)
    Thelen2003Muscle rhomboid_3_l: max_isometric_force=142 optimal_fiber_length=0.1259 tendon_slack_length=0.032
        pennation_angle_at_optimal=0
      PathPoint rhomboid_3-P1_l: torso (-0.07744571 0.4058506 -0.01082971)
      PathPoint rhomboid_3-P2_l: scapula_l (-0.09667613 -0.08884217 0.09178321)
    Thelen2003Muscle rhomboid_4_l: max_isometric_force=82 optimal_fiber_length=0.1267 tendon_slack_length=0.031
        pennation_angle_at_optimal=0
      PathPoint rhomboid_4-P1_l: torso (-0.08491737 0.3718096 -0.003540398)
      PathPoint rhomboid_4-P2_l: scapula_l (-0.09968096 -0.09817458 0.08879123)
    Thelen2003Muscle rhomboid_5_l: max_isometric_force=67 optimal_fiber_length=0.117 tendon_slack_length=0.04
        pennation_angle_at_optimal=0
      PathPoint rhomboid_5-P1_l: torso (-0.08687998 0.3409321 -0.00591012)
      PathPoint rhomboid_5-P2_l: scapula_l (-0.1035169 -0.10446 0.09098113)
    Thelen2003Muscle lev_scap_1: max_isometric_force=96 optimal_fiber_length=0.1578 tendon_slack_length=0.019
        pennation_angle_at_optimal=0
      PathPoint P1: torso (-0.0461895 0.5135078 0.03848802)
      PathPoint P2: scapula_r (-0.07365744 -0.008011091 -0.09476233)
    Thelen2003Muscle lev_scap_2: max_isometric_force=104 optimal_fiber_length=0.1302 tendon_slack_length=0.018
        pennation_angle_at_optimal=0
      PathPoint P1: torso (-0.04057993 0.4975193 0.02233167)
      PathPoint P2: scapula_r (-0.0639002 0.0008051885 -0.09351374)
    Thelen2003Muscle lev_scap_1_l: max_isometric_force=96 optimal_fiber_length=0.1578 tendon_slack_length=0.019
        pennation_angle_at_optimal=0
      PathPoint lev_scap_1-P1_l: torso (-0.0461895 0.5135078 -0.03848802)
      PathPoint lev_scap_1-P2_l: scapula_l (-0.07365744 -0.008011091 0.09476233)
    Thelen2003Muscle lev_scap_2_l: max_isometric_force=104 optimal_fiber_length=0.1302 tendon_slack_length=0.018
        pennation_angle_at_optimal=0
      PathPoint lev_scap_2-P1_l: torso (-0.04057993 0.4975193 -0.02233167)
      PathPoint lev_scap_2-P2_l: scapula_l (-0.0639002 0.0008051885 0.09351374)
    Thelen2003Muscle subscap_1: max_isometric_force=44 optimal_fiber_length=0.0556 tendon_slack_length=0.028
        pennation_angle_at_optimal=0
      PathPoint P1: scapula_r (-0.04943001 -0.02751697 -0.05805706)
      PathPoint P2: scapula_r (-0.03372402 -0.03518267 -0.03546722)
      PathPoint P3: humerus_r (0.02685607 0.00469361 -0.005706182)
      PathWrap: wrap_object=inf_sup_sub
    Thelen2003Muscle subscap_2: max_isometric_force=78 optimal_fiber_length=0.0649 tendon_slack_length=0.044
        pennation_angle_at_optimal=0
      PathPoint P1: scapula_r (-0.06561207 -0.01572428 -0.07933292)
      PathPoint P2: scapula_r (-0.03292194 -0.03468823 -0.03559098)
      PathPoint P3: humerus_r (0.02655241 0.006574859 -0.005570164)
      PathWrap: wrap_object=inf_sup_sub
    Thelen2003Muscle subscap_3: max_isometric_force=264 optimal_fiber_length=0.0676 tendon_slack_length=0.059
        pennation_angle_at_optimal=0.08726646
      PathPoint P1: scapula_r (-0.07292384 -0.02856721 -0.0829169)
      PathPoint P2: scapula_r (-0.0325594 -0.03622053 -0.03490756)
      PathPoint P3: humerus_r (0.02673674 0.002172365 -0.005771371)
      PathWrap: wrap_object=inf_sup_sub
    Thelen2003Muscle subscap_4: max_isometric_force=274 optimal_fiber_length=0.0744 tendon_slack_length=0.055
        pennation_angle_at_optimal=0.08726646
      PathPoint P1: scapula_r (-0.08075807 -0.04932286 -0.0710369)
      PathPoint P2: humerus_r (0.0265234 0.0036727 -0.00637907)
      PathWrap: wrap_object=inf_sup_sub
    Thelen2003Muscle subscap_5: max_isometric_force=114 optimal_fiber_length=0.0797 tendon_slack_length=0.066
        pennation_angle_at_optimal=0
      PathPoint P1: scapula_r (-0.07843208 -0.06090256 -0.06585691)
      PathPoint P2: humerus_r (0.0262234 0.0058327 -0.00238907)
      PathWrap: wrap_object=inf_sup_sub
    Thelen2003Muscle subscap_6: max_isometric_force=149 optimal_fiber_length=0.0762 tendon_slack_length=0.077
        pennation_angle_at_optimal=0
      PathPoint P1: scapula_r (-0.09444428 -0.08234781 -0.07797304)
      PathPoint P2: humerus_r (0.0296734 -0.0004473 -0.00495907)
      PathWrap: wrap_object=inf_sup_sub
    Thelen2003Muscle subscap_7: max_isometric_force=162 optimal_fiber_length=0.082 tendon_slack_length=0.079
        pennation_angle_at_optimal=0
      PathPoint P1: scapula_r (-0.09048117 -0.09466 -0.0702401)
      PathPoint P2: humerus_r (0.0282834 -0.0018673 -0.00916907)
      PathWrap: wrap_object=inf_sup_sub
    Thelen2003Muscle subscap_8: max_isometric_force=61 optimal_fiber_length=0.0765 tendon_slack_length=0.04
        pennation_angle_at_optimal=0
      PathPoint P1: scapula_r (-0.06979958 -0.07328619 -0.05176325)
      PathPoint P2: humerus_r (0.0282834 -0.0018673 -0.00916907)
      PathWrap: wrap_object=inf_sup_sub
    Thelen2003Muscle subscap_9: max_isometric_force=222 optimal_fiber_length=0.0721 tendon_slack_length=0.059
        pennation_angle_at_optimal=0
      PathPoint P1: scapula_r (-0.08228093 -0.0921 -0.05523912)
      PathPoint P2: humerus_r (0.0249534 -0.0064773 -0.01329907)
      PathWrap: wrap_object=inf_sup_sub
    Thelen2003Muscle subscap10: max_isometric_force=47 optimal_fiber_length=0.0676 tendon_slack_length=0.01
        pennation_angle_at_optimal=0
      PathPoint P1: scapula_r (-0.0609776 -0.06465688 -0.03371834)
      PathPoint P2: humerus_r (0.0171834 -0.0197773 -0.01413907)
      PathWrap: wrap_object=inf_sup_sub
    Thelen2003Muscle subscap11: max_isometric_force=16 optimal_fiber_length=0.0643 tendon_slack_length=0.01
        pennation_angle_at_optimal=0
      PathPoint P1: scapula_r (-0.04581956 -0.05743328 -0.02413653)
      PathPoint P2: humerus_r (0.0118934 -0.0255973 -0.01646907)
      PathWrap: wrap_object=inf_sup_sub
    Thelen2003Muscle subscap_1_l: max_isometric_force=44 optimal_fiber_length=0.0556 tendon_slack_length=0.028
        pennation_angle_at_optimal=0
      PathPoint subscap_1-P1_l: scapula_l (-0.04943001 -0.02751697 0.05805706)
      PathPoint subscap_1-P2_l: scapula_l (-0.03372402 -0.03518267 0.03546722)
      PathPoint subscap_1-P3_l: humerus_l (0.02685607 0.00469361 0.005706182)
      PathWrap: wrap_object=inf_sup_sub_l
    Thelen2003Muscle subscap_2_l: max_isometric_force=78 optimal_fiber_length=0.0649 tendon_slack_length=0.044
        pennation_angle_at_optimal=0
      PathPoint subscap_2-P1_l: scapula_l (-0.06561207 -0.01572428 0.07933292)
      PathPoint subscap_2-P2_l: scapula_l (-0.03292194 -0.03468823 0.03559098)
      PathPoint subscap_2-P3_l: humerus_l (0.02655241 0.006574859 0.005570164)
      PathWrap: wrap_object=inf_sup_sub_l
    Thelen2003Muscle subscap_3_l: max_isometric_force=264 optimal_fiber_length=0.0676 tendon_slack_length=0.059
        pennation_angle_at_optimal=0.08726646
      PathPoint subscap_3-P1_l: scapula_l (-0.07292384 -0.02856721 0.0829169)
      PathPoint subscap_3-P2_l: scapula_l (-0.0325594 -0.03622053 0.03490756)
      PathPoint subscap_3-P3_l: humerus_l (0.02673674 0.002172365 0.005771371)
      PathWrap: wrap_object=inf_sup_sub_l
    Thelen2003Muscle subscap_4_l: max_isometric_force=274 optimal_fiber_length=0.0744 tendon_slack_length=0.055
        pennation_angle_at_optimal=0.08726646
      PathPoint subscap_4-P1_l: scapula_l (-0.08075807 -0.04932286 0.0710369)
      PathPoint subscap_4-P2_l: humerus_l (0.0265234 0.0036727 0.00637907)
      PathWrap: wrap_object=inf_sup_sub_l
    Thelen2003Muscle subscap_5_l: max_isometric_force=114 optimal_fiber_length=0.0797 tendon_slack_length=0.066
        pennation_angle_at_optimal=0
      PathPoint subscap_5-P1_l: scapula_l (-0.07843208 -0.06090256 0.06585691)
      PathPoint subscap_5-P2_l: humerus_l (0.0262234 0.0058327 0.00238907)
      PathWrap: wrap_object=inf_sup_sub_l
    Thelen2003Muscle subscap_6_l: max_isometric_force=149 optimal_fiber_length=0.0762 tendon_slack_length=0.077
        pennation_angle_at_optimal=0
      PathPoint subscap_6-P1_l: scapula_l (-0.09444428 -0.08234781 0.07797304)
      PathPoint subscap_6-P2_l: humerus_l (0.0296734 -0.0004473 0.00495907)
      PathWrap: wrap_object=inf_sup_sub_l
    Thelen2003Muscle subscap_7_l: max_isometric_force=162 optimal_fiber_length=0.082 tendon_slack_length=0.079
        pennation_angle_at_optimal=0
      PathPoint subscap_7-P1_l: scapula_l (-0.09048117 -0.09466 0.0702401)
      PathPoint subscap_7-P2_l: humerus_l (0.0282834 -0.0018673 0.00916907)
      PathWrap: wrap_object=inf_sup_sub_l
    Thelen2003Muscle subscap_8_l: max_isometric_force=61 optimal_fiber_length=0.0765 tendon_slack_length=0.04
        pennation_angle_at_optimal=0
      PathPoint subscap_8-P1_l: scapula_l (-0.06979958 -0.07328619 0.05176325)
      PathPoint subscap_8-P2_l: humerus_l (0.0282834 -0.0018673 0.00916907)
      PathWrap: wrap_object=inf_sup_sub_l
    Thelen2003Muscle subscap_9_l: max_isometric_force=222 optimal_fiber_length=0.0721 tendon_slack_length=0.059
        pennation_angle_at_optimal=0
      PathPoint subscap_9-P1_l: scapula_l (-0.08228093 -0.0921 0.05523912)
      PathPoint subscap_9-P2_l: humerus_l (0.0249534 -0.0064773 0.01329907)
      PathWrap: wrap_object=inf_sup_sub_l
    Thelen2003Muscle subscap10_l: max_isometric_force=47 optimal_fiber_length=0.0676 tendon_slack_length=0.01
        pennation_angle_at_optimal=0
      PathPoint subscap10-P1_l: scapula_l (-0.0609776 -0.06465688 0.03371834)
      PathPoint subscap10-P2_l: humerus_l (0.0171834 -0.0197773 0.01413907)
      PathWrap: wrap_object=inf_sup_sub_l
    Thelen2003Muscle subscap11_l: max_isometric_force=16 optimal_fiber_length=0.0643 tendon_slack_length=0.01
        pennation_angle_at_optimal=0
      PathPoint subscap11-P1_l: scapula_l (-0.04581956 -0.05743328 0.02413653)
      PathPoint subscap11-P2_l: humerus_l (0.0118934 -0.0255973 0.01646907)
      PathWrap: wrap_object=inf_sup_sub_l
    Thelen2003Muscle pect_min_1: max_isometric_force=47 optimal_fiber_length=0.0765 tendon_slack_length=0.051
        pennation_angle_at_optimal=0
      PathPoint P1: torso (0.06027897 0.3107209 0.06418945)
      PathPoint P2: scapula_r (-0.003493411 -0.0261655 -0.04487797)
    Thelen2003Muscle pect_min_2: max_isometric_force=107 optimal_fiber_length=0.1086 tendon_slack_length=0.041
        pennation_angle_at_optimal=0
      PathPoint P1: torso (0.06978489 0.2824807 0.07560586)
      PathPoint P2: scapula_r (-0.003493411 -0.0261655 -0.04487797)
    Thelen2003Muscle pect_min_3: max_isometric_force=107 optimal_fiber_length=0.1075 tendon_slack_length=0.029
        pennation_angle_at_optimal=0
      PathPoint P1: torso (0.05747411 0.283741 0.1009599)
      PathPoint P2: scapula_r (0.002824874 -0.02967059 -0.04065797)
    Thelen2003Muscle pect_min_4: max_isometric_force=46 optimal_fiber_length=0.1381 tendon_slack_length=0.026
        pennation_angle_at_optimal=0
      PathPoint P1: torso (0.06000547 0.2599886 0.1037987)
      PathPoint P2: scapula_r (0.009984384 -0.03629406 -0.03222327)
    Thelen2003Muscle pect_maj_t_1: max_isometric_force=125 optimal_fiber_length=0.1884 tendon_slack_length=0.036
        pennation_angle_at_optimal=0
      PathPoint P1: torso (0.1004039 0.2174408 0.06435748)
      PathPoint P3: torso (0.0830439 0.244022 0.0960863)
      PathPoint P2: humerus_r (0.0232079 -0.05354845 -0.001387885)
      PathWrap: wrap_object=ter_lat_pec
      PathWrap pathwrap-1: wrap_object=Chest_pect
    Thelen2003Muscle pect_maj_t_2: max_isometric_force=118 optimal_fiber_length=0.183 tendon_slack_length=0.043
        pennation_angle_at_optimal=0
      PathPoint P1: torso (0.09238852 0.2430987 0.04511508)
      PathPoint P3: torso (0.0805344 0.257764 0.08680519)
      PathPoint P2: humerus_r (0.02342454 -0.05860357 0.0004211159)
      PathWrap: wrap_object=ter_lat_pec
      PathWrap pathwrap-1: wrap_object=Chest_pect
    Thelen2003Muscle pect_maj_t_3: max_isometric_force=165 optimal_fiber_length=0.1853 tendon_slack_length=0.053
        pennation_angle_at_optimal=0
      PathPoint P1: torso (0.088008 0.2550656 0.01567798)
      PathPoint P3: torso (0.07756087 0.273229 0.08402362)
      PathPoint P2: humerus_r (0.02211927 -0.06382882 0.0009770565)
      PathWrap: wrap_object=ter_lat_pec
      PathWrap pathwrap-1: wrap_object=Chest_pect
    Thelen2003Muscle pect_maj_t_4: max_isometric_force=157 optimal_fiber_length=0.1833 tendon_slack_length=0.028
        pennation_angle_at_optimal=0
      PathPoint P1: torso (0.07860491 0.2787991 0.01650606)
      PathPoint P3: torso (0.07374663 0.291674 0.07402711)
      PathPoint P2: humerus_r (0.0234579 -0.05472845 -0.0006278845)
      PathWrap: wrap_object=ter_lat_pec
      PathWrap pathwrap-1: wrap_object=Chest_pect
    Thelen2003Muscle pect_maj_t_5: max_isometric_force=133 optimal_fiber_length=0.15 tendon_slack_length=0.026
        pennation_angle_at_optimal=0
      PathPoint P1: torso (0.06239193 0.3368142 0.01265541)
      PathPoint P3: torso (0.06078775 0.333036 0.0609185)
      PathPoint P2: humerus_r (0.02417006 -0.04337874 -0.002665354)
      PathWrap: wrap_object=ter_lat_pec
      PathWrap pathwrap-1: wrap_object=Chest_pect
    Thelen2003Muscle pect_maj_t_6: max_isometric_force=198 optimal_fiber_length=0.1449 tendon_slack_length=0.036
        pennation_angle_at_optimal=0
      PathPoint P1: torso (0.04781432 0.355279 0.02221263)
      PathPoint P3: torso (0.05445233 0.347677 0.0558677)
      PathPoint P2: humerus_r (0.0234579 -0.05472845 -0.0006278845)
      PathWrap: wrap_object=ter_lat_pec
      PathWrap pathwrap-1: wrap_object=Chest_pect
    Thelen2003Muscle pect_maj_c_1: max_isometric_force=179 optimal_fiber_length=0.1363 tendon_slack_length=0.017
        pennation_angle_at_optimal=0
      PathPoint P1: clavicle_r (0.01669934 -0.005766628 0.03183592)
      PathPoint P3: clavicle_r (-0.00576999 0.0244127 0.0585089)
      PathPoint P2: humerus_r (0.02229033 -0.07913284 0.002385813)
      PathWrap: wrap_object=ter_lat_pec
      PathWrap pathwrap-1: wrap_object=Chest_pect
    Thelen2003Muscle pect_maj_c_2: max_isometric_force=113 optimal_fiber_length=0.1091 tendon_slack_length=0.014
        pennation_angle_at_optimal=0
      PathPoint P1: clavicle_r (0.007075043 -0.008996815 0.06197742)
      PathPoint P3: clavicle_r (-0.00583906 0.0232446 0.0707512)
      PathPoint P2: humerus_r (0.02229033 -0.07052724 0.002385813)
      PathWrap: wrap_object=ter_lat_pec
      PathWrap pathwrap-1: wrap_object=Chest_pect
    Thelen2003Muscle pect_min_1_l: max_isometric_force=47 optimal_fiber_length=0.0765 tendon_slack_length=0.051
        pennation_angle_at_optimal=0
      PathPoint pect_min_1-P1_l: torso (0.06027897 0.3107209 -0.06418945)
      PathPoint pect_min_1-P2: scapula_l (-0.003493411 -0.0261655 0.04487797)
    Thelen2003Muscle pect_min_2_l: max_isometric_force=107 optimal_fiber_length=0.1086 tendon_slack_length=0.041
        pennation_angle_at_optimal=0
      PathPoint pect_min_2-P1_l: torso (0.06978489 0.2824807 -0.07560586)
      PathPoint pect_min_2-P2_l: scapula_l (-0.003493411 -0.0261655 0.04487797)
    Thelen2003Muscle pect_min_3_l: max_isometric_force=107 optimal_fiber_length=0.1075 tendon_slack_length=0.029
        pennation_angle_at_optimal=0
      PathPoint pect_min_3-P1_l: torso (0.05747411 0.283741 -0.1009599)
      PathPoint pect_min_3-P2_l: scapula_l (0.002824874 -0.02967059 0.04065797)
    Thelen2003Muscle pect_min_4_l: max_isometric_force=46 optimal_fiber_length=0.1381 tendon_slack_length=0.026
        pennation_angle_at_optimal=0
      PathPoint pect_min_4-P1_l: torso (0.06000547 0.2599886 -0.1037987)
      PathPoint pect_min_4-P2_l: scapula_l (0.009984384 -0.03629406 0.03222327)
    Thelen2003Muscle pect_maj_t_1_l: max_isometric_force=125 optimal_fiber_length=0.1884 tendon_slack_length=0.036
        pennation_angle_at_optimal=0
      PathPoint pect_maj_t_1-P1_l: torso (0.1004039 0.2174408 -0.06435748)
      PathPoint pect_maj_t_1-P3_l: torso (0.0830439 0.244022 -0.0960863)
      PathPoint pect_maj_t_1-P2_l: humerus_l (0.0232079 -0.05354845 0.001387885)
      PathWrap: wrap_object=ter_lat_pec_l
      PathWrap pathwrap-1: wrap_object=Chest_pect
    Thelen2003Muscle pect_maj_t_2_l: max_isometric_force=118 optimal_fiber_length=0.183 tendon_slack_length=0.043
        pennation_angle_at_optimal=0
      PathPoint pect_maj_t_2-P1_l: torso (0.09238852 0.2430987 -0.04511508)
      PathPoint pect_maj_t_2-P3_l: torso (0.0805344 0.257764 -0.08680519)
      PathPoint pect_maj_t_2-P2: humerus_l (0.02342454 -0.05860357 -0.0004211159)
      PathWrap: wrap_object=ter_lat_pec_l
      PathWrap pathwrap-1: wrap_object=Chest_pect
    Thelen2003Muscle pect_maj_t_3_l: max_isometric_force=165 optimal_fiber_length=0.1853 tendon_slack_length=0.053
        pennation_angle_at_optimal=0
      PathPoint pect_maj_t_3-P1_l: torso (0.088008 0.2550656 -0.01567798)
      PathPoint pect_maj_t_3-P3_l: torso (0.07756087 0.273229 -0.08402362)
      PathPoint pect_maj_t_3-P2_l: humerus_l (0.02211927 -0.06382882 -0.0009770565)
      PathWrap: wrap_object=ter_lat_pec_l
      PathWrap pathwrap-1: wrap_object=Chest_pect
    Thelen2003Muscle pect_maj_t_4_l: max_isometric_force=157 optimal_fiber_length=0.1833 tendon_slack_length=0.028
        pennation_angle_at_optimal=0
      PathPoint pect_maj_t_4-P1_l: torso (0.07860491 0.2787991 -0.01650606)
      PathPoint pect_maj_t_4-P3_l: torso (0.07374663 0.291674 -0.07402711)
      PathPoint pect_maj_t_4-P2_l: humerus_l (0.0234579 -0.05472845 0.0006278845)
      PathWrap: wrap_object=ter_lat_pec_l
      PathWrap pathwrap-1: wrap_object=Chest_pect
    Thelen2003Muscle pect_maj_t_5_l: max_isometric_force=133 optimal_fiber_length=0.15 tendon_slack_length=0.026
        pennation_angle_at_optimal=0
      PathPoint pect_maj_t_5-P1_l: torso (0.06239193 0.3368142 -0.01265541)
      PathPoint pect_maj_t_5-P3_l: torso (0.06078775 0.333036 -0.0609185)
      PathPoint pect_maj_t_5-P2_l: humerus_l (0.02417006 -0.04337874 0.002665354)
      PathWrap: wrap_object=ter_lat_pec_l
      PathWrap pathwrap-1: wrap_object=Chest_pect
    Thelen2003Muscle pect_maj_t_6_l: max_isometric_force=198 optimal_fiber_length=0.1449 tendon_slack_length=0.036
        pennation_angle_at_optimal=0
      PathPoint pect_maj_t_6-P1_l: torso (0.04781432 0.355279 -0.02221263)
      PathPoint pect_maj_t_6-P3_l: torso (0.05445233 0.347677 -0.0558677)
      PathPoint pect_maj_t_6-P2_l: humerus_l (0.0234579 -0.05472845 0.0006278845)
      PathWrap: wrap_object=ter_lat_pec_l
      PathWrap pathwrap-1: wrap_object=Chest_pect
    Thelen2003Muscle pect_maj_c_1_l: max_isometric_force=179 optimal_fiber_length=0.1363 tendon_slack_length=0.017
        pennation_angle_at_optimal=0
      PathPoint pect_maj_c_1-P1_l: clavicle_l (0.01669934 -0.005766628 -0.03183592)
      PathPoint pect_maj_c_1-P3_l: clavicle_l (-0.00576999 0.0244127 -0.0585089)
      PathPoint pect_maj_c_1-P2: humerus_l (0.02229033 -0.07913284 -0.002385813)
      PathWrap: wrap_object=ter_lat_pec_l
      PathWrap pathwrap-1: wrap_object=Chest_pect
    Thelen2003Muscle pect_maj_c_2_l: max_isometric_force=113 optimal_fiber_length=0.1091 tendon_slack_length=0.014
        pennation_angle_at_optimal=0
      PathPoint pect_maj_c_2-P1_l: clavicle_l (0.007075043 -0.008996815 -0.06197742)
      PathPoint pect_maj_c_2-P3_l: clavicle_l (-0.00583906 0.0232446 -0.0707512)
      PathPoint pect_maj_c_2-P2_l: humerus_l (0.02229033 -0.07052724 -0.002385813)
      PathWrap: wrap_object=ter_lat_pec_l
      PathWrap pathwrap-1: wrap_object=Chest_pect
    Thelen2003Muscle rect_abd_r: max_isometric_force=163 optimal_fiber_length=0.2238 tendon_slack_length=0.017
        pennation_angle_at_optimal=0 FmaxTendonStrain=0.033 FmaxMuscleStrain=0.6 KshapeActive=0.5 KshapePassive=4
        Af=0.3 Flen=1.8 activation_time_constant=0.01 [seconds] deactivation_time_constant=0.04 [seconds]
      PathPoint P1: pelvis (-0.026 -0.07 0.011)
      PathPoint P2: torso (0.092 0.221982 0.031)
    Thelen2003Muscle rect_abd_l: max_isometric_force=163 optimal_fiber_length=0.2238 tendon_slack_length=0.017
        pennation_angle_at_optimal=0 FmaxTendonStrain=0.033 FmaxMuscleStrain=0.6 KshapeActive=0.5 KshapePassive=4
        Af=0.3 Flen=1.8 activation_time_constant=0.01 deactivation_time_constant=0.04
      PathPoint rect_abd_r-P1_l: pelvis (-0.026 -0.07 -0.011)
      PathPoint rect_abd_r-P2_l: torso (0.092 0.221982 -0.031)
    Thelen2003Muscle LD_L1_r: max_isometric_force=41.4 optimal_fiber_length=0.316063 tendon_slack_length=0.0692329
        pennation_angle_at_optimal=0
      PathPoint P1: lumbar1 (-0.045 -0.013 0.00433164)
      PathPoint P2: humerus_r (-0.00948737 -0.0152526 0.00268873)
      PathWrap: wrap_object=Chest_r method=hybrid
    Thelen2003Muscle LD_L2_r: max_isometric_force=41.4 optimal_fiber_length=0.338256 tendon_slack_length=0.0740942
        pennation_angle_at_optimal=0
      PathPoint P1: lumbar2 (-0.043 -0.0134148 0.00414584)
      PathPoint P2: humerus_r (-0.00949 -0.01525 0.00269)
      PathWrap: wrap_object=Chest_r method=hybrid
    Thelen2003Muscle LD_L3_r: max_isometric_force=50.6 optimal_fiber_length=0.3550696 tendon_slack_length=0.077777
        pennation_angle_at_optimal=0
      PathPoint P1: lumbar3 (-0.046 -0.004 0.00385971)
      PathPoint P2: humerus_r (-0.00949 -0.01525 0.00433)
      PathWrap: wrap_object=Chest_r method=hybrid
    Thelen2003Muscle LD_L4_r: max_isometric_force=50.6 optimal_fiber_length=0.3719192 tendon_slack_length=0.081468
        pennation_angle_at_optimal=0
      PathPoint P1: lumbar4 (-0.045 0.005 0.00462278)
      PathPoint P2: humerus_r (-0.00949 -0.01525 0.00269)
      PathWrap: wrap_object=Chest_r method=hybrid
    Thelen2003Muscle LD_L5_r: max_isometric_force=50.6 optimal_fiber_length=0.3902216 tendon_slack_length=0.080135
        pennation_angle_at_optimal=0
      PathPoint P1: lumbar5 (-0.036 0.021 0.00411073)
      PathPoint P2: humerus_r (-0.00949 -0.01525 0.00269)
      PathWrap: wrap_object=Chest_r method=hybrid
    Thelen2003Muscle LD_T12_r: max_isometric_force=23 optimal_fiber_length=0.3032209 tendon_slack_length=0.06226857
        pennation_angle_at_optimal=0
      PathPoint P1: humerus_r (-0.00949 -0.01525 0.00269)
      PathPoint P2: torso (-0.052 0.102 0.0043635)
      PathWrap: wrap_object=Chest_r method=hybrid range=(1 2)
    Thelen2003Muscle LD_T11_r: max_isometric_force=27.6 optimal_fiber_length=0.2848084 tendon_slack_length=0.058487
        pennation_angle_at_optimal=0
      PathPoint P1: humerus_r (-0.00949 -0.01525 0.00269)
      PathPoint P2: torso (-0.0631214 0.131 0.003)
      PathWrap: wrap_object=Chest_r method=hybrid
    Thelen2003Muscle LD_T10_r: max_isometric_force=27.6 optimal_fiber_length=0.279701 tendon_slack_length=0.0437628
        pennation_angle_at_optimal=0
      PathPoint P1: humerus_r (-0.00949 -0.01525 0.00269)
      PathPoint P2: torso (-0.069 0.158 0.00382991)
      PathWrap: wrap_object=Chest_r method=hybrid
    Thelen2003Muscle LD_T9_r: max_isometric_force=18.4 optimal_fiber_length=0.256967 tendon_slack_length=0.14
        pennation_angle_at_optimal=0
      PathPoint P1: humerus_r (-0.00949 -0.01525 0.00269)
      PathPoint P2: torso (-0.079 0.194 0.00407649)
      PathWrap: wrap_object=Chest_r method=hybrid
    Thelen2003Muscle LD_T8_r: max_isometric_force=18.4 optimal_fiber_length=0.232514 tendon_slack_length=0.0477484
        pennation_angle_at_optimal=0
      PathPoint P1: humerus_r (-0.00949 -0.01525 0.00269)
      PathPoint P2: torso (-0.081 0.215 0.00427544)
      PathWrap: wrap_object=Chest_r method=hybrid
    Thelen2003Muscle LD_T7_r: max_isometric_force=18.4 optimal_fiber_length=0.223761 tendon_slack_length=0.045951
        pennation_angle_at_optimal=0
      PathPoint P1: humerus_r (-0.00949 -0.01525 0.00269)
      PathPoint P2: torso (-0.09 0.235 0.00407354)
      PathWrap: wrap_object=Chest_r method=hybrid
    Thelen2003Muscle LD_R12_r: max_isometric_force=18.4 optimal_fiber_length=0.2444749 tendon_slack_length=0.0502047
        pennation_angle_at_optimal=0
      PathPoint P1: humerus_r (-0.00949 -0.01525 0.00269)
      PathPoint P2: torso (-0.045 0.121579 0.0442662)
    Thelen2003Muscle LD_R11_r: max_isometric_force=27.6 optimal_fiber_length=0.240735 tendon_slack_length=0.0494366
        pennation_angle_at_optimal=0
      PathPoint P1: humerus_r (-0.00949 -0.01525 0.00433)
      PathPoint P2: torso (-0.068 0.14 0.063)
      PathWrap: wrap_object=Chest_r method=hybrid
    Thelen2003Muscle LD_Il_r: max_isometric_force=32.2 optimal_fiber_length=0.432081 tendon_slack_length=0.0186802
        pennation_angle_at_optimal=0
      PathPoint P1: pelvis (-0.113872 0.0741306 0.0538193)
      PathPoint P2: humerus_r (-0.00949 -0.01525 0.00269)
      PathWrap: wrap_object=Chest_r method=hybrid
    Thelen2003Muscle Ps_L1_VB_r: max_isometric_force=160.4797 optimal_fiber_length=0.1841 tendon_slack_length=0.0647
        pennation_angle_at_optimal=0.18675
      PathPoint P1: lumbar1 (-0.0101595 0.02327 0.02)
      PathPoint P2: pelvis (-0.0238 -0.057 0.0759)
      ConditionalPathPoint P3: pelvis (-0.0288 -0.0805 0.0816) socket_coordinate=/jointset/hip_r/hip_flexion_r
          range=(-1.5708 0.785398)
      PathPoint P4: femur_r (0.0016 -0.0507 0.0038)
      PathPoint P5: femur_r (-0.0188 -0.0597 0.0104)
    Thelen2003Muscle Ps_L1_TP_r: max_isometric_force=46.32404 optimal_fiber_length=0.1818 tendon_slack_length=0.0639
        pennation_angle_at_optimal=0.18675
      PathPoint P1: lumbar1 (-0.02325 0.0146584 0.0226252)
      PathPoint P2: pelvis (-0.0238 -0.057 0.0759)
      ConditionalPathPoint P3: pelvis (-0.0288 -0.0805 0.0816) socket_coordinate=/jointset/hip_r/hip_flexion_r
          range=(-1.5708 0.785398)
      PathPoint P4: femur_r (0.0016 -0.0507 0.0038)
      PathPoint P5: femur_r (-0.0188 -0.0597 0.0104)
    Thelen2003Muscle Ps_L1_L2_IVD_r: max_isometric_force=91.32454 optimal_fiber_length=0.166 tendon_slack_length=0.0583
        pennation_angle_at_optimal=0.1867502
      PathPoint P1: lumbar1 (-0.00125362 0.00350798 0.0206834)
      PathPoint P2: pelvis (-0.0238 -0.057 0.0759)
      ConditionalPathPoint P3: pelvis (-0.0288 -0.0805 0.0816) socket_coordinate=/jointset/hip_r/hip_flexion_r
          range=(-1.5708 0.785398)
      PathPoint P4: femur_r (0.0016 -0.0507 0.0038)
      PathPoint P5: femur_r (-0.0188 -0.0597 0.0104)
    Thelen2003Muscle Ps_L2_TP_r: max_isometric_force=160.4797 optimal_fiber_length=0.1597 tendon_slack_length=0.0561
        pennation_angle_at_optimal=0.1867502
      PathPoint P1: lumbar2 (-0.0216214 0.014587 0.022249)
      PathPoint P2: pelvis (-0.0238 -0.057 0.0759)
      ConditionalPathPoint P3: pelvis (-0.0288 -0.0805 0.0816) socket_coordinate=/jointset/hip_r/hip_flexion_r
          range=(-1.5708 0.785398)
      PathPoint P4: femur_r (0.0016 -0.0507 0.0038)
      PathPoint P5: femur_r (-0.0188 -0.0597 0.0104)
    Thelen2003Muscle Ps_L2_L3_IVD_r: max_isometric_force=90.5635 optimal_fiber_length=0.144 tendon_slack_length=0.0506
        pennation_angle_at_optimal=0.1867502
      PathPoint P1: lumbar2 (0.00196252 0.00338519 0.0214479)
      PathPoint P2: pelvis (-0.0238 -0.057 0.0759)
      ConditionalPathPoint P3: pelvis (-0.0288 -0.0805 0.0816) socket_coordinate=/jointset/hip_r/hip_flexion_r
          range=(-1.5708 0.785398)
      PathPoint P4: femur_r (0.0016 -0.0507 0.0038)
      PathPoint P5: femur_r (-0.0188 -0.0597 0.0104)
    Thelen2003Muscle Ps_L3_TP_r: max_isometric_force=76.86482 optimal_fiber_length=0.1394 tendon_slack_length=0.049
        pennation_angle_at_optimal=0.1867502
      PathPoint P1: lumbar3 (-0.0245065 0.0207283 0.0282599)
      PathPoint P2: pelvis (-0.0238 -0.057 0.0759)
      ConditionalPathPoint P3: pelvis (-0.0288 -0.0805 0.0816) socket_coordinate=/jointset/hip_r/hip_flexion_r
          range=(-1.5708 0.785398)
      PathPoint P4: femur_r (0.0016 -0.0507 0.0038)
      PathPoint P5: femur_r (-0.0188 -0.0597 0.0104)
    Thelen2003Muscle Ps_L3_L4_IVD_r: max_isometric_force=27.39736 optimal_fiber_length=0.1235
        tendon_slack_length=0.0434 pennation_angle_at_optimal=0.1867502
      PathPoint P1: lumbar3 (0.00115193 0.00621063 0.0211533)
      PathPoint P2: pelvis (-0.0238 -0.057 0.0759)
      ConditionalPathPoint P3: pelvis (-0.0288 -0.0805 0.0816) socket_coordinate=/jointset/hip_r/hip_flexion_r
          range=(-1.5708 0.785398)
      PathPoint P4: femur_r (0.0016 -0.0507 0.0038)
      PathPoint P5: femur_r (-0.0188 -0.0597 0.0104)
    Thelen2003Muscle Ps_L4_TP_r: max_isometric_force=122.4278 optimal_fiber_length=0.1195 tendon_slack_length=0.042
        pennation_angle_at_optimal=0.1867502
      PathPoint P1: lumbar4 (-0.015649 0.0249464 0.0258768)
      PathPoint P2: pelvis (-0.0238 -0.057 0.0759)
      ConditionalPathPoint P3: pelvis (-0.0288 -0.0805 0.0816) socket_coordinate=/jointset/hip_r/hip_flexion_r
          range=(-1.5708 0.785398)
      PathPoint P4: femur_r (0.0016 -0.0507 0.0038)
      PathPoint P5: femur_r (-0.0188 -0.0597 0.0104)
    Thelen2003Muscle Ps_L4_L5_IVD_r: max_isometric_force=60.12199 optimal_fiber_length=0.0998
        tendon_slack_length=0.0351 pennation_angle_at_optimal=0.1867502
      PathPoint P1: lumbar4 (0.00541963 0.00394754 0.0205966)
      PathPoint P2: pelvis (-0.0238 -0.057 0.0759)
      ConditionalPathPoint P3: pelvis (-0.0288 -0.0805 0.0816) socket_coordinate=/jointset/hip_r/hip_flexion_r
          range=(-1.5708 0.785398)
      PathPoint P4: femur_r (0.0016 -0.0507 0.0038)
      PathPoint P5: femur_r (-0.0188 -0.0597 0.0104)
    Thelen2003Muscle Ps_L5_TP_r: max_isometric_force=131.6595 optimal_fiber_length=0.1034 tendon_slack_length=0.0363
        pennation_angle_at_optimal=0.1867502
      PathPoint P1: lumbar5 (-0.00562001 0.0291398 0.0252881)
      PathPoint P2: pelvis (-0.0238 -0.057 0.0759)
      ConditionalPathPoint P3: pelvis (-0.0288 -0.0805 0.0816) socket_coordinate=/jointset/hip_r/hip_flexion_r
          range=(-1.5708 0.785398)
      PathPoint P4: femur_r (0.0016 -0.0507 0.0038)
      PathPoint P5: femur_r (-0.0188 -0.0597 0.0104)
    Thelen2003Muscle Ps_L5_VB_r: max_isometric_force=145.3582 optimal_fiber_length=0.0903 tendon_slack_length=0.0317
        pennation_angle_at_optimal=0.1867502
      PathPoint P1: lumbar5 (0.01 0.01241 0.019)
      PathPoint P2: pelvis (-0.0238 -0.057 0.0759)
      ConditionalPathPoint P3: pelvis (-0.0288 -0.0805 0.0816) socket_coordinate=/jointset/hip_r/hip_flexion_r
          range=(-1.5708 0.785398)
      PathPoint P4: femur_r (0.0016 -0.0507 0.0038)
      PathPoint P5: femur_r (-0.0188 -0.0597 0.0104)
    Thelen2003Muscle QL_post_I_1-L3_r: max_isometric_force=18.2 optimal_fiber_length=0.03836231
        tendon_slack_length=0.03218577 pennation_angle_at_optimal=0.1291544
      PathPoint I_1_r-P1: pelvis (-0.112 0.077 0.059)
      PathPoint L3_TP_r-P2: lumbar3 (-0.029 0.01963 0.0303)
    Thelen2003Muscle QL_post_I_2-L4_r: max_isometric_force=24.2 optimal_fiber_length=0.02219488
        tendon_slack_length=0.01862138 pennation_angle_at_optimal=0.1291544
      PathPoint I_2_r-P1: pelvis (-0.106 0.081 0.063)
      PathPoint L4_TP_r-P2: lumbar4 (-0.022 0.02605 0.0303)
    Thelen2003Muscle QL_post_I_2-L3_r: max_isometric_force=14.1 optimal_fiber_length=0.05023
        tendon_slack_length=0.04214269 pennation_angle_at_optimal=0.1291544
      PathPoint I_2_r-P1: pelvis (-0.106 0.081 0.063)
      PathPoint L3_TP_r-P2: lumbar3 (-0.029 0.01963 0.0303)
    Thelen2003Muscle QL_post_I_2-L2_r: max_isometric_force=8.8 optimal_fiber_length=0.03478374
        tendon_slack_length=0.0191 pennation_angle_at_optimal=0.1291544
      PathPoint I_2_r-P1: pelvis (-0.106 0.081 0.063)
      PathPoint L2_TP_r-P2: lumbar2 (-0.031 0.012 0.0303)
    Thelen2003Muscle QL_post_I_3-L1_r: max_isometric_force=12.92 optimal_fiber_length=0.08560792
        tendon_slack_length=0.04446546 pennation_angle_at_optimal=0.1291544
      PathPoint L1_TP-P1: lumbar1 (-0.032 0.014 0.032)
      PathPoint I_3_r-P1: pelvis (-0.098 0.089 0.066)
    Thelen2003Muscle QL_post_I_3-L2_r: max_isometric_force=13.6 optimal_fiber_length=0.05041593
        tendon_slack_length=0.04229869 pennation_angle_at_optimal=0.1291544
      PathPoint L2_TP_r-P2: lumbar2 (-0.031 0.012 0.0303)
      PathPoint I_3_r-P1: pelvis (-0.098 0.089 0.066)
    Thelen2003Muscle QL_post_I_3-L3_r: max_isometric_force=23.2 optimal_fiber_length=0.03605963
        tendon_slack_length=0.0302538 pennation_angle_at_optimal=0.1291544
      PathPoint L3_TP_r-P2: lumbar3 (-0.029 0.01963 0.0303)
      PathPoint I_3_r-P1: pelvis (-0.098 0.089 0.066)
    Thelen2003Muscle QL_mid_L3-12_3_r: max_isometric_force=5.8 optimal_fiber_length=0.05463846
        tendon_slack_length=0.02837967 pennation_angle_at_optimal=0.1291544
      PathPoint quadratus_lumb_mid_L3_1_r-P1: torso (-0.0419115 0.11237 0.05166)
      PathPoint quadratus_lumb_mid_L3_1_r-P2: lumbar3 (-0.0293616 0.0217307 0.03038)
    Thelen2003Muscle QL_mid_L3-12_2_r: max_isometric_force=6.6 optimal_fiber_length=0.05793535
        tendon_slack_length=0.0300921 pennation_angle_at_optimal=0.1291544
      PathPoint quadratus_lumb_mid_L3_2_r-P2: torso (-0.0424782 0.119222 0.04319)
      PathPoint quadratus_lumb_mid_L3_2_r-P3: lumbar3 (-0.02936 0.02173 0.03038)
    Thelen2003Muscle QL_mid_L3-12_1_r: max_isometric_force=11 optimal_fiber_length=0.06305602
        tendon_slack_length=0.03275182 pennation_angle_at_optimal=0.1291544
      PathPoint quadratus_lumb_mid_L3_3_r-P2: torso (-0.0412845 0.1282 0.03119)
      PathPoint quadratus_lumb_mid_L3_3_r-P3: lumbar3 (-0.02936 0.02173 0.03038)
    Thelen2003Muscle QL_mid_L2-12_1_r: max_isometric_force=9.2 optimal_fiber_length=0.04077783
        tendon_slack_length=0.02118034 pennation_angle_at_optimal=0.1291544
      PathPoint QL_mid_L2-12_1_l-P1: torso (-0.04128 0.1282 0.03119)
      PathPoint QL_mid_L2-12_1_l-P1_0: lumbar2 (-0.0291214 0.0168959 0.02562)
    Thelen2003Muscle QL_mid_L4-12_3_r: max_isometric_force=5.4 optimal_fiber_length=0.07288648
        tendon_slack_length=0.03785784 pennation_angle_at_optimal=0.1291544
      PathPoint quadratus_lumb_mid_L4_1_r-P1: torso (-0.0417825 0.112316 0.05167)
      PathPoint quadratus_lumb_mid_L4_1_r-P2: lumbar4 (-0.0213825 0.0307 0.02806)
    Thelen2003Muscle QL_ant_I_2-T12_r: max_isometric_force=7.1 optimal_fiber_length=0.1045452
        tendon_slack_length=0.054301 pennation_angle_at_optimal=0.1291544
      PathPoint I_2_r-P1: pelvis (-0.106 0.081 0.063)
      PathPoint T12_r-P2: torso (-0.0142008 0.13 0.02)
    Thelen2003Muscle QL_ant_I_3-T12_r: max_isometric_force=13.34 optimal_fiber_length=0.1033426
        tendon_slack_length=0.05367702 pennation_angle_at_optimal=0.1291544
      PathPoint I_3_r-P1: pelvis (-0.098 0.089 0.066)
      PathPoint T12_r-P2: torso (-0.01 0.131 0.019)
    Thelen2003Muscle QL_ant_I_2-12_1_r: max_isometric_force=4.7 optimal_fiber_length=0.09988925
        tendon_slack_length=0.0518833 pennation_angle_at_optimal=0.1291544
      PathPoint I_2_r-P2: pelvis (-0.106 0.081 0.063)
      PathPoint 12.1_r-P3: torso (-0.041 0.118 0.043)
    Thelen2003Muscle QL_ant_I_3-12_1_r: max_isometric_force=8.9 optimal_fiber_length=0.0986533
        tendon_slack_length=0.05124134 pennation_angle_at_optimal=0.1291544
      PathPoint I_3_r-P1: pelvis (-0.098 0.089 0.066)
      PathPoint 12.1_r-P2: torso (-0.0402807 0.124401 0.03745)
    Thelen2003Muscle QL_ant_I_3-12_2_r: max_isometric_force=5.9 optimal_fiber_length=0.09285171
        tendon_slack_length=0.04822795 pennation_angle_at_optimal=0.1291544
      PathPoint I_3_r-P1: pelvis (-0.098 0.089 0.066)
      PathPoint 12.2_r-P2: torso (-0.04024 0.11786 0.04608)
    Thelen2003Muscle QL_ant_I_3-12_3_r: max_isometric_force=6.8 optimal_fiber_length=0.08691859
        tendon_slack_length=0.0451 pennation_angle_at_optimal=0.1291544
      PathPoint I_3_r-P2: pelvis (-0.098 0.089 0.066)
      PathPoint 12.3_r-P3: torso (-0.03801 0.111359 0.05452)
    Thelen2003Muscle MF_m1s_r: max_isometric_force=18.4 optimal_fiber_length=0.04684634 tendon_slack_length=0.01947641
        pennation_angle_at_optimal=0
      PathPoint P1: lumbar4 (-0.033 0.0323951 0.0174744)
      PathPoint P2: lumbar1 (-0.037 -0.013 0.003)
    Thelen2003Muscle MF_m1t_1_r: max_isometric_force=19.32 optimal_fiber_length=0.0751687 tendon_slack_length=0.0225396
        pennation_angle_at_optimal=0
      PathPoint P1: lumbar5 (-0.02 0.039 0.0175946)
      PathPoint P2: lumbar1 (-0.044 -0.0160046 0.00309636)
    Thelen2003Muscle MF_m1t_2_r: max_isometric_force=16.56 optimal_fiber_length=0.09431214
        tendon_slack_length=0.0282798 pennation_angle_at_optimal=0
      PathPoint P1: sacrum (-0.121424 0.0839766 0.021)
      PathPoint P2: lumbar1 (-0.044 -0.016 0.0031)
    Thelen2003Muscle MF_m1t_3_r: max_isometric_force=27.66 optimal_fiber_length=0.103 tendon_slack_length=0.03088368
        pennation_angle_at_optimal=0
      PathPoint P1: pelvis (-0.132132 0.0543197 0.0480001)
      PathPoint P2: lumbar1 (-0.044 -0.016 0.0031)
    Thelen2003Muscle MF_m2s_r: max_isometric_force=17.94 optimal_fiber_length=0.0453974 tendon_slack_length=0.01756569
        pennation_angle_at_optimal=0
      PathPoint P1: lumbar5 (-0.02 0.04 0.0158123)
      PathPoint P2: lumbar2 (-0.041 -0.0117591 0.004)
    Thelen2003Muscle MF_m2t_1_r: max_isometric_force=17.94 optimal_fiber_length=0.0638826
        tendon_slack_length=0.01942145 pennation_angle_at_optimal=0
      PathPoint P1: sacrum (-0.120758 0.0852181 0.0204354)
      PathPoint P2: lumbar2 (-0.045 -0.01839 0.004)
    Thelen2003Muscle MF_m2t_2_r: max_isometric_force=45.54 optimal_fiber_length=0.080875 tendon_slack_length=0.0245875
        pennation_angle_at_optimal=0
      PathPoint P1: pelvis (-0.134 0.049 0.047)
      PathPoint P2: lumbar2 (-0.045 -0.01839 0.00364)
    Thelen2003Muscle MF_m2t_3_r: max_isometric_force=45.54 optimal_fiber_length=0.091657 tendon_slack_length=0.0278654
        pennation_angle_at_optimal=0
      PathPoint P1: pelvis (-0.137 0.036 0.045)
      PathPoint P2: lumbar2 (-0.044 -0.0187383 0.00236534)
    Thelen2003Muscle MF_m3s_r: max_isometric_force=24.84 optimal_fiber_length=0.039717 tendon_slack_length=0.01651236
        pennation_angle_at_optimal=0
      PathPoint P1: sacrum (-0.122 0.084 0.019)
      PathPoint P2: lumbar3 (-0.042 -0.00645328 0.00290733)
    Thelen2003Muscle MF_m3t_1_r: max_isometric_force=24 optimal_fiber_length=0.102818 tendon_slack_length=0.03423556
        pennation_angle_at_optimal=0
      PathPoint P1: pelvis (-0.153895 0.0020886 0.0163612)
      PathPoint P2: lumbar3 (-0.048 -0.0102252 0.00166214)
    Thelen2003Muscle MF_m3t_2_r: max_isometric_force=24 optimal_fiber_length=0.08536116 tendon_slack_length=0.0284229
        pennation_angle_at_optimal=0
      PathPoint P1: pelvis (-0.147053 0.0213268 0.0221121)
      PathPoint P2: lumbar3 (-0.048 -0.01023 0.00266)
    Thelen2003Muscle MF_m3t_3_r: max_isometric_force=24 optimal_fiber_length=0.08536116 tendon_slack_length=0.0284229
        pennation_angle_at_optimal=0
      PathPoint P1: pelvis (-0.147 0.021 0.022)
      PathPoint P2: lumbar3 (-0.048 -0.01023 0.00266)
    Thelen2003Muscle MF_m4s_r: max_isometric_force=24 optimal_fiber_length=0.037155 tendon_slack_length=0.02351
        pennation_angle_at_optimal=0
      PathPoint P1: sacrum (-0.143689 0.0547099 0.018)
      PathPoint P2: lumbar4 (-0.036 -0.00021522 0.00224284)
    Thelen2003Muscle MF_m4t_1_r: max_isometric_force=21.4 optimal_fiber_length=0.054815 tendon_slack_length=0.02221967
        pennation_angle_at_optimal=0
      PathPoint P1: sacrum (-0.152233 0.0415265 0.0153587)
      PathPoint P2: lumbar4 (-0.043 0.00016821 0.00288018)
    Thelen2003Muscle MF_m4t_2_r: max_isometric_force=21.4 optimal_fiber_length=0.07336 tendon_slack_length=0.0297369
        pennation_angle_at_optimal=0
      PathPoint P1: pelvis (-0.151 0.008 0.016)
      PathPoint P2: lumbar4 (-0.044 0.00017 0.00288)
    Thelen2003Muscle MF_m4t_3_r: max_isometric_force=21.4 optimal_fiber_length=0.084787 tendon_slack_length=0.034369
        pennation_angle_at_optimal=0
      PathPoint P1: pelvis (-0.16 -0.004 0.014)
      PathPoint P2: lumbar4 (-0.045 0.00017 0.00288)
    Thelen2003Muscle MF_m5s_r: max_isometric_force=10.35 optimal_fiber_length=0.0145575 tendon_slack_length=0.00644247
        pennation_angle_at_optimal=0
      PathPoint P1: sacrum (-0.130455 0.0662703 0.012)
      PathPoint P2: lumbar5 (-0.031 0.017 0.00392934)
    Thelen2003Muscle MF_m5t_1_r: max_isometric_force=10.35 optimal_fiber_length=0.0759196 tendon_slack_length=0.0307746
        pennation_angle_at_optimal=0
      PathPoint P1: sacrum (-0.174067 0.00522922 0.0100331)
      PathPoint P2: lumbar5 (-0.03551 0.016863 0.00292592)
    Thelen2003Muscle MF_m5t_2_r: max_isometric_force=10.35 optimal_fiber_length=0.056763 tendon_slack_length=0.02301
        pennation_angle_at_optimal=0
      PathPoint P1: sacrum (-0.163116 0.0256618 0.011708)
      PathPoint P2: lumbar5 (-0.0345516 0.0159287 0.00277147)
    Thelen2003Muscle MF_m5t_3_r: max_isometric_force=10.35 optimal_fiber_length=0.0403 tendon_slack_length=0.0070892
        pennation_angle_at_optimal=0
      PathPoint P1: sacrum (-0.152276 0.0425844 0.0115967)
      PathPoint P2: lumbar5 (-0.0328228 0.015247 0.00232083)
    Thelen2003Muscle MF_m1_laminar_r: max_isometric_force=8.85 optimal_fiber_length=0.03129
        tendon_slack_length=0.0118819 pennation_angle_at_optimal=0
      PathPoint P1: lumbar3 (-0.04 0.025 0.018)
      PathPoint P2: lumbar1 (-0.035 -0.00560525 0.008)
    Thelen2003Muscle MF_m2_laminar_r: max_isometric_force=10.2 optimal_fiber_length=0.02692174
        tendon_slack_length=0.01022244 pennation_angle_at_optimal=0
      PathPoint P1: lumbar4 (-0.033 0.034 0.01694)
      PathPoint P2: lumbar2 (-0.036 -0.006 0.007)
    Thelen2003Muscle MF_m3_laminar_r: max_isometric_force=10.615 optimal_fiber_length=0.02616
        tendon_slack_length=0.009933 pennation_angle_at_optimal=0
      PathPoint P1: lumbar5 (-0.022 0.039 0.016)
      PathPoint P2: lumbar3 (-0.038 0.00069045 0.00635)
    Thelen2003Muscle MF_m4_laminar_r: max_isometric_force=7.7 optimal_fiber_length=0.028602 tendon_slack_length=0.01086
        pennation_angle_at_optimal=0
      PathPoint P1: sacrum (-0.128 0.0774879 0.018)
      PathPoint P2: lumbar4 (-0.034 0.00581344 0.00694)
    Thelen2003Muscle MF_m5_laminar_r: max_isometric_force=16.6 optimal_fiber_length=0.02565
        tendon_slack_length=0.009739 pennation_angle_at_optimal=0
      PathPoint P1: pelvis (-0.138 0.045 0.012)
      PathPoint MF_m5_laminar_-P2: lumbar5 (-0.029 0.018 0.00564)
    Thelen2003Muscle IL_L1_r: max_isometric_force=97.275 optimal_fiber_length=0.05149358 tendon_slack_length=0.1089064
        pennation_angle_at_optimal=0.2408554
      PathPoint P1: pelvis (-0.143993 0.0390001 0.0503121)
      PathPoint P2: lumbar1 (-0.031 0.017 0.029)
      PathWrap: wrap_object=Cylinder2 method=hybrid
    Thelen2003Muscle IL_L2_r: max_isometric_force=138.1305 optimal_fiber_length=0.03726 tendon_slack_length=0.078918
        pennation_angle_at_optimal=0.2408554
      PathPoint P1: pelvis (-0.136 0.056 0.055)
      PathPoint P2: lumbar2 (-0.03245 0.012913 0.031)
      PathWrap: wrap_object=Cylinder method=hybrid
    Thelen2003Muscle IL_L3_r: max_isometric_force=163.422 optimal_fiber_length=0.025162 tendon_slack_length=0.053294
        pennation_angle_at_optimal=0.2408554
      PathPoint P1: pelvis (-0.122 0.068 0.06)
      PathPoint P2: lumbar3 (-0.0316877 0.0219341 0.0311389)
      PathWrap: wrap_object=Cylinder method=hybrid
    Thelen2003Muscle IL_L4_r: max_isometric_force=169.2585 optimal_fiber_length=0.01671 tendon_slack_length=0.035393
        pennation_angle_at_optimal=0.2408554
      PathPoint P1: pelvis (-0.117 0.065 0.056)
      PathPoint P2: lumbar4 (-0.0237666 0.0275638 0.031)
      PathWrap: wrap_object=Cylinder method=hybrid
    Thelen2003Muscle IL_R5_r: max_isometric_force=21.4005 optimal_fiber_length=0.15464 tendon_slack_length=0.216471
        pennation_angle_at_optimal=0.2408554
      PathPoint IL_r5_R-P1: pelvis (-0.136 0.044 0.049)
      PathPoint IL_r5_R-P2: lumbar2 (-0.0496298 0.002 0.056)
      PathPoint IL_r5_R-P2_0: torso (-0.079 0.172 0.057)
      PathPoint IL_r5_R-P3: torso (-0.08 0.2 0.057)
      PathPoint IL_r5_R-P4: torso (-0.081 0.237 0.058)
      PathPoint IL_r5_R-P5: torso (-0.079 0.265 0.059)
      PathPoint IL_r5_R-P6: torso (-0.076 0.287 0.059)
      PathPoint IL_r5_R-P7: torso (-0.07 0.308 0.06)
      PathWrap: wrap_object=Cylinder2 method=hybrid
    Thelen2003Muscle IL_R6_r: max_isometric_force=27.237 optimal_fiber_length=0.14826 tendon_slack_length=0.17931
        pennation_angle_at_optimal=0.2408554
      PathPoint IL_r6_R-P1: pelvis (-0.129 0.059 0.053)
      PathPoint IL_r6_R-P2: lumbar2 (-0.0492143 0.00236612 0.058)
      PathPoint IL_r6_R-P2_0: torso (-0.079 0.171 0.06)
      PathPoint IL_r6_R-P3: torso (-0.08 0.202 0.06)
      PathPoint IL_r6_R-P4: torso (-0.081 0.24 0.061)
      PathPoint IL_r6_R-P5: torso (-0.077 0.268 0.062)
      PathPoint IL_r6_R-P6: torso (-0.071 0.282 0.063)
      PathWrap: wrap_object=Cylinder2 method=hybrid
    Thelen2003Muscle IL_R7_r: max_isometric_force=35.019 optimal_fiber_length=0.155 tendon_slack_length=0.15356
        pennation_angle_at_optimal=0.2408554
      PathPoint IL_r7_R-P1: pelvis (-0.119 0.069 0.058)
      PathPoint IL_r7_R-P2: lumbar2 (-0.0486649 0.00237387 0.061)
      PathPoint IL_r7_R-P2_0: torso (-0.08 0.172 0.063)
      PathPoint IL_r7_R-P3: torso (-0.08 0.201 0.063)
      PathPoint IL_r7_R-P4: torso (-0.081 0.239 0.064)
      PathPoint IL_r7_R-P5: torso (-0.075 0.261 0.065)
    Thelen2003Muscle IL_R8_r: max_isometric_force=31.128 optimal_fiber_length=0.1391 tendon_slack_length=0.13081
        pennation_angle_at_optimal=0.2408554
      PathPoint IL_r8_R-P1: pelvis (-0.121 0.071 0.06)
      PathPoint IL_r8_R-P2: lumbar2 (-0.048 0.003 0.064)
      PathPoint IL_r8_R-P2_0: torso (-0.079 0.167 0.065)
      PathPoint IL_r8_R-P3: torso (-0.0811061 0.201 0.065)
      PathPoint IL_r8_R-P4: torso (-0.079 0.229 0.066)
    Thelen2003Muscle IL_R9_r: max_isometric_force=44.7465 optimal_fiber_length=0.1554 tendon_slack_length=0.08383
        pennation_angle_at_optimal=0.2408554
      PathPoint IL_r9_R-P1: pelvis (-0.119 0.075 0.06)
      PathPoint IL_r9_R-P2: lumbar2 (-0.048 0.003 0.066)
      PathPoint IL_r9_R-P2_0: torso (-0.08 0.169 0.068)
      PathPoint IL_r9_R-P3: torso (-0.076 0.193 0.068)
    Thelen2003Muscle IL_R10_r: max_isometric_force=89.493 optimal_fiber_length=0.1309 tendon_slack_length=0.06917
        pennation_angle_at_optimal=0.2408554
      PathPoint IL_r10_R-P1: pelvis (-0.117 0.072 0.062)
      PathPoint IL_r10_R-P2: lumbar2 (-0.0480883 0.00262684 0.069)
      PathPoint IL_r10_R-P2_0: torso (-0.075 0.155 0.07)
    Thelen2003Muscle IL_R11_r: max_isometric_force=110.8935 optimal_fiber_length=0.1161 tendon_slack_length=0.05062
        pennation_angle_at_optimal=0.2408554
      PathPoint IL_r11_R-P1: pelvis (-0.113 0.079 0.064)
      PathPoint IL_r11_R-P2: lumbar2 (-0.0479471 0.00270337 0.072)
      PathPoint IL_r11_R-P2_0: torso (-0.062 0.125 0.074)
    Thelen2003Muscle IL_R12_r: max_isometric_force=132.294 optimal_fiber_length=0.089 tendon_slack_length=0.03657
        pennation_angle_at_optimal=0.2408554
      PathPoint IL_r12_R-P1: pelvis (-0.111 0.082 0.067)
      PathPoint IL_r12_R-P2: torso (-0.032 0.095 0.067)
    Thelen2003Muscle LTpT_T1_r: max_isometric_force=25.2915 optimal_fiber_length=0.102785 tendon_slack_length=0.24305
        pennation_angle_at_optimal=0.2199115
      PathPoint LTpT_t1_R-P1: lumbar1 (-0.048 -0.013 0.00321)
      PathPoint LTpT_t1_R-P2: torso (-0.05 0.405 0.02615)
      PathWrap: wrap_object=Chest_r method=hybrid
    Thelen2003Muscle LTpT_T2_r: max_isometric_force=50.583 optimal_fiber_length=0.10611 tendon_slack_length=0.2555
        pennation_angle_at_optimal=0.2199115
      PathPoint LTpT_t2_R-P1: lumbar2 (-0.047 -0.015 0.00383)
      PathPoint LTpT_t2_R-P2: torso (-0.055 0.386 0.02654)
      PathWrap: wrap_object=Chest_r method=hybrid
    Thelen2003Muscle LTpT_T3_r: max_isometric_force=50.583 optimal_fiber_length=0.10673 tendon_slack_length=0.25648
        pennation_angle_at_optimal=0.2199115
      PathPoint LTpT_t3_R-P1: lumbar3 (-0.05 -0.004 0.004)
      PathPoint LTpT_t3_R-P2: lumbar1 (-0.03711 -0.01402 0.005)
      PathPoint LTpT_t3_R-P2_0: torso (-0.0614225 0.365086 0.0255244)
      PathWrap: wrap_object=Chest_r method=hybrid
    Thelen2003Muscle LTpT_T4_r: max_isometric_force=19.455 optimal_fiber_length=0.10676 tendon_slack_length=0.2566
        pennation_angle_at_optimal=0.2199115
      PathPoint LTpT_t4_R-P1: lumbar4 (-0.049 0.007 0.00282)
      PathPoint LTpT_t4_R-P2: lumbar1 (-0.0371129 -0.014 0.00612)
      PathPoint LTpT_t4_R-P2_0: torso (-0.07 0.343 0.02615)
      PathWrap: wrap_object=Chest_r method=hybrid
    Thelen2003Muscle LTpT_T5_r: max_isometric_force=19.455 optimal_fiber_length=0.10076 tendon_slack_length=0.24214
        pennation_angle_at_optimal=0.2199115
      PathPoint LTpT_t5_R-P1: lumbar4 (-0.049 0.004 -0.000432746)
      PathPoint LTpT_t5_R-P2: lumbar2 (-0.044 0.0044 0.0064)
      PathPoint LTpT_t5_R-P2_0: torso (-0.0739587 0.32 0.028)
      PathWrap: wrap_object=Chest_r method=hybrid
    Thelen2003Muscle LTpT_T6_r: max_isometric_force=29.1825 optimal_fiber_length=0.10311 tendon_slack_length=0.23597
        pennation_angle_at_optimal=0.2199115
      PathPoint LTpT_t6_R-P1: lumbar5 (-0.038 0.018 0.00021356)
      PathPoint LTpT_t6_R-P2: lumbar2 (-0.044 0.0044 0.009)
      PathPoint LTpT_t6_R-P3: torso (-0.0729686 0.190038 0.0152527)
      PathPoint LTpT_t6_R-P2_0: torso (-0.08 0.294 0.02766)
    Thelen2003Muscle LTpT_T7_r: max_isometric_force=35.019 optimal_fiber_length=0.11827 tendon_slack_length=0.22357
        pennation_angle_at_optimal=0.2199115
      PathPoint LTpT_t7_R-P1: sacrum (-0.131317 0.0605127 0.00027686)
      PathPoint LTpT_t7_R-P2: lumbar2 (-0.04399 0.0044 0.011)
      PathPoint LTpT_t7_R-P3: torso (-0.0726628 0.190681 0.019448)
      PathPoint LTpT_t7_R-P2_0: torso (-0.08 0.267 0.02647)
    Thelen2003Muscle LTpT_T8_r: max_isometric_force=56.4195 optimal_fiber_length=0.12614 tendon_slack_length=0.19968
        pennation_angle_at_optimal=0.2199115
      PathPoint LTpT_t8_R-P1: sacrum (-0.142901 0.0502456 0.00037451)
      PathPoint LTpT_t8_R-P2: lumbar4 (-0.0469739 0.0180443 0.00565735)
      PathPoint LTpT_t8_R-P3: lumbar3 (-0.0467498 0.0135459 0.00831636)
      PathPoint LTpT_t8_R-P2_0: lumbar2 (-0.0453159 0.00310151 0.01094)
      PathPoint LTpT_t8_R-P2_1: torso (-0.079 0.241 0.0255)
    Thelen2003Muscle LTpT_T9_r: max_isometric_force=66.147 optimal_fiber_length=0.12436 tendon_slack_length=0.21077
        pennation_angle_at_optimal=0.2199115
      PathPoint LTpT_t9_R-P1: sacrum (-0.165822 0.0268352 0)
      PathPoint LTpT_t9_R-P2: lumbar4 (-0.04672 0.01796 0.00748)
      PathPoint LTpT_t9_R-P3: lumbar3 (-0.0464295 0.0138534 0.00968998)
      PathPoint LTpT_t9_R-P3_0: lumbar2 (-0.0447163 0.00347304 0.0115)
      PathPoint LTpT_t9_R-P2_0: torso (-0.075 0.222 0.0241501)
    Thelen2003Muscle LTpT_T10_r: max_isometric_force=71.9835 optimal_fiber_length=0.1123 tendon_slack_length=0.171608
        pennation_angle_at_optimal=0.2199115
      PathPoint LTpT_t10_R-P1: sacrum (-0.164463 0.0245611 0.01072)
      PathPoint LTpT_t10_R-P2: lumbar4 (-0.04672 0.01796 0.01256)
      PathPoint LTpT_t10_R-P2_0: lumbar3 (-0.0461 0.01403 0.01441)
      PathPoint LTpT_t10_R-P3: lumbar2 (-0.044 0.00338 0.01525)
      PathPoint LTpT_t10_R-P2_1: torso (-0.068 0.193 0.0181)
    Thelen2003Muscle LTpT_T11_r: max_isometric_force=73.929 optimal_fiber_length=0.098023 tendon_slack_length=0.149396
        pennation_angle_at_optimal=0.2199115
      PathPoint LTpT_t11_R-P1: sacrum (-0.157649 0.0307094 0.02404)
      PathPoint LTpT_t11_R-P2: lumbar4 (-0.04672 0.017 0.02194)
      PathPoint LTpT_t11_R-P3: lumbar3 (-0.0501482 0.0134888 0.020885)
      PathPoint LTpT_t11_R-P2_0: lumbar2 (-0.046 0.00338 0.01983)
      PathPoint LTpT_t11_R-P2_1: torso (-0.059 0.161718 0.01762)
    Thelen2003Muscle LTpT_T12_r: max_isometric_force=62.256 optimal_fiber_length=0.077981 tendon_slack_length=0.11885
        pennation_angle_at_optimal=0.2199115
      PathPoint LTpT_t12_R-P1: sacrum (-0.14476 0.0488 0.02793)
      PathPoint LTpT_t12_R-P2: lumbar4 (-0.04672 0.017 0.02524)
      PathPoint LTpT_t12_R-P3: lumbar3 (-0.0493674 0.0140564 0.0238974)
      PathPoint LTpT_t12_R-P2_0: lumbar2 (-0.0458028 0.00398333 0.0225543)
      PathPoint LTpT_t12_R-P2_1: torso (-0.051 0.133 0.0178539)
    Thelen2003Muscle LTpT_R4_r: max_isometric_force=19.455 optimal_fiber_length=0.135533 tendon_slack_length=0.206564
        pennation_angle_at_optimal=0.2199115
      PathPoint LTpT_r4_R-P1: lumbar4 (-0.05 0.00705986 0.00282013)
      PathPoint LTpT_r4_R-P2: lumbar2 (-0.05 0.00545622 0.0114779)
      PathPoint LTpT_r4_R-P2_0: torso (-0.073 0.19 0.0259954)
      PathPoint LTpT_r4_R-P3: torso (-0.074 0.215 0.0285848)
      PathPoint LTpT_r4_R-P4: torso (-0.074 0.243 0.0311206)
      PathPoint LTpT_r4_R-P5: torso (-0.073 0.273 0.0335195)
      PathPoint LTpT_r4_R-P6: torso (-0.065 0.342 0.038393)
    Thelen2003Muscle LTpT_R5_r: max_isometric_force=19.455 optimal_fiber_length=0.1270107 tendon_slack_length=0.193575
        pennation_angle_at_optimal=0.2199115
      PathPoint LTpT_r5_R-P1: lumbar4 (-0.049 0.004 8e-5)
      PathPoint LTpT_r5_R-P2: lumbar2 (-0.049 0.00463268 0.0141962)
      PathPoint LTpT_r5_R-P2_0: torso (-0.076 0.188 0.0299068)
      PathPoint LTpT_r5_R-P3: torso (-0.075 0.214 0.0319682)
      PathPoint LTpT_r5_R-P4: torso (-0.076 0.243 0.0346445)
      PathPoint LTpT_r5_R-P5: torso (-0.074 0.271 0.037)
      PathPoint LTpT_r5_R-P6: torso (-0.065 0.313 0.0391932)
    Thelen2003Muscle LTpT_R6_r: max_isometric_force=29.1825 optimal_fiber_length=0.135678 tendon_slack_length=0.184737
        pennation_angle_at_optimal=0.2199115
      PathPoint LTpT_r6_R-P1: lumbar5 (-0.038 0.02 0.00021)
      PathPoint LTpT_r6_R-P2: lumbar3 (-0.05 0.0147336 0.010844)
      PathPoint LTpT_r6_R-P2_0: lumbar2 (-0.046 0.0044 0.014)
      PathPoint LTpT_r6_R-P2_1: torso (-0.076 0.187 0.0310073)
      PathPoint LTpT_r6_R-P3: torso (-0.076 0.213 0.0346608)
      PathPoint LTpT_r6_R-P4: torso (-0.077 0.242 0.0373467)
      PathPoint LTpT_r6_R-P5: torso (-0.073 0.271 0.04)
      PathPoint LTpT_r6_R-P6: torso (-0.069 0.29 0.04)
    Thelen2003Muscle LTpT_R7_r: max_isometric_force=35.019 optimal_fiber_length=0.129543 tendon_slack_length=0.194195
        pennation_angle_at_optimal=0.2199115
      PathPoint LTpT_r7_R-P1: sacrum (-0.13132 0.06051 0.00028)
      PathPoint LTpT_r7_R-P2: lumbar4 (-0.0467202 0.0188294 0.00812957)
      PathPoint LTpT_r7_R-P2_0: lumbar3 (-0.0461005 0.0141694 0.0128553)
      PathPoint LTpT_r7_R-P2_1: lumbar2 (-0.04399 0.00431532 0.0172724)
      PathPoint LTpT_r7_R-P2_2: torso (-0.078 0.185 0.0354903)
      PathPoint LTpT_r7_R-P3: torso (-0.079 0.211 0.0395886)
      PathPoint LTpT_r7_R-P4: torso (-0.077 0.243 0.0422488)
      PathPoint LTpT_r7_R-P5: torso (-0.074 0.269 0.0433327)
    Thelen2003Muscle LTpT_R8_r: max_isometric_force=56.4195 optimal_fiber_length=0.106076 tendon_slack_length=0.198398
        pennation_angle_at_optimal=0.2199115
      PathPoint LTpT_r8_R-P1: sacrum (-0.1429 0.05025 0.00037)
      PathPoint LTpT_r8_R-P2: lumbar4 (-0.0465288 0.0181236 0.0113934)
      PathPoint LTpT_r8_R-P2_0: lumbar3 (-0.0459248 0.014 0.0160395)
      PathPoint LTpT_r8_R-P2_1: lumbar2 (-0.04399 0.00388 0.0205414)
      PathPoint LTpT_r8_R-P2_2: torso (-0.079 0.185 0.0407129)
      PathPoint LTpT_r8_R-P3: torso (-0.079 0.209 0.0437166)
      PathPoint LTpT_r8_R-P4: torso (-0.076 0.238 0.0463537)
    Thelen2003Muscle LTpT_R9_r: max_isometric_force=66.147 optimal_fiber_length=0.091522 tendon_slack_length=0.207985
        pennation_angle_at_optimal=0.2199115
      PathPoint LTpT_r9_R-P1: sacrum (-0.16582 0.02684 0)
      PathPoint LTpT_r9_R-P2: lumbar4 (-0.0467202 0.0176814 0.0148901)
      PathPoint LTpT_r9_R-P2_0: lumbar3 (-0.0461005 0.0130235 0.0195821)
      PathPoint LTpT_r9_R-P2_1: lumbar2 (-0.0439905 0.00393671 0.0241884)
      PathPoint LTpT_r9_R-P2_2: torso (-0.079 0.183 0.043359)
      PathPoint LTpT_r9_R-P3: torso (-0.077 0.203 0.0467599)
    Thelen2003Muscle LTpT_R10_r: max_isometric_force=71.9835 optimal_fiber_length=0.107241 tendon_slack_length=0.165678
        pennation_angle_at_optimal=0.2199115
      PathPoint LTpT_r10_R-P1: sacrum (-0.16446 0.02456 0.01072)
      PathPoint LTpT_r10_R-P2: lumbar4 (-0.0466654 0.0168641 0.0194391)
      PathPoint LTpT_r10_R-P2_0: lumbar3 (-0.0460454 0.012674 0.023454)
      PathPoint LTpT_r10_R-P2_1: lumbar2 (-0.0439356 0.00364643 0.027333)
      PathPoint LTpT_r10_R-P2_2: torso (-0.077 0.176 0.0468867)
    Thelen2003Muscle LTpT_R11_r: max_isometric_force=73.929 optimal_fiber_length=0.104511 tendon_slack_length=0.131312
        pennation_angle_at_optimal=0.2199115
      PathPoint LTpT_r11_R-P1: sacrum (-0.15765 0.03071 0.02404)
      PathPoint LTpT_r11_R-P2: lumbar4 (-0.0461 0.01796 0.0294188)
      PathPoint LTpT_r11_R-P3: lumbar3 (-0.0461 0.0139338 0.0325773)
      PathPoint LTpT_r11_R-P4: lumbar2 (-0.0440238 0.00448 0.0355734)
      PathPoint LTpT_r11_R-P2_0: torso (-0.0650216 0.147656 0.045555)
    Thelen2003Muscle LTpT_R12_r: max_isometric_force=62.256 optimal_fiber_length=0.0633 tendon_slack_length=0.123
        pennation_angle_at_optimal=0.2199115
      PathPoint LTpT_r12_R-P1: sacrum (-0.14476 0.0488 0.02793)
      PathPoint LTpT_r12_R-P2: lumbar4 (-0.04672 0.0175766 0.0335072)
      PathPoint LTpT_r12_R-P2_0: lumbar3 (-0.0461 0.0136439 0.0358736)
      PathPoint LTpT_r12_R-P2_1: lumbar2 (-0.044 0.0044 0.0388153)
      PathPoint LTpT_r12_R-P2_2: torso (-0.0450351 0.12 0.0466148)
      PathWrap: wrap_object=Cylinder2 method=hybrid
    Thelen2003Muscle LTpL_L5_r: max_isometric_force=103.1115 optimal_fiber_length=0.051468 tendon_slack_length=0.001
        pennation_angle_at_optimal=0.2199115
      PathPoint P1: sacrum (-0.138531 0.0631285 0.0455109)
      PathPoint P2: lumbar5 (-0.013153 0.028534 0.0258423)
    Thelen2003Muscle LTpL_L4_r: max_isometric_force=99.2205 optimal_fiber_length=0.039244 tendon_slack_length=0.042404
        pennation_angle_at_optimal=0.2199115
      PathPoint P1: pelvis (-0.133 0.041 0.048)
      PathPoint P2: lumbar4 (-0.023 0.027038 0.0254663)
    Thelen2003Muscle LTpL_L3_r: max_isometric_force=91.4385 optimal_fiber_length=0.054869 tendon_slack_length=0.0596
        pennation_angle_at_optimal=0.2199115
      PathPoint P1: pelvis (-0.14 0.041 0.051)
      PathPoint P2: lumbar3 (-0.0297706 0.0229639 0.0232018)
    Thelen2003Muscle LTpL_L2_r: max_isometric_force=81.711 optimal_fiber_length=0.067743 tendon_slack_length=0.0744
        pennation_angle_at_optimal=0.2199115
      PathPoint P1: pelvis (-0.142 0.037 0.053)
      PathPoint P2: lumbar2 (-0.0299692 0.0143552 0.0220597)
    Thelen2003Muscle LTpL_L1_r: max_isometric_force=70.038 optimal_fiber_length=0.08127 tendon_slack_length=0.0944
        pennation_angle_at_optimal=0.2199115
      PathPoint P1: pelvis (-0.144121 0.0335392 0.0535739)
      PathPoint P2: lumbar1 (-0.0316208 0.0166569 0.0228226)
      PathWrap: wrap_object=Cylinder2 method=hybrid
    Thelen2003Muscle EO1_r: max_isometric_force=111.744 optimal_fiber_length=0.0358775 tendon_slack_length=0.0569831
        pennation_angle_at_optimal=0
      PathPoint P1: Abdomen (0.006 0.048 0.021)
      PathPoint P2: torso (0.093 0.174 0.093)
    Thelen2003Muscle EO2_r: max_isometric_force=132.3546 optimal_fiber_length=0.0379268 tendon_slack_length=0.055165
        pennation_angle_at_optimal=0
      PathPoint P1: torso (0.091 0.141 0.105)
      PathPoint P2: Abdomen (0.008 0.023 0.033)
    Thelen2003Muscle EO3_r: max_isometric_force=138.8978 optimal_fiber_length=0.038402 tendon_slack_length=0.046576
        pennation_angle_at_optimal=0
      PathPoint P1: torso (0.0785075 0.10052 0.113587)
      PathPoint P2: Abdomen (0.00677141 -0.008 0.033)
    Thelen2003Muscle EO4_r: max_isometric_force=134.0928 optimal_fiber_length=0.03929399 tendon_slack_length=0.044785
        pennation_angle_at_optimal=0
      PathPoint P1: torso (0.0697082 0.0831956 0.112156)
      PathPoint default: Abdomen (0.006 -0.024 0.031)
    Thelen2003Muscle EO5_r: max_isometric_force=155.945 optimal_fiber_length=0.0470542 tendon_slack_length=0.0515216
        pennation_angle_at_optimal=0
      PathPoint P1: torso (0.001 0.11 0.112)
      PathPoint P2: pelvis (-0.055 0.082 0.102)
    Thelen2003Muscle EO6_r: max_isometric_force=226.9645 optimal_fiber_length=0.05652438 tendon_slack_length=0.05713
        pennation_angle_at_optimal=0
      PathPoint P1: torso (-0.011 0.093 0.1)
      PathPoint P2: pelvis (-0.069 0.093 0.098)
    Thelen2003Muscle IO1_r: max_isometric_force=123.9794 optimal_fiber_length=0.04229777 tendon_slack_length=0.06399
        pennation_angle_at_optimal=0
      PathPoint P1: Abdomen (0.00306951 -0.047 0.044)
      PathPoint P2: pelvis (-0.009 0.025 0.126)
    Thelen2003Muscle IO2_r: max_isometric_force=150.0727 optimal_fiber_length=0.0435 tendon_slack_length=0.0659496
        pennation_angle_at_optimal=0
      PathPoint P1: Abdomen (0.003 -0.022 0.052)
      PathPoint P2: pelvis (-0.024 0.049 0.128)
    Thelen2003Muscle IO3_r: max_isometric_force=151.2072 optimal_fiber_length=0.0516783 tendon_slack_length=0.07835
        pennation_angle_at_optimal=0
      PathPoint P1: Abdomen (0.005 0.007 0.049)
      PathPoint P2: pelvis (-0.039 0.069 0.117)
    Thelen2003Muscle IO4_r: max_isometric_force=179.0459 optimal_fiber_length=0.06969329 tendon_slack_length=0.04696
        pennation_angle_at_optimal=0
      PathPoint P1: torso (0.066 0.108 0.121)
      PathPoint P2: pelvis (-0.053 0.082 0.1)
    Thelen2003Muscle IO5_r: max_isometric_force=157.0833 optimal_fiber_length=0.05683505 tendon_slack_length=0.038296
        pennation_angle_at_optimal=0
      PathPoint P1: torso (0.03 0.096 0.115)
      PathPoint P2: pelvis (-0.074 0.094 0.079)
    Thelen2003Muscle IO6_r: max_isometric_force=138.6115 optimal_fiber_length=0.05439 tendon_slack_length=0.03665
        pennation_angle_at_optimal=0
      PathPoint P1: torso (0 0.086 0.1)
      PathPoint P2: pelvis (-0.09 0.088 0.066)
    Thelen2003Muscle rect_abd_l_0: max_isometric_force=163 optimal_fiber_length=0.2238 tendon_slack_length=0.017
        pennation_angle_at_optimal=0 FmaxTendonStrain=0.033 FmaxMuscleStrain=0.6 KshapeActive=0.5 KshapePassive=4
        Af=0.3 Flen=1.8 activation_time_constant=0.01 deactivation_time_constant=0.04
      PathPoint rect_abd_l-P1: pelvis (-0.026 -0.07 -0.011)
      PathPoint rect_abd_l-P2: torso (0.092 0.221663 -0.031)
    Thelen2003Muscle Ps_L1_VB_l: max_isometric_force=160.4797 optimal_fiber_length=0.1841 tendon_slack_length=0.0647
        pennation_angle_at_optimal=0.18675
      PathPoint P1: lumbar1 (-0.0101595 0.02327 -0.02)
      PathPoint P2: pelvis (-0.0238 -0.057 -0.0759)
      ConditionalPathPoint P3: pelvis (-0.0288 -0.0805 -0.0816) socket_coordinate=/jointset/hip_l/hip_flexion_l
          range=(-1.5708 0.785398)
      PathPoint P4: femur_l (0.0016 -0.0507 -0.0038)
      PathPoint P5: femur_l (-0.0188 -0.0597 -0.0104)
    Thelen2003Muscle Ps_L1_TP_l: max_isometric_force=46.32404 optimal_fiber_length=0.1818 tendon_slack_length=0.0639
        pennation_angle_at_optimal=0.18675
      PathPoint P1: lumbar1 (-0.02325 0.0146584 -0.02263)
      PathPoint P2: pelvis (-0.0238 -0.057 -0.0759)
      ConditionalPathPoint P3: pelvis (-0.0288 -0.0805 -0.0816) socket_coordinate=/jointset/hip_l/hip_flexion_l
          range=(-1.5708 0.785398)
      PathPoint P4: femur_l (0.0016 -0.0507 -0.0038)
      PathPoint P5: femur_l (-0.0188 -0.0597 -0.0104)
    Thelen2003Muscle Ps_L1_L2_IVD_l: max_isometric_force=91.32454 optimal_fiber_length=0.166 tendon_slack_length=0.0583
        pennation_angle_at_optimal=0.1867502
      PathPoint P1: lumbar1 (-0.00125362 0.00350798 -0.02068)
      PathPoint P2: pelvis (-0.0238 -0.057 -0.0759)
      ConditionalPathPoint P3: pelvis (-0.0288 -0.0805 -0.0816) socket_coordinate=/jointset/hip_l/hip_flexion_l
          range=(-1.5708 0.785398)
      PathPoint P4: femur_l (0.0016 -0.0507 -0.0038)
      PathPoint P5: femur_l (-0.0188 -0.0597 -0.0104)
    Thelen2003Muscle Ps_L2_TP_l: max_isometric_force=160.4797 optimal_fiber_length=0.1597 tendon_slack_length=0.0561
        pennation_angle_at_optimal=0.1867502
      PathPoint P1: lumbar2 (-0.0216214 0.014587 -0.02225)
      PathPoint P2: pelvis (-0.0238 -0.057 -0.0759)
      ConditionalPathPoint P3: pelvis (-0.0288 -0.0805 -0.0816) socket_coordinate=/jointset/hip_l/hip_flexion_l
          range=(-1.5708 0.785398)
      PathPoint P4: femur_l (0.0016 -0.0507 -0.0038)
      PathPoint P5: femur_l (-0.0188 -0.0597 -0.0104)
    Thelen2003Muscle Ps_L2_L3_IVD_l: max_isometric_force=90.5635 optimal_fiber_length=0.144 tendon_slack_length=0.0506
        pennation_angle_at_optimal=0.1867502
      PathPoint P1: lumbar2 (0.00196252 0.00338519 -0.02145)
      PathPoint P2: pelvis (-0.0238 -0.057 -0.0759)
      ConditionalPathPoint P3: pelvis (-0.0288 -0.0805 -0.0816) socket_coordinate=/jointset/hip_l/hip_flexion_l
          range=(-1.5708 0.785398)
      PathPoint P4: femur_l (0.0016 -0.0507 -0.0038)
      PathPoint P5: femur_l (-0.0188 -0.0597 -0.0104)
    Thelen2003Muscle Ps_L3_TP_l: max_isometric_force=76.86482 optimal_fiber_length=0.1394 tendon_slack_length=0.049
        pennation_angle_at_optimal=0.1867502
      PathPoint P1: lumbar3 (-0.0245065 0.0207283 -0.02826)
      PathPoint P2: pelvis (-0.0238 -0.057 -0.0759)
      ConditionalPathPoint P3: pelvis (-0.0288 -0.0805 -0.0816) socket_coordinate=/jointset/hip_l/hip_flexion_l
          range=(-1.5708 0.785398)
      PathPoint P4: femur_l (0.0016 -0.0507 -0.0038)
      PathPoint P5: femur_l (-0.0188 -0.0597 -0.0104)
    Thelen2003Muscle Ps_L3_L4_IVD_l: max_isometric_force=27.39736 optimal_fiber_length=0.1235
        tendon_slack_length=0.0434 pennation_angle_at_optimal=0.1867502
      PathPoint P1: lumbar3 (0.00115193 0.00621063 -0.02115)
      PathPoint P2: pelvis (-0.0238 -0.057 -0.0759)
      ConditionalPathPoint P3: pelvis (-0.0288 -0.0805 -0.0816) socket_coordinate=/jointset/hip_l/hip_flexion_l
          range=(-1.5708 0.785398)
      PathPoint P4: femur_l (0.0016 -0.0507 -0.0038)
      PathPoint P5: femur_l (-0.0188 -0.0597 -0.0104)
    Thelen2003Muscle Ps_L4_TP_l: max_isometric_force=122.4278 optimal_fiber_length=0.1195 tendon_slack_length=0.042
        pennation_angle_at_optimal=0.1867502
      PathPoint P1: lumbar4 (-0.015649 0.0249464 -0.02588)
      PathPoint P2: pelvis (-0.0238 -0.057 -0.0759)
      ConditionalPathPoint P3: pelvis (-0.0288 -0.0805 -0.0816) socket_coordinate=/jointset/hip_l/hip_flexion_l
          range=(-1.5708 0.785398)
      PathPoint P4: femur_l (0.0016 -0.0507 -0.0038)
      PathPoint P5: femur_l (-0.0188 -0.0597 -0.0104)
    Thelen2003Muscle Ps_L4_L5_IVD_l: max_isometric_force=60.12199 optimal_fiber_length=0.0998
        tendon_slack_length=0.0351 pennation_angle_at_optimal=0.1867502
      PathPoint P1: lumbar4 (0.00541963 0.00394754 -0.0206)
      PathPoint P2: pelvis (-0.0238 -0.057 -0.0759)
      ConditionalPathPoint P3: pelvis (-0.0288 -0.0805 -0.0816) socket_coordinate=/jointset/hip_l/hip_flexion_l
          range=(-1.5708 0.785398)
      PathPoint P4: femur_l (0.0016 -0.0507 -0.0038)
      PathPoint P5: femur_l (-0.0188 -0.0597 -0.0104)
    Thelen2003Muscle Ps_L5_TP_l: max_isometric_force=131.6595 optimal_fiber_length=0.1034 tendon_slack_length=0.0363
        pennation_angle_at_optimal=0.1867502
      PathPoint P1: lumbar5 (-0.00562001 0.0291398 -0.02529)
      PathPoint P2: pelvis (-0.0238 -0.057 -0.0759)
      ConditionalPathPoint P3: pelvis (-0.0288 -0.0805 -0.0816) socket_coordinate=/jointset/hip_l/hip_flexion_l
          range=(-1.5708 0.785398)
      PathPoint P4: femur_l (0.0016 -0.0507 -0.0038)
      PathPoint P5: femur_l (-0.0188 -0.0597 -0.0104)
    Thelen2003Muscle Ps_L5_VB_l: max_isometric_force=145.3582 optimal_fiber_length=0.0903 tendon_slack_length=0.0317
        pennation_angle_at_optimal=0.1867502
      PathPoint P1: lumbar5 (0.01 0.01241 -0.019)
      PathPoint P2: pelvis (-0.0238 -0.057 -0.0759)
      ConditionalPathPoint P3: pelvis (-0.0288 -0.0805 -0.0816) socket_coordinate=/jointset/hip_l/hip_flexion_l
          range=(-1.5708 0.785398)
      PathPoint P4: femur_l (0.0016 -0.0507 -0.0038)
      PathPoint P5: femur_l (-0.0188 -0.0597 -0.0104)
    Thelen2003Muscle QL_post_I_1-L3_l: max_isometric_force=18.2 optimal_fiber_length=0.03836231
        tendon_slack_length=0.03218577 pennation_angle_at_optimal=0.1291544
      PathPoint I.1_l-P1: pelvis (-0.113577 0.0794995 -0.0581971)
      PathPoint L3_TP_l-P2: lumbar3 (-0.029 0.02 -0.0303)
    Thelen2003Muscle QL_post_I_2-L4_l: max_isometric_force=24.2 optimal_fiber_length=0.02219488
        tendon_slack_length=0.01862138 pennation_angle_at_optimal=0.1291544
      PathPoint I_2_l-P1: pelvis (-0.106 0.081 -0.063)
      PathPoint L4_TP_l-P2: lumbar4 (-0.022 0.02605 -0.03)
    Thelen2003Muscle QL_post_I_2-L3_l: max_isometric_force=14.1 optimal_fiber_length=0.05023
        tendon_slack_length=0.04214269 pennation_angle_at_optimal=0.1291544
      PathPoint I_2_l-P1: pelvis (-0.106 0.081 -0.063)
      PathPoint L3_TP_l-P2: lumbar3 (-0.029 0.01963 -0.0303)
    Thelen2003Muscle QL_post_I_2-L2_l: max_isometric_force=8.8 optimal_fiber_length=0.03478374
        tendon_slack_length=0.0191 pennation_angle_at_optimal=0.1291544
      PathPoint I_2_l-P1: pelvis (-0.106 0.081 -0.063)
      PathPoint L2_TP_l-P2: lumbar2 (-0.031 0.012 -0.0303)
    Thelen2003Muscle QL_post_I_3-L1_l: max_isometric_force=12.92 optimal_fiber_length=0.08560792
        tendon_slack_length=0.04446546 pennation_angle_at_optimal=0.1291544
      PathPoint L1_TP_l-P1: lumbar1 (-0.0318695 0.0143282 -0.032)
      PathPoint I_3_l-P1: pelvis (-0.098 0.089 -0.066)
    Thelen2003Muscle QL_post_I_3-L2_l: max_isometric_force=13.6 optimal_fiber_length=0.05041593
        tendon_slack_length=0.04229869 pennation_angle_at_optimal=0.1291544
      PathPoint L2_TP_l-P2: lumbar2 (-0.031 0.012 -0.0303)
      PathPoint I_3_l-P1: pelvis (-0.098 0.089 -0.066)
    Thelen2003Muscle QL_post_I_3-L3_l: max_isometric_force=23.2 optimal_fiber_length=0.03605963
        tendon_slack_length=0.0302538 pennation_angle_at_optimal=0.1291544
      PathPoint L3_TP_l-P2: lumbar3 (-0.029 0.01963 -0.0303)
      PathPoint I_3_l-P1: pelvis (-0.098 0.089 -0.066)
    Thelen2003Muscle QL_mid_L3-12_3_l: max_isometric_force=5.8 optimal_fiber_length=0.05463846
        tendon_slack_length=0.02837967 pennation_angle_at_optimal=0.1291544
      PathPoint quadratus_lumb_mid_L3_1_r-P1: torso (-0.0419115 0.11237 -0.05166)
      PathPoint quadratus_lumb_mid_L3_1_r-P2: lumbar3 (-0.0293616 0.0217307 -0.03038)
    Thelen2003Muscle QL_mid_L3-12_2_l: max_isometric_force=6.6 optimal_fiber_length=0.05793535
        tendon_slack_length=0.0300921 pennation_angle_at_optimal=0.1291544
      PathPoint quadratus_lumb_mid_L3_2_r-P2: torso (-0.0424782 0.119222 -0.04319)
      PathPoint quadratus_lumb_mid_L3_2_r-P3: lumbar3 (-0.02936 0.02173 -0.03038)
    Thelen2003Muscle QL_mid_L3-12_1_l: max_isometric_force=11 optimal_fiber_length=0.06305602
        tendon_slack_length=0.03275182 pennation_angle_at_optimal=0.1291544
      PathPoint quadratus_lumb_mid_L3_3_r-P2: torso (-0.0412845 0.1282 -0.03119)
      PathPoint quadratus_lumb_mid_L3_3_r-P3: lumbar3 (-0.02936 0.02173 -0.03038)
    Thelen2003Muscle QL_mid_L2-12_1_l: max_isometric_force=9.2 optimal_fiber_length=0.04077783
        tendon_slack_length=0.02118034 pennation_angle_at_optimal=0.1291544
      PathPoint P1: torso (-0.04128 0.1282 -0.03119)
      PathPoint P1_0: lumbar2 (-0.0291214 0.0168959 -0.02562)
    Thelen2003Muscle QL_mid_L4-12_3_l: max_isometric_force=5.4 optimal_fiber_length=0.07288648
        tendon_slack_length=0.03785784 pennation_angle_at_optimal=0.1291544
      PathPoint quadratus_lumb_mid_L4_1_r-P1: torso (-0.0417825 0.112316 -0.05167)
      PathPoint quadratus_lumb_mid_L4_1_r-P2: lumbar4 (-0.0213825 0.0307 -0.02806)
    Thelen2003Muscle QL_ant_I_2-T12_l: max_isometric_force=7.1 optimal_fiber_length=0.1045452
        tendon_slack_length=0.054301 pennation_angle_at_optimal=0.1291544
      PathPoint I_2_l-P1: pelvis (-0.106 0.081 -0.063)
      PathPoint T12_l-P2: torso (-0.01 0.131 -0.019)
    Thelen2003Muscle QL_ant_I_3-T12_l: max_isometric_force=13.34 optimal_fiber_length=0.1033426
        tendon_slack_length=0.05367702 pennation_angle_at_optimal=0.1291544
      PathPoint I_3_l-P1: pelvis (-0.098 0.089 -0.066)
      PathPoint T12_l-P2: torso (-0.01 0.131 -0.019)
    Thelen2003Muscle QL_ant_I_2-12_1_l: max_isometric_force=4.7 optimal_fiber_length=0.09988925
        tendon_slack_length=0.0518833 pennation_angle_at_optimal=0.1291544
      PathPoint I_2_l-P2: pelvis (-0.106 0.081 -0.063)
      PathPoint 12.1_l-P3: torso (-0.041 0.118 -0.043)
    Thelen2003Muscle QL_ant_I_3-12_1_l: max_isometric_force=8.9 optimal_fiber_length=0.0986533
        tendon_slack_length=0.05124134 pennation_angle_at_optimal=0.1291544
      PathPoint I_3_l-P1: pelvis (-0.098 0.089 -0.066)
      PathPoint 12.1_l-P2: torso (-0.04 0.124 -0.037)
    Thelen2003Muscle QL_ant_I_3-12_2_l: max_isometric_force=5.9 optimal_fiber_length=0.09285171
        tendon_slack_length=0.04822795 pennation_angle_at_optimal=0.1291544
      PathPoint I_3_l-P1: pelvis (-0.098 0.089 -0.066)
      PathPoint 12.2_l-P2: torso (-0.04024 0.11786 -0.04608)
    Thelen2003Muscle QL_ant_I_3-12_3_l: max_isometric_force=6.8 optimal_fiber_length=0.08691859
        tendon_slack_length=0.0451 pennation_angle_at_optimal=0.1291544
      PathPoint I_3_l-P2: pelvis (-0.098 0.089 -0.066)
      PathPoint 12.3_l-P3: torso (-0.038 0.111 -0.055)
    Thelen2003Muscle MF_m1s_l: max_isometric_force=18.4 optimal_fiber_length=0.04684634 tendon_slack_length=0.01947641
        pennation_angle_at_optimal=0
      PathPoint P1: lumbar4 (-0.033 0.032 -0.017)
      PathPoint P2: lumbar1 (-0.037 -0.013 -0.003)
    Thelen2003Muscle MF_m1t_1_l: max_isometric_force=19.32 optimal_fiber_length=0.0751687 tendon_slack_length=0.0225396
        pennation_angle_at_optimal=0
      PathPoint P1: lumbar5 (-0.0186347 0.0369697 -0.01759)
      PathPoint P2: lumbar1 (-0.044 -0.0160046 -0.0031)
    Thelen2003Muscle MF_m1t_2_l: max_isometric_force=16.56 optimal_fiber_length=0.09431214
        tendon_slack_length=0.0282798 pennation_angle_at_optimal=0
      PathPoint P1: sacrum (-0.121424 0.0839766 -0.021)
      PathPoint P2: lumbar1 (-0.044 -0.016 -0.0031)
    Thelen2003Muscle MF_m1t_3_l: max_isometric_force=27.66 optimal_fiber_length=0.103 tendon_slack_length=0.03088368
        pennation_angle_at_optimal=0
      PathPoint P1: pelvis (-0.132 0.054 -0.048)
      PathPoint P2: lumbar1 (-0.044 -0.016 -0.0031)
    Thelen2003Muscle MF_m2s_l: max_isometric_force=17.94 optimal_fiber_length=0.0453974 tendon_slack_length=0.01756569
        pennation_angle_at_optimal=0
      PathPoint P1: lumbar5 (-0.02 0.04 -0.01581)
      PathPoint P2: lumbar2 (-0.041 -0.012 -0.004)
    Thelen2003Muscle MF_m2t_1_l: max_isometric_force=17.94 optimal_fiber_length=0.0638826
        tendon_slack_length=0.01942145 pennation_angle_at_optimal=0
      PathPoint P1: sacrum (-0.120758 0.0852181 -0.022)
      PathPoint P2: lumbar2 (-0.045 -0.01839 -0.00364)
    Thelen2003Muscle MF_m2t_2_l: max_isometric_force=45.54 optimal_fiber_length=0.080875 tendon_slack_length=0.0245875
        pennation_angle_at_optimal=0
      PathPoint P1: pelvis (-0.134 0.049 -0.047)
      PathPoint P2: lumbar2 (-0.045 -0.01839 -0.00364)
    Thelen2003Muscle MF_m2t_3_l: max_isometric_force=45.54 optimal_fiber_length=0.091657 tendon_slack_length=0.0278654
        pennation_angle_at_optimal=0
      PathPoint P1: pelvis (-0.137 0.036 -0.045)
      PathPoint P2: lumbar2 (-0.044 -0.0187383 -0.00364)
    Thelen2003Muscle MF_m3s_l: max_isometric_force=24.84 optimal_fiber_length=0.039717 tendon_slack_length=0.01651236
        pennation_angle_at_optimal=0
      PathPoint P1: sacrum (-0.121511 0.0836358 -0.019)
      PathPoint P2: lumbar3 (-0.036 -0.006 -0.003)
    Thelen2003Muscle MF_m3t_1_l: max_isometric_force=24 optimal_fiber_length=0.102818 tendon_slack_length=0.03423556
        pennation_angle_at_optimal=0
      PathPoint P1: pelvis (-0.154 0.002 -0.016)
      PathPoint P2: lumbar3 (-0.048 -0.0102252 -0.00291)
    Thelen2003Muscle MF_m3t_2_l: max_isometric_force=24 optimal_fiber_length=0.08536116 tendon_slack_length=0.0284229
        pennation_angle_at_optimal=0
      PathPoint P1: pelvis (-0.147 0.021 -0.02185)
      PathPoint P2: lumbar3 (-0.048 -0.01023 -0.00266)
    Thelen2003Muscle MF_m3t_3_l: max_isometric_force=24 optimal_fiber_length=0.08536116 tendon_slack_length=0.0284229
        pennation_angle_at_optimal=0
      PathPoint P1: pelvis (-0.147 0.021 -0.02185)
      PathPoint P2: lumbar3 (-0.048 -0.01023 -0.00266)
    Thelen2003Muscle MF_m4s_l: max_isometric_force=24 optimal_fiber_length=0.037155 tendon_slack_length=0.02351
        pennation_angle_at_optimal=0
      PathPoint P1: sacrum (-0.143689 0.0547099 -0.018)
      PathPoint P2: lumbar4 (-0.036 -0.00021522 -0.002)
    Thelen2003Muscle MF_m4t_1_l: max_isometric_force=21.4 optimal_fiber_length=0.054815 tendon_slack_length=0.02221967
        pennation_angle_at_optimal=0
      PathPoint P1: sacrum (-0.152 0.042 -0.015)
      PathPoint P2: lumbar4 (-0.043 0 -0.003)
    Thelen2003Muscle MF_m4t_2_l: max_isometric_force=21.4 optimal_fiber_length=0.07336 tendon_slack_length=0.0297369
        pennation_angle_at_optimal=0
      PathPoint P1: pelvis (-0.151 0.008 -0.016)
      PathPoint P2: lumbar4 (-0.044 0.00017 -0.00288)
    Thelen2003Muscle MF_m4t_3_l: max_isometric_force=21.4 optimal_fiber_length=0.084787 tendon_slack_length=0.034369
        pennation_angle_at_optimal=0
      PathPoint P1: pelvis (-0.16 -0.004 -0.014)
      PathPoint P2: lumbar4 (-0.0441 0.00017 -0.003)
    Thelen2003Muscle MF_m5s_l: max_isometric_force=10.35 optimal_fiber_length=0.0145575 tendon_slack_length=0.00644247
        pennation_angle_at_optimal=0
      PathPoint P1: sacrum (-0.130455 0.0662703 -0.012)
      PathPoint P2: lumbar5 (-0.031 0.017 -0.004)
    Thelen2003Muscle MF_m5t_1_l: max_isometric_force=10.35 optimal_fiber_length=0.0759196 tendon_slack_length=0.0307746
        pennation_angle_at_optimal=0
      PathPoint P1: sacrum (-0.174067 0.00522922 -0.01003)
      PathPoint P2: lumbar5 (-0.03551 0.016863 -0.00293)
    Thelen2003Muscle MF_m5t_2_l: max_isometric_force=10.35 optimal_fiber_length=0.056763 tendon_slack_length=0.02301
        pennation_angle_at_optimal=0
      PathPoint P1: sacrum (-0.163116 0.0256618 -0.01171)
      PathPoint P2: lumbar5 (-0.0345516 0.0159287 -0.00293)
    Thelen2003Muscle MF_m5t_3_l: max_isometric_force=10.35 optimal_fiber_length=0.0403 tendon_slack_length=0.0070892
        pennation_angle_at_optimal=0
      PathPoint P1: sacrum (-0.152276 0.0425844 -0.0116)
      PathPoint P2: lumbar5 (-0.0328228 0.015247 -0.00277)
    Thelen2003Muscle MF_m1_laminar_l: max_isometric_force=8.85 optimal_fiber_length=0.03129
        tendon_slack_length=0.0118819 pennation_angle_at_optimal=0
      PathPoint P1: lumbar3 (-0.04 0.02527 -0.018)
      PathPoint P2: lumbar1 (-0.035 -0.00560525 -0.008)
    Thelen2003Muscle MF_m2_laminar_l: max_isometric_force=10.2 optimal_fiber_length=0.02692174
        tendon_slack_length=0.01022244 pennation_angle_at_optimal=0
      PathPoint P1: lumbar4 (-0.033 0.0335037 -0.01694)
      PathPoint P2: lumbar2 (-0.036 -0.006 -0.007)
    Thelen2003Muscle MF_m3_laminar_l: max_isometric_force=10.615 optimal_fiber_length=0.02616
        tendon_slack_length=0.009933 pennation_angle_at_optimal=0
      PathPoint P1: lumbar5 (-0.022 0.039 -0.01617)
      PathPoint P2: lumbar3 (-0.038 0.001 -0.006)
    Thelen2003Muscle MF_m4_laminar_l: max_isometric_force=7.7 optimal_fiber_length=0.028602 tendon_slack_length=0.01086
        pennation_angle_at_optimal=0
      PathPoint P1: sacrum (-0.128 0.0774879 -0.018)
      PathPoint P2: lumbar4 (-0.034 0.00581344 -0.00694)
    Thelen2003Muscle MF_m5_laminar_l: max_isometric_force=16.6 optimal_fiber_length=0.02565
        tendon_slack_length=0.009739 pennation_angle_at_optimal=0
      PathPoint P1: pelvis (-0.138 0.045 -0.01238)
      PathPoint P2: lumbar5 (-0.029 0.018 -0.00564)
    Thelen2003Muscle IL_L1_l: max_isometric_force=97.275 optimal_fiber_length=0.05149358 tendon_slack_length=0.1089064
        pennation_angle_at_optimal=0.2408554
      PathPoint P1: pelvis (-0.144 0.039 -0.05)
      PathPoint P2: lumbar1 (-0.031 0.017 -0.029)
      PathWrap: wrap_object=Cylinder2 method=hybrid
    Thelen2003Muscle IL_L2_l: max_isometric_force=138.1305 optimal_fiber_length=0.03726 tendon_slack_length=0.078918
        pennation_angle_at_optimal=0.2408554
      PathPoint P1: pelvis (-0.136 0.056 -0.055)
      PathPoint P2: lumbar2 (-0.032 0.013 -0.031)
      PathWrap: wrap_object=Cylinder method=hybrid
    Thelen2003Muscle IL_L3_l: max_isometric_force=163.422 optimal_fiber_length=0.025162 tendon_slack_length=0.053294
        pennation_angle_at_optimal=0.2408554
      PathPoint P1: pelvis (-0.122 0.068 -0.06)
      PathPoint P2: lumbar3 (-0.032 0.022 -0.0305391)
      PathWrap: wrap_object=Cylinder method=hybrid
    Thelen2003Muscle IL_L4_l: max_isometric_force=169.2585 optimal_fiber_length=0.01671 tendon_slack_length=0.035393
        pennation_angle_at_optimal=0.2408554
      PathPoint P1: pelvis (-0.117 0.065 -0.056)
      PathPoint P2: lumbar4 (-0.0237666 0.0275638 -0.031)
      PathWrap: wrap_object=Cylinder method=hybrid
    Thelen2003Muscle IL_R5_l: max_isometric_force=21.4005 optimal_fiber_length=0.15464 tendon_slack_length=0.216471
        pennation_angle_at_optimal=0.2408554
      PathPoint IL_r5_R-P1: pelvis (-0.135908 0.0438379 -0.0489845)
      PathPoint IL_r5_R-P2: lumbar2 (-0.0496298 0.00211134 -0.056)
      PathPoint IL_r5_R-P2_0: torso (-0.078 0.172 -0.057)
      PathPoint IL_r5_R-P3: torso (-0.08 0.2 -0.057)
      PathPoint IL_r5_R-P4: torso (-0.081 0.237 -0.058)
      PathPoint IL_r5_R-P5: torso (-0.079 0.265 -0.059)
      PathPoint IL_r5_R-P6: torso (-0.076 0.287 -0.059)
      PathPoint IL_r5_R-P7: torso (-0.07 0.308 -0.06)
      PathWrap: wrap_object=Cylinder2 method=hybrid
    Thelen2003Muscle IL_R6_l: max_isometric_force=27.237 optimal_fiber_length=0.14826 tendon_slack_length=0.17931
        pennation_angle_at_optimal=0.2408554
      PathPoint IL_r6_R-P1: pelvis (-0.128722 0.0586615 -0.0529753)
      PathPoint IL_r6_R-P2: lumbar2 (-0.0492143 0.002 -0.058)
      PathPoint IL_r6_R-P2_0: torso (-0.079 0.1719 -0.06)
      PathPoint IL_r6_R-P3: torso (-0.079 0.202 -0.06)
      PathPoint IL_r6_R-P4: torso (-0.08 0.24 -0.061)
      PathPoint IL_r6_R-P5: torso (-0.077 0.268 -0.062)
      PathPoint IL_r6_R-P6: torso (-0.071 0.282 -0.063)
      PathWrap: wrap_object=Cylinder2 method=hybrid
    Thelen2003Muscle IL_R7_l: max_isometric_force=35.019 optimal_fiber_length=0.155 tendon_slack_length=0.15356
        pennation_angle_at_optimal=0.2408554
      PathPoint IL_r7_R-P1: pelvis (-0.11891 0.0692658 -0.0580751)
      PathPoint IL_r7_R-P2: lumbar2 (-0.0486649 0.00237387 -0.061)
      PathPoint IL_r7_R-P2_0: torso (-0.08 0.172 -0.063)
      PathPoint IL_r7_R-P3: torso (-0.08 0.201 -0.063)
      PathPoint IL_r7_R-P4: torso (-0.081 0.239 -0.064)
      PathPoint IL_r7_R-P5: torso (-0.075 0.261 -0.065)
    Thelen2003Muscle IL_R8_l: max_isometric_force=31.128 optimal_fiber_length=0.1391 tendon_slack_length=0.13081
        pennation_angle_at_optimal=0.2408554
      PathPoint IL_r8_R-P1: pelvis (-0.121 0.071 -0.06)
      PathPoint IL_r8_R-P2: lumbar2 (-0.048 0.00285524 -0.064)
      PathPoint IL_r8_R-P2_0: torso (-0.079 0.167 -0.065)
      PathPoint IL_r8_R-P3: torso (-0.081 0.201 -0.065)
      PathPoint IL_r8_R-P4: torso (-0.079 0.229 -0.066)
    Thelen2003Muscle IL_R9_l: max_isometric_force=44.7465 optimal_fiber_length=0.1554 tendon_slack_length=0.08383
        pennation_angle_at_optimal=0.2408554
      PathPoint IL_r9_R-P1: pelvis (-0.119 0.075 -0.06)
      PathPoint IL_r9_R-P2: lumbar2 (-0.0483524 0.00265461 -0.066)
      PathPoint IL_r9_R-P2_0: torso (-0.078 0.164 -0.068)
      PathPoint IL_r9_R-P3: torso (-0.076 0.193 -0.068)
    Thelen2003Muscle IL_R10_l: max_isometric_force=89.493 optimal_fiber_length=0.1309 tendon_slack_length=0.06917
        pennation_angle_at_optimal=0.2408554
      PathPoint IL_r10_R-P1: pelvis (-0.116 0.076 -0.062)
      PathPoint IL_r10_R-P2: lumbar2 (-0.0480883 0.00262684 -0.069)
      PathPoint IL_r10_R-P2_0: torso (-0.0749575 0.155 -0.07)
    Thelen2003Muscle IL_R11_l: max_isometric_force=110.8935 optimal_fiber_length=0.1161 tendon_slack_length=0.05062
        pennation_angle_at_optimal=0.2408554
      PathPoint IL_r11_R-P1: pelvis (-0.113 0.079 -0.064)
      PathPoint IL_r11_R-P2: lumbar2 (-0.0479471 0.00270337 -0.072)
      PathPoint IL_r11_R-P2_0: torso (-0.0624397 0.125 -0.074)
    Thelen2003Muscle IL_R12_l: max_isometric_force=132.294 optimal_fiber_length=0.089 tendon_slack_length=0.03657
        pennation_angle_at_optimal=0.2408554
      PathPoint IL_r12_R-P1: pelvis (-0.111 0.0819447 -0.0665628)
      PathPoint IL_r12_R-P2: torso (-0.0320122 0.0953599 -0.067)
    Thelen2003Muscle LTpT_T1_l: max_isometric_force=25.2915 optimal_fiber_length=0.102785 tendon_slack_length=0.24305
        pennation_angle_at_optimal=0.2199115
      PathPoint LTpT_t1_R-P1: lumbar1 (-0.048 -0.013 -0.00321)
      PathPoint LTpT_t1_R-P2: torso (-0.05 0.405 -0.02615)
      PathWrap: wrap_object=Chest_l method=hybrid
    Thelen2003Muscle LTpT_T2_l: max_isometric_force=50.583 optimal_fiber_length=0.10611 tendon_slack_length=0.2555
        pennation_angle_at_optimal=0.2199115
      PathPoint LTpT_t2_R-P1: lumbar2 (-0.047 -0.014 -0.004)
      PathPoint LTpT_t2_R-P2: torso (-0.055 0.386 -0.02654)
      PathWrap: wrap_object=Chest_l method=hybrid
    Thelen2003Muscle LTpT_T3_l: max_isometric_force=50.583 optimal_fiber_length=0.10673 tendon_slack_length=0.25648
        pennation_angle_at_optimal=0.2199115
      PathPoint LTpT_t3_R-P1: lumbar3 (-0.049 -0.004 -0.00407)
      PathPoint LTpT_t3_R-P2: lumbar1 (-0.03711 -0.01402 -0.005)
      PathPoint LTpT_t3_R-P2_0: torso (-0.061 0.365 -0.02598)
      PathWrap: wrap_object=Chest_l method=hybrid
    Thelen2003Muscle LTpT_T4_l: max_isometric_force=19.455 optimal_fiber_length=0.10676 tendon_slack_length=0.2566
        pennation_angle_at_optimal=0.2199115
      PathPoint LTpT_t4_R-P1: lumbar4 (-0.049 0.00705986 -0.00282)
      PathPoint LTpT_t4_R-P2: lumbar1 (-0.0371129 -0.0140247 -0.00612)
      PathPoint LTpT_t4_R-P2_0: torso (-0.07 0.343 -0.02615)
      PathWrap: wrap_object=Chest_l method=hybrid
    Thelen2003Muscle LTpT_T5_l: max_isometric_force=19.455 optimal_fiber_length=0.10076 tendon_slack_length=0.24214
        pennation_angle_at_optimal=0.2199115
      PathPoint LTpT_t5_R-P1: lumbar4 (-0.0473001 0.00396965 -8e-5)
      PathPoint LTpT_t5_R-P2: lumbar2 (-0.044 0.0044 -0.0064)
      PathPoint LTpT_t5_R-P2_0: torso (-0.074 0.32 -0.02808)
      PathWrap: wrap_object=Chest_l method=hybrid
    Thelen2003Muscle LTpT_T6_l: max_isometric_force=29.1825 optimal_fiber_length=0.10311 tendon_slack_length=0.23597
        pennation_angle_at_optimal=0.2199115
      PathPoint LTpT_t6_R-P1: lumbar5 (-0.038 0.018 -0.00021)
      PathPoint LTpT_t6_R-P2: lumbar2 (-0.044 0.0044 -0.009)
      PathPoint LTpT_t6_R-P3: torso (-0.073 0.19 -0.01547)
      PathPoint LTpT_t6_R-P2_0: torso (-0.08 0.294 -0.02766)
    Thelen2003Muscle LTpT_T7_l: max_isometric_force=35.019 optimal_fiber_length=0.11827 tendon_slack_length=0.22357
        pennation_angle_at_optimal=0.2199115
      PathPoint LTpT_t7_R-P1: sacrum (-0.131317 0.0605127 -0.00028)
      PathPoint LTpT_t7_R-P2: lumbar2 (-0.04399 0.0044 -0.011)
      PathPoint LTpT_t7_R-P3: torso (-0.073 0.191 -0.019)
      PathPoint LTpT_t7_R-P2_0: torso (-0.08 0.267 -0.026)
    Thelen2003Muscle LTpT_T8_l: max_isometric_force=56.4195 optimal_fiber_length=0.12614 tendon_slack_length=0.19968
        pennation_angle_at_optimal=0.2199115
      PathPoint LTpT_t8_R-P1: sacrum (-0.142901 0.0502456 -0.00037)
      PathPoint LTpT_t8_R-P2: lumbar4 (-0.0469739 0.0180443 -0.00566)
      PathPoint LTpT_t8_R-P3: lumbar3 (-0.0467498 0.0135459 -0.00832)
      PathPoint LTpT_t8_R-P2_0: lumbar2 (-0.0453159 0.00310151 -0.01094)
      PathPoint LTpT_t8_R-P2_1: torso (-0.079 0.241 -0.0255)
    Thelen2003Muscle LTpT_T9_l: max_isometric_force=66.147 optimal_fiber_length=0.12436 tendon_slack_length=0.21077
        pennation_angle_at_optimal=0.2199115
      PathPoint LTpT_t9_R-P1: sacrum (-0.165822 0.0268352 0)
      PathPoint LTpT_t9_R-P2: lumbar4 (-0.04672 0.01796 -0.00748)
      PathPoint LTpT_t9_R-P3: lumbar3 (-0.0464295 0.0138534 -0.00969)
      PathPoint LTpT_t9_R-P3_0: lumbar2 (-0.0447163 0.00347304 -0.012)
      PathPoint LTpT_t9_R-P2_0: torso (-0.075 0.222 -0.024)
    Thelen2003Muscle LTpT_T10_l: max_isometric_force=71.9835 optimal_fiber_length=0.1123 tendon_slack_length=0.171608
        pennation_angle_at_optimal=0.2199115
      PathPoint LTpT_t10_R-P1: sacrum (-0.164463 0.0245611 -0.01072)
      PathPoint LTpT_t10_R-P2: lumbar4 (-0.04672 0.01796 -0.01256)
      PathPoint LTpT_t10_R-P2_0: lumbar3 (-0.0461 0.01403 -0.01441)
      PathPoint LTpT_t10_R-P3: lumbar2 (-0.044 0.00338 -0.01525)
      PathPoint LTpT_t10_R-P2_1: torso (-0.068 0.193 -0.018)
    Thelen2003Muscle LTpT_T11_l: max_isometric_force=73.929 optimal_fiber_length=0.098023 tendon_slack_length=0.149396
        pennation_angle_at_optimal=0.2199115
      PathPoint LTpT_t11_R-P1: sacrum (-0.157649 0.0307094 -0.02404)
      PathPoint LTpT_t11_R-P2: lumbar4 (-0.04672 0.017 -0.02194)
      PathPoint LTpT_t11_R-P3: lumbar3 (-0.0501482 0.0134888 -0.02088)
      PathPoint LTpT_t11_R-P2_0: lumbar2 (-0.046 0.00338 -0.01983)
      PathPoint LTpT_t11_R-P2_1: torso (-0.060879 0.161718 -0.01762)
    Thelen2003Muscle LTpT_T12_l: max_isometric_force=62.256 optimal_fiber_length=0.077981 tendon_slack_length=0.11885
        pennation_angle_at_optimal=0.2199115
      PathPoint LTpT_t12_R-P1: sacrum (-0.14476 0.0488 -0.028)
      PathPoint LTpT_t12_R-P2: lumbar4 (-0.04672 0.017 -0.025)
      PathPoint LTpT_t12_R-P3: lumbar3 (-0.0493674 0.0140564 -0.024)
      PathPoint LTpT_t12_R-P2_0: lumbar2 (-0.0458028 0.00398333 -0.023)
      PathPoint LTpT_t12_R-P2_1: torso (-0.051 0.133 -0.018)
    Thelen2003Muscle LTpT_R4_l: max_isometric_force=19.455 optimal_fiber_length=0.135533 tendon_slack_length=0.206564
        pennation_angle_at_optimal=0.2199115
      PathPoint LTpT_r4_R-P1: lumbar4 (-0.05 0.007 -0.00282)
      PathPoint LTpT_r4_R-P2: lumbar2 (-0.05 0.005 -0.01148)
      PathPoint LTpT_r4_R-P2_0: torso (-0.073 0.19 -0.026)
      PathPoint LTpT_r4_R-P3: torso (-0.074 0.215 -0.02858)
      PathPoint LTpT_r4_R-P4: torso (-0.074 0.243 -0.03112)
      PathPoint LTpT_r4_R-P5: torso (-0.073 0.273 -0.03352)
      PathPoint LTpT_r4_R-P6: torso (-0.065 0.342 -0.03839)
    Thelen2003Muscle LTpT_R5_l: max_isometric_force=19.455 optimal_fiber_length=0.1270107 tendon_slack_length=0.193575
        pennation_angle_at_optimal=0.2199115
      PathPoint LTpT_r5_R-P1: lumbar4 (-0.049 0.00396965 -8e-5)
      PathPoint LTpT_r5_R-P2: lumbar2 (-0.049 0.014 -0.0142)
      PathPoint LTpT_r5_R-P2_0: torso (-0.076 0.188 -0.02991)
      PathPoint LTpT_r5_R-P3: torso (-0.075 0.213 -0.03197)
      PathPoint LTpT_r5_R-P4: torso (-0.076 0.243 -0.03464)
      PathPoint LTpT_r5_R-P5: torso (-0.074 0.271 -0.03652)
      PathPoint LTpT_r5_R-P6: torso (-0.065 0.313 -0.03919)
    Thelen2003Muscle LTpT_R6_l: max_isometric_force=29.1825 optimal_fiber_length=0.135678 tendon_slack_length=0.184737
        pennation_angle_at_optimal=0.2199115
      PathPoint LTpT_r6_R-P1: lumbar5 (-0.038 0.02 -0.00021)
      PathPoint LTpT_r6_R-P2: lumbar3 (-0.05 0.0147336 -0.01084)
      PathPoint LTpT_r6_R-P2_0: lumbar2 (-0.046 0.0044 -0.014)
      PathPoint LTpT_r6_R-P2_1: torso (-0.076 0.187 -0.031)
      PathPoint LTpT_r6_R-P3: torso (-0.076 0.213 -0.03466)
      PathPoint LTpT_r6_R-P4: torso (-0.077 0.242 -0.03735)
      PathPoint LTpT_r6_R-P5: torso (-0.073 0.271 -0.03952)
      PathPoint LTpT_r6_R-P6: torso (-0.069 0.29 -0.0401)
    Thelen2003Muscle LTpT_R7_l: max_isometric_force=35.019 optimal_fiber_length=0.129543 tendon_slack_length=0.194195
        pennation_angle_at_optimal=0.2199115
      PathPoint LTpT_r7_R-P1: sacrum (-0.13132 0.061 -0.00028)
      PathPoint LTpT_r7_R-P2: lumbar4 (-0.0467202 0.019 -0.008)
      PathPoint LTpT_r7_R-P2_0: lumbar3 (-0.0461005 0.014 -0.01286)
      PathPoint LTpT_r7_R-P2_1: lumbar2 (-0.04399 0.004 -0.01727)
      PathPoint LTpT_r7_R-P2_2: torso (-0.078 0.185 -0.03549)
      PathPoint LTpT_r7_R-P3: torso (-0.079 0.211 -0.03959)
      PathPoint LTpT_r7_R-P4: torso (-0.077 0.243 -0.04225)
      PathPoint LTpT_r7_R-P5: torso (-0.074 0.269 -0.04333)
    Thelen2003Muscle LTpT_R8_l: max_isometric_force=56.4195 optimal_fiber_length=0.106076 tendon_slack_length=0.198398
        pennation_angle_at_optimal=0.2199115
      PathPoint LTpT_r8_R-P1: sacrum (-0.1429 0.05025 -0.00037)
      PathPoint LTpT_r8_R-P2: lumbar4 (-0.0465288 0.0181236 -0.01139)
      PathPoint LTpT_r8_R-P2_0: lumbar3 (-0.0459248 0.0135047 -0.01604)
      PathPoint LTpT_r8_R-P2_1: lumbar2 (-0.04399 0.00388 -0.02054)
      PathPoint LTpT_r8_R-P2_2: torso (-0.079 0.185 -0.04071)
      PathPoint LTpT_r8_R-P3: torso (-0.079 0.209 -0.04372)
      PathPoint LTpT_r8_R-P4: torso (-0.076 0.238 -0.04635)
    Thelen2003Muscle LTpT_R9_l: max_isometric_force=66.147 optimal_fiber_length=0.091522 tendon_slack_length=0.207985
        pennation_angle_at_optimal=0.2199115
      PathPoint LTpT_r9_R-P1: sacrum (-0.16582 0.02684 0)
      PathPoint LTpT_r9_R-P2: lumbar4 (-0.0467202 0.0176814 -0.01489)
      PathPoint LTpT_r9_R-P2_0: lumbar3 (-0.0461005 0.0130235 -0.01958)
      PathPoint LTpT_r9_R-P2_1: lumbar2 (-0.0439905 0.00393671 -0.02419)
      PathPoint LTpT_r9_R-P2_2: torso (-0.079 0.183 -0.04336)
      PathPoint LTpT_r9_R-P3: torso (-0.077 0.203 -0.047)
    Thelen2003Muscle LTpT_R10_l: max_isometric_force=71.9835 optimal_fiber_length=0.107241 tendon_slack_length=0.165678
        pennation_angle_at_optimal=0.2199115
      PathPoint LTpT_r10_R-P1: sacrum (-0.16446 0.02456 -0.01072)
      PathPoint LTpT_r10_R-P2: lumbar4 (-0.0466654 0.0168641 -0.01944)
      PathPoint LTpT_r10_R-P2_0: lumbar3 (-0.0460454 0.012674 -0.02345)
      PathPoint LTpT_r10_R-P2_1: lumbar2 (-0.0439356 0.00364643 -0.02733)
      PathPoint LTpT_r10_R-P2_2: torso (-0.077 0.176 -0.047)
    Thelen2003Muscle LTpT_R11_l: max_isometric_force=73.929 optimal_fiber_length=0.104511 tendon_slack_length=0.131312
        pennation_angle_at_optimal=0.2199115
      PathPoint LTpT_r11_R-P1: sacrum (-0.15765 0.03071 -0.02404)
      PathPoint LTpT_r11_R-P2: lumbar4 (-0.0461 0.01796 -0.02942)
      PathPoint LTpT_r11_R-P3: lumbar3 (-0.0461 0.0139338 -0.03258)
      PathPoint LTpT_r11_R-P4: lumbar2 (-0.0440238 0.00448 -0.03557)
      PathPoint LTpT_r11_R-P2_0: torso (-0.0650216 0.147656 -0.04556)
    Thelen2003Muscle LTpT_R12_l: max_isometric_force=62.256 optimal_fiber_length=0.0633 tendon_slack_length=0.123
        pennation_angle_at_optimal=0.2199115
      PathPoint LTpT_r12_R-P1: sacrum (-0.14476 0.049 -0.028)
      PathPoint LTpT_r12_R-P2: lumbar4 (-0.047 0.018 -0.034)
      PathPoint LTpT_r12_R-P2_0: lumbar3 (-0.0461 0.0136439 -0.03587)
      PathPoint LTpT_r12_R-P2_1: lumbar2 (-0.044 0.0044 -0.03882)
      PathPoint LTpT_r12_R-P2_2: torso (-0.0450351 0.12 -0.047)
      PathWrap: wrap_object=Cylinder2 method=hybrid
    Thelen2003Muscle LTpL_L5_l: max_isometric_force=103.1115 optimal_fiber_length=0.051468 tendon_slack_length=0.001
        pennation_angle_at_optimal=0.2199115
      PathPoint P1: sacrum (-0.139 0.063 -0.046)
      PathPoint P2: lumbar5 (-0.013 0.029 -0.026)
    Thelen2003Muscle LTpL_L4_l: max_isometric_force=99.2205 optimal_fiber_length=0.039244 tendon_slack_length=0.042404
        pennation_angle_at_optimal=0.2199115
      PathPoint P1: pelvis (-0.133 0.041 -0.048)
      PathPoint P2: lumbar4 (-0.023 0.027 -0.025)
    Thelen2003Muscle LTpL_L3_l: max_isometric_force=91.4385 optimal_fiber_length=0.054869 tendon_slack_length=0.0596
        pennation_angle_at_optimal=0.2199115
      PathPoint P1: pelvis (-0.14 0.041 -0.051)
      PathPoint P2: lumbar3 (-0.03 0.023 -0.023)
    Thelen2003Muscle LTpL_L2_l: max_isometric_force=81.711 optimal_fiber_length=0.067743 tendon_slack_length=0.0744
        pennation_angle_at_optimal=0.2199115
      PathPoint P1: pelvis (-0.142 0.037 -0.053)
      PathPoint P2: lumbar2 (-0.03 0.014 -0.022)
    Thelen2003Muscle LTpL_L1_l: max_isometric_force=70.038 optimal_fiber_length=0.08127 tendon_slack_length=0.0944
        pennation_angle_at_optimal=0.2199115
      PathPoint P1: pelvis (-0.144 0.034 -0.054)
      PathPoint P2: lumbar1 (-0.032 0.017 -0.023)
      PathWrap: wrap_object=Cylinder2 method=hybrid
    Thelen2003Muscle EO1_l: max_isometric_force=111.744 optimal_fiber_length=0.0358775 tendon_slack_length=0.0569831
        pennation_angle_at_optimal=0
      PathPoint P1: Abdomen (0.006 0.048 -0.021)
      PathPoint P2: torso (0.0895924 0.170642 -0.0991386)
    Thelen2003Muscle EO2_l: max_isometric_force=132.3546 optimal_fiber_length=0.0379268 tendon_slack_length=0.055165
        pennation_angle_at_optimal=0
      PathPoint P1: torso (0.091 0.141 -0.10478)
      PathPoint P2: Abdomen (0.008 0.023 -0.033)
    Thelen2003Muscle EO3_l: max_isometric_force=138.8978 optimal_fiber_length=0.038402 tendon_slack_length=0.046576
        pennation_angle_at_optimal=0
      PathPoint P1: torso (0.079 0.101 -0.114)
      PathPoint P2: Abdomen (0.00663296 -0.00763095 -0.0325901)
    Thelen2003Muscle EO4_l: max_isometric_force=134.0928 optimal_fiber_length=0.03929399 tendon_slack_length=0.044785
        pennation_angle_at_optimal=0
      PathPoint P1: torso (0.07 0.083 -0.112)
      PathPoint P2: Abdomen (0.0063871 -0.0235714 -0.0306404)
    Thelen2003Muscle EO5_l: max_isometric_force=155.945 optimal_fiber_length=0.0470542 tendon_slack_length=0.0515216
        pennation_angle_at_optimal=0
      PathPoint P1: torso (0.000805328 0.110148 -0.111596)
      PathPoint P2: pelvis (-0.054703 0.0815326 -0.102158)
    Thelen2003Muscle EO6_l: max_isometric_force=226.9645 optimal_fiber_length=0.05652438 tendon_slack_length=0.05713
        pennation_angle_at_optimal=0
      PathPoint P1: torso (-0.011 0.093 -0.1)
      PathPoint P2: pelvis (-0.069 0.093 -0.089)
    Thelen2003Muscle IO1_l: max_isometric_force=123.9794 optimal_fiber_length=0.04229777 tendon_slack_length=0.06399
        pennation_angle_at_optimal=0
      PathPoint P1: Abdomen (0.003 -0.047 -0.044)
      PathPoint P2: pelvis (-0.00903731 0.0246453 -0.126019)
    Thelen2003Muscle IO2_l: max_isometric_force=150.0727 optimal_fiber_length=0.0435 tendon_slack_length=0.0659496
        pennation_angle_at_optimal=0
      PathPoint P1: Abdomen (0.003 -0.022 -0.052)
      PathPoint P2: pelvis (-0.0242023 0.0485047 -0.127423)
    Thelen2003Muscle IO3_l: max_isometric_force=151.2072 optimal_fiber_length=0.0516783 tendon_slack_length=0.07835
        pennation_angle_at_optimal=0
      PathPoint P1: Abdomen (0.005 0.007 -0.049)
      PathPoint P2: pelvis (-0.0385031 0.0687193 -0.116768)
    Thelen2003Muscle IO4_l: max_isometric_force=179.0459 optimal_fiber_length=0.06969329 tendon_slack_length=0.04696
        pennation_angle_at_optimal=0
      PathPoint P1: torso (0.0656579 0.107855 -0.121297)
      PathPoint P2: pelvis (-0.052598 0.0818011 -0.0996565)
    Thelen2003Muscle IO5_l: max_isometric_force=157.0833 optimal_fiber_length=0.05683505 tendon_slack_length=0.038296
        pennation_angle_at_optimal=0
      PathPoint P1: torso (0.0302908 0.0959854 -0.114995)
      PathPoint P2: pelvis (-0.0738758 0.0936339 -0.0790343)
    Thelen2003Muscle IO6_l: max_isometric_force=138.6115 optimal_fiber_length=0.05439 tendon_slack_length=0.03665
        pennation_angle_at_optimal=0
      PathPoint P1: torso (0 0.086 -0.1)
      PathPoint P2: pelvis (-0.09 0.088 -0.066)
    Thelen2003Muscle LD_L1_l: max_isometric_force=41.4 optimal_fiber_length=0.316063 tendon_slack_length=0.0692329
        pennation_angle_at_optimal=0
      PathPoint P1: lumbar1 (-0.045 -0.013 -0.00433)
      PathPoint P2: humerus_l (-0.00948737 -0.01525 -0.00269)
      PathWrap: wrap_object=Chest_l method=hybrid
    Thelen2003Muscle LD_L2_l: max_isometric_force=41.4 optimal_fiber_length=0.338256 tendon_slack_length=0.0740942
        pennation_angle_at_optimal=0
      PathPoint P1: lumbar2 (-0.043 -0.01341 -0.00415)
      PathPoint P2: humerus_l (-0.00949 -0.01525 -0.00269)
      PathWrap: wrap_object=Chest_l method=hybrid
    Thelen2003Muscle LD_L3_l: max_isometric_force=50.6 optimal_fiber_length=0.3550696 tendon_slack_length=0.077777
        pennation_angle_at_optimal=0
      PathPoint P1: lumbar3 (-0.046 -0.004 -0.00386)
      PathPoint P2: humerus_l (-0.00949 -0.01525 -0.00433)
      PathWrap: wrap_object=Chest_l method=hybrid
    Thelen2003Muscle LD_L4_l: max_isometric_force=50.6 optimal_fiber_length=0.3719192 tendon_slack_length=0.081468
        pennation_angle_at_optimal=0
      PathPoint P1: lumbar4 (-0.045 0.005 -0.00462)
      PathPoint P2: humerus_l (-0.00949 -0.01525 -0.00269)
      PathWrap: wrap_object=Chest_l method=hybrid
    Thelen2003Muscle LD_L5_l: max_isometric_force=50.6 optimal_fiber_length=0.3902216 tendon_slack_length=0.080135
        pennation_angle_at_optimal=0
      PathPoint P1: lumbar5 (-0.036 0.021 -0.00411)
      PathPoint P2: humerus_l (-0.00949 -0.01525 -0.00269)
      PathWrap: wrap_object=Chest_l method=hybrid
    Thelen2003Muscle LD_T12_l: max_isometric_force=23 optimal_fiber_length=0.3032209 tendon_slack_length=0.06226857
        pennation_angle_at_optimal=0
      PathPoint P1: humerus_l (-0.00949 -0.01525 -0.00269)
      PathPoint P2: torso (-0.052 0.102 -0.00436)
      PathWrap: wrap_object=Chest_l method=hybrid
    Thelen2003Muscle LD_T11_l: max_isometric_force=27.6 optimal_fiber_length=0.2848084 tendon_slack_length=0.058487
        pennation_angle_at_optimal=0
      PathPoint P1: humerus_l (-0.00949 -0.01525 -0.00269)
      PathPoint P2: torso (-0.0631214 0.131 -0.00346)
      PathWrap: wrap_object=Chest_l method=hybrid
    Thelen2003Muscle LD_T10_l: max_isometric_force=27.6 optimal_fiber_length=0.279701 tendon_slack_length=0.0437628
        pennation_angle_at_optimal=0
      PathPoint P1: humerus_l (-0.00949 -0.01525 -0.00269)
      PathPoint P2: torso (-0.069 0.158 -0.00383)
      PathWrap: wrap_object=Chest_l method=hybrid
    Thelen2003Muscle LD_T9_l: max_isometric_force=18.4 optimal_fiber_length=0.256967 tendon_slack_length=0.14
        pennation_angle_at_optimal=0
      PathPoint P1: humerus_l (-0.00949 -0.01525 -0.00269)
      PathPoint P2: torso (-0.079 0.194 -0.00408)
      PathWrap: wrap_object=Chest_l method=hybrid
    Thelen2003Muscle LD_T8_l: max_isometric_force=18.4 optimal_fiber_length=0.232514 tendon_slack_length=0.0477484
        pennation_angle_at_optimal=0
      PathPoint P1: humerus_l (-0.00949 -0.01525 -0.00269)
      PathPoint P2: torso (-0.081 0.215 -0.00428)
      PathWrap: wrap_object=Chest_l method=hybrid
    Thelen2003Muscle LD_T7_l: max_isometric_force=18.4 optimal_fiber_length=0.223761 tendon_slack_length=0.045951
        pennation_angle_at_optimal=0
      PathPoint P1: humerus_l (-0.00949 -0.01525 -0.00269)
      PathPoint P2: torso (-0.09 0.235 -0.00407)
      PathWrap: wrap_object=Chest_l method=hybrid
    Thelen2003Muscle LD_R12_l: max_isometric_force=18.4 optimal_fiber_length=0.2444749 tendon_slack_length=0.0502047
        pennation_angle_at_optimal=0
      PathPoint LD_l12_l-P1: humerus_l (-0.00949 -0.01525 -0.00269)
      PathPoint LD_l12_l-P2: torso (-0.045 0.121579 -0.04427)
      PathWrap: wrap_object=Chest_l method=hybrid
    Thelen2003Muscle LD_R11_l: max_isometric_force=27.6 optimal_fiber_length=0.240735 tendon_slack_length=0.0494366
        pennation_angle_at_optimal=0
      PathPoint LD_l11_l-P1: humerus_l (-0.00949 -0.01525 -0.00433)
      PathPoint LD_l11_l-P2: torso (-0.068 0.14 -0.063)
      PathWrap: wrap_object=Chest_l method=hybrid
    Thelen2003Muscle LD_Il_l: max_isometric_force=32.2 optimal_fiber_length=0.432081 tendon_slack_length=0.0186802
        pennation_angle_at_optimal=0
      PathPoint P1: pelvis (-0.113872 0.0741306 -0.0538193)
      PathPoint P2: humerus_l (-0.00949 -0.01525 -0.00269)
      PathWrap: wrap_object=Chest_l method=hybrid
    Millard2012EquilibriumMuscle [values shared by the 100 below unless stated]:
      ActiveForceLengthCurve: min_norm_active_fiber_length=0.25 transition_norm_fiber_length=0.77
          max_norm_active_fiber_length=1.9 shallow_ascending_slope=0.75 minimum_value=0
      ForceVelocityCurve: concentric_slope_at_vmax=0 concentric_slope_near_vmax=0.25 isometric_slope=5
          eccentric_slope_at_vmax=0 eccentric_slope_near_vmax=0.15 max_eccentric_velocity_force_multiplier=1.4
      TendonForceLengthCurve
    Millard2012EquilibriumMuscle addbrev_r: max_isometric_force=625.8197 optimal_fiber_length=0.1031
        tendon_slack_length=0.03545029 pennation_angle_at_optimal=0.1147809 fiber_damping=0.01 default_activation=0.01
        minimum_activation=0.01
      PathPoint P1: pelvis (-0.0191 -0.094 0.0154)
      PathPoint P2: femur_r (-0.002 -0.118 0.0249)
      PathWrap: wrap_object=AB_at_femshaft_r method=hybrid
      FiberForceLengthCurve: strain_at_zero_force=-0.1927643 strain_at_one_norm_force=0.5015522
          stiffness_at_low_force=0.2 stiffness_at_one_norm_force=2.880531 curviness=0.75
    Millard2012EquilibriumMuscle addlong_r: max_isometric_force=916.8 optimal_fiber_length=0.1082
        tendon_slack_length=0.1317994 pennation_angle_at_optimal=0.1377704 fiber_damping=0.01 default_activation=0.01
        minimum_activation=0.01
      PathPoint P1: pelvis (-0.00758 -0.0889 0.01888)
      PathPoint P2: femur_r (0.01126 -0.23937 0.01583)
      PathWrap: wrap_object=AL_at_femshaft_r method=hybrid
      FiberForceLengthCurve: strain_at_zero_force=-0.1917374 strain_at_one_norm_force=0.5002995
          stiffness_at_low_force=0.2 stiffness_at_one_norm_force=2.890019 curviness=0.75
    Millard2012EquilibriumMuscle addmagDist_r: max_isometric_force=597.2951 optimal_fiber_length=0.1772
        tendon_slack_length=0.0873807 pennation_angle_at_optimal=0.194705 fiber_damping=0.01 default_activation=0.01
        minimum_activation=0.01
      PathPoint P1: pelvis (-0.07404 -0.13667 0.03982)
      PathPoint P2: femur_r (0.01125 -0.2625 0.0193)
      PathWrap: wrap_object=AMdist_at_femshaft_r method=hybrid
      FiberForceLengthCurve: strain_at_zero_force=-3.981963e-9 strain_at_one_norm_force=0.7 stiffness_at_low_force=0.2
          stiffness_at_one_norm_force=2.857143 curviness=0.75
    Millard2012EquilibriumMuscle addmagIsch_r: max_isometric_force=597.2951 optimal_fiber_length=0.1562
        tendon_slack_length=0.216343 pennation_angle_at_optimal=0.1680443 fiber_damping=0.01 default_activation=0.01
        minimum_activation=0.01
      PathPoint P1: pelvis (-0.08962 -0.14126 0.04171)
      PathPoint P2: femur_r (0.00481 -0.38797 -0.03273)
      PathWrap: wrap_object=AMisch_at_condyles_r method=hybrid
      FiberForceLengthCurve: strain_at_zero_force=0.007389956 strain_at_one_norm_force=0.7000392
          stiffness_at_low_force=0.2 stiffness_at_one_norm_force=2.887464 curviness=0.75
    Millard2012EquilibriumMuscle addmagMid_r: max_isometric_force=597.2951 optimal_fiber_length=0.1377
        tendon_slack_length=0.0466277 pennation_angle_at_optimal=0.2073076 fiber_damping=0.01 default_activation=0.01
        minimum_activation=0.01
      PathPoint P1: pelvis (-0.05266 -0.12575 0.02854)
      PathPoint P2: femur_r (0.00242 -0.1624 0.02922)
      PathWrap: wrap_object=AMmid_at_femshaft_r method=hybrid
      FiberForceLengthCurve: strain_at_zero_force=-3.981963e-9 strain_at_one_norm_force=0.7 stiffness_at_low_force=0.2
          stiffness_at_one_norm_force=2.857143 curviness=0.75
    Millard2012EquilibriumMuscle addmagProx_r: max_isometric_force=597.2951 optimal_fiber_length=0.1056
        tendon_slack_length=0.0403241 pennation_angle_at_optimal=0.3114833 fiber_damping=0.01 default_activation=0.01
        minimum_activation=0.01
      PathPoint P1: pelvis (-0.02848 -0.10755 0.01365)
      PathPoint P2: femur_r (-0.01527 -0.07886 0.03202)
      PathWrap: wrap_object=AMprox_at_femshaft_r method=hybrid
      FiberForceLengthCurve: strain_at_zero_force=-3.981963e-9 strain_at_one_norm_force=0.7 stiffness_at_low_force=0.2
          stiffness_at_one_norm_force=2.857143 curviness=0.75
    Millard2012EquilibriumMuscle bflh_r: max_isometric_force=1313.184 optimal_fiber_length=0.0976005
        tendon_slack_length=0.3252283 pennation_angle_at_optimal=0.1759182 fiber_damping=0.01 default_activation=0.01
        minimum_activation=0.01
      PathPoint P1: pelvis (-0.104 -0.1321 0.0586)
      PathPoint P3: tibia_r (-0.02004936 -0.068 0.04158327)
      FiberForceLengthCurve: strain_at_zero_force=0.1965607 strain_at_one_norm_force=0.7068715
          stiffness_at_low_force=0.2 stiffness_at_one_norm_force=3.91918 curviness=0.75
    Millard2012EquilibriumMuscle bfsh_r: max_isometric_force=557.1148 optimal_fiber_length=0.1103007
        tendon_slack_length=0.1058179 pennation_angle_at_optimal=0.2642232 fiber_damping=0.01 default_activation=0.01
        minimum_activation=0.01
      PathPoint P1: femur_r (0.009477016 -0.2352885 0.02411525)
      PathPoint P2: tibia_r (-0.02026592 -0.06052 0.04180951)
      FiberForceLengthCurve: strain_at_zero_force=0.115251 strain_at_one_norm_force=0.6888986
          stiffness_at_low_force=0.2 stiffness_at_one_norm_force=3.486462 curviness=0.75
    Millard2012EquilibriumMuscle edl_r: max_isometric_force=603.4982 optimal_fiber_length=0.0693
        tendon_slack_length=0.3688752 pennation_angle_at_optimal=0.2182582 fiber_damping=0.01 default_activation=0.01
        minimum_activation=0.01
      PathPoint P1: tibia_r (-0.016 -0.1157 0.0205)
      PathPoint P2: tibia_r (0.0164 -0.376 0.0112)
      PathPoint P3: calcn_r (0.0919 0.036 0.0008)
      PathPoint P4: calcn_r (0.1616 0.0055 0.013)
      PathPoint P5: toes_r (0.0003 0.0047 0.0153)
      PathPoint P6: toes_r (0.0443 -0.0004 0.025)
      FiberForceLengthCurve: strain_at_zero_force=0.1317998 strain_at_one_norm_force=0.7072192
          stiffness_at_low_force=0.2 stiffness_at_one_norm_force=3.475726 curviness=0.75
    Millard2012EquilibriumMuscle ehl_r: max_isometric_force=285.8675 optimal_fiber_length=0.0748
        tendon_slack_length=0.3267953 pennation_angle_at_optimal=0.1972681 fiber_damping=0.01 default_activation=0.01
        minimum_activation=0.01
      PathPoint P1: tibia_r (-0.014 -0.155 0.0189)
      PathPoint P2: tibia_r (0.0071 -0.2909 0.0164)
      PathPoint P3: tibia_r (0.02 -0.3693 -0.0028)
      PathPoint P4: calcn_r (0.097 0.0389 -0.0211)
      PathPoint P5: calcn_r (0.1293 0.0309 -0.0257)
      PathPoint P6: calcn_r (0.1734 0.0139 -0.028)
      PathPoint P7: toes_r (0.0298 0.0041 -0.0245)
      PathPoint P8: toes_r (0.0563 0.0034 -0.0186)
      FiberForceLengthCurve: strain_at_zero_force=0.1051406 strain_at_one_norm_force=0.7178208
          stiffness_at_low_force=0.2 stiffness_at_one_norm_force=3.264346 curviness=0.75
    Millard2012EquilibriumMuscle fdl_r: max_isometric_force=423.177 optimal_fiber_length=0.0446
        tendon_slack_length=0.3787729 pennation_angle_at_optimal=0.2248391 fiber_damping=0.01 default_activation=0.01
        minimum_activation=0.01
      PathPoint P1: tibia_r (-0.0023 -0.1832 -0.0018)
      PathPoint P2: tibia_r (-0.0176 -0.3645 -0.0124)
      PathPoint P3: calcn_r (0.0436 0.0315 -0.028)
      PathPoint P4: calcn_r (0.0708 0.0176 -0.0263)
      PathPoint P5: calcn_r (0.1658 -0.0081 0.0116)
      PathPoint P6: toes_r (-0.0019 -0.0078 0.0147)
      PathPoint P7: toes_r (0.0285 -0.0071 0.0215)
      PathPoint P8: toes_r (0.0441 -0.006 0.0242)
      FiberForceLengthCurve: strain_at_zero_force=-0.01205975 strain_at_one_norm_force=0.6997089
          stiffness_at_low_force=0.2 stiffness_at_one_norm_force=2.809902 curviness=0.75
    Millard2012EquilibriumMuscle fhl_r: max_isometric_force=907.8393 optimal_fiber_length=0.0527
        tendon_slack_length=0.3543397 pennation_angle_at_optimal=0.2580255 fiber_damping=0.01 default_activation=0.01
        minimum_activation=0.01
      PathPoint P1: tibia_r (-0.031 -0.2163 0.02)
      PathPoint P2: tibia_r (-0.0242 -0.3671 -0.0076)
      PathPoint P3: calcn_r (0.0374 0.0276 -0.0241)
      PathPoint P4: calcn_r (0.1038 0.0068 -0.0256)
      PathPoint P5: calcn_r (0.1726 -0.0053 -0.0269)
      PathPoint P6: toes_r (0.0155 -0.0064 -0.0265)
      PathPoint P7: toes_r (0.0562 -0.0102 -0.0181)
      FiberForceLengthCurve: strain_at_zero_force=0.01130745 strain_at_one_norm_force=0.7002505
          stiffness_at_low_force=0.2 stiffness_at_one_norm_force=2.902997 curviness=0.75
    Millard2012EquilibriumMuscle gaslat_r: max_isometric_force=1575.059 optimal_fiber_length=0.05880011
        tendon_slack_length=0.3760709 pennation_angle_at_optimal=0.2102268 fiber_damping=0.01 default_activation=0.01
        minimum_activation=0.01
      PathPoint P1: femur_r (0.001840004 -0.3818574 0.02802948)
      PathPoint P2: calcn_r (0.0044 0.031 -0.0053)
      PathWrap: wrap_object=GasLat_at_shank_r method=hybrid
      PathWrap pathwrap_0: wrap_object=GasLat_at_condyles_r method=hybrid
      FiberForceLengthCurve: strain_at_zero_force=-0.05983233 strain_at_one_norm_force=0.7435102
          stiffness_at_low_force=0.2 stiffness_at_one_norm_force=2.489598 curviness=0.75
    Millard2012EquilibriumMuscle gasmed_r: max_isometric_force=3115.515 optimal_fiber_length=0.051
        tendon_slack_length=0.3987163 pennation_angle_at_optimal=0.1656816 fiber_damping=0.01 default_activation=0.01
        minimum_activation=0.01
      PathPoint P1: femur_r (0.008 -0.3788 -0.0208)
      PathPoint P2: calcn_r (0.0044 0.031 -0.0053)
      PathWrap shank: wrap_object=GasMed_at_shank_r method=hybrid
      PathWrap condyles: wrap_object=GasMed_at_condyles_r method=hybrid
      FiberForceLengthCurve: strain_at_zero_force=0.1998358 strain_at_one_norm_force=0.7902371
          stiffness_at_low_force=0.2 stiffness_at_one_norm_force=3.387526 curviness=0.75
    Millard2012EquilibriumMuscle glmax1_r: max_isometric_force=983.7836 optimal_fiber_length=0.147
        tendon_slack_length=0.04884089 pennation_angle_at_optimal=0.3540118 fiber_damping=0.01 default_activation=0.01
        minimum_activation=0.01
      PathPoint P1: pelvis (-0.1231 0.0345 0.0563)
      PathPoint P2: pelvis (-0.1257 -0.0242 0.0779)
      PathPoint P3: femur_r (-0.03701893 -0.04093292 0.055661)
      PathPoint P4: femur_r (-0.02892331 -0.06021827 0.0406384)
      PathWrap: wrap_object=Gmax1_at_pelvis_r method=hybrid
      FiberForceLengthCurve: strain_at_zero_force=-0.07534176 strain_at_one_norm_force=0.8468075
          stiffness_at_low_force=0.2 stiffness_at_one_norm_force=2.168846 curviness=0.75
    Millard2012EquilibriumMuscle glmax2_r: max_isometric_force=1406.046 optimal_fiber_length=0.157
        tendon_slack_length=0.06788715 pennation_angle_at_optimal=0.3673821 fiber_damping=0.01 default_activation=0.01
        minimum_activation=0.01
      PathPoint P1: pelvis (-0.1317 0.0087 0.0462)
      PathPoint P2: pelvis (-0.1344 -0.0609 0.0813)
      PathPoint P3: femur_r (-0.045 -0.0584 0.0252)
      PathPoint P4: femur_r (-0.0156 -0.1016 0.0419)
      PathWrap: wrap_object=Gmax2_at_pelvis_r method=hybrid
      FiberForceLengthCurve: strain_at_zero_force=0.199275 strain_at_one_norm_force=0.7164175
          stiffness_at_low_force=0.2 stiffness_at_one_norm_force=3.867406 curviness=0.75
    Millard2012EquilibriumMuscle glmax3_r: max_isometric_force=947.7541 optimal_fiber_length=0.167
        tendon_slack_length=0.06971661 pennation_angle_at_optimal=0.3824161 fiber_damping=0.01 default_activation=0.01
        minimum_activation=0.01
      PathPoint P1: pelvis (-0.13 -0.0525 0.009)
      PathPoint P2: pelvis (-0.1273 -0.1263 0.0435)
      PathPoint P3: femur_r (-0.0281 -0.1125 0.0094)
      PathPoint P4: femur_r (-0.006 -0.1419 0.0411)
      PathWrap: wrap_object=Gmax3_at_pelvis_r method=hybrid
      FiberForceLengthCurve: strain_at_zero_force=0.1989714 strain_at_one_norm_force=0.7121937
          stiffness_at_low_force=0.2 stiffness_at_one_norm_force=3.896947 curviness=0.75
    Millard2012EquilibriumMuscle glmed1_r: max_isometric_force=1093.467 optimal_fiber_length=0.07663067
        tendon_slack_length=0.05859289 pennation_angle_at_optimal=0.3165559 fiber_damping=0.01 default_activation=0.01
        minimum_activation=0.01
      PathPoint P1: pelvis (-0.04913741 0.02615326 0.1152884)
      PathPoint P2: femur_r (-0.01389175 -0.01829471 0.05918962)
      FiberForceLengthCurve: strain_at_zero_force=-3.729382e-9 strain_at_one_norm_force=0.7 stiffness_at_low_force=0.2
          stiffness_at_one_norm_force=2.857143 curviness=0.75
    Millard2012EquilibriumMuscle glmed2_r: max_isometric_force=765.0917 optimal_fiber_length=0.08435829
        tendon_slack_length=0.07540107 pennation_angle_at_optimal=0.3165559 fiber_damping=0.01 default_activation=0.01
        minimum_activation=0.01
      PathPoint P1: pelvis (-0.08472733 0.05463392 0.08198352)
      PathPoint P2: femur_r (-0.02203601 -0.009959097 0.05612622)
      FiberForceLengthCurve: strain_at_zero_force=0.06397124 strain_at_one_norm_force=0.7014005
          stiffness_at_low_force=0.2 stiffness_at_one_norm_force=3.137603 curviness=0.75
    Millard2012EquilibriumMuscle glmed3_r: max_isometric_force=871.1993 optimal_fiber_length=0.07803259
        tendon_slack_length=0.04835118 pennation_angle_at_optimal=0.3165559 fiber_damping=0.01 default_activation=0.01
        minimum_activation=0.01
      PathPoint P1: pelvis (-0.0998658 0.01555939 0.06390163)
      PathPoint P2: femur_r (-0.0309 -0.0047 0.0518)
      FiberForceLengthCurve: strain_at_zero_force=0.1252157 strain_at_one_norm_force=0.7030514
          stiffness_at_low_force=0.2 stiffness_at_one_norm_force=3.461191 curviness=0.75
    Millard2012EquilibriumMuscle glmin1_r: max_isometric_force=374.0459 optimal_fiber_length=0.08143895
        tendon_slack_length=0.01932712 pennation_angle_at_optimal=0.1745329 fiber_damping=0.01 default_activation=0.01
        minimum_activation=0.01
      PathPoint P1: pelvis (-0.02957953 -0.0001082166 0.1184545)
      PathPoint P2: femur_r (0.005489319 -0.0154886 0.0560378)
      FiberForceLengthCurve: strain_at_zero_force=-3.729382e-9 strain_at_one_norm_force=0.7 stiffness_at_low_force=0.2
          stiffness_at_one_norm_force=2.857143 curviness=0.75
    Millard2012EquilibriumMuscle glmin2_r: max_isometric_force=394.8197 optimal_fiber_length=0.0687362
        tendon_slack_length=0.03203482 pennation_angle_at_optimal=0 fiber_damping=0.01 default_activation=0.01
        minimum_activation=0.01
      PathPoint P1: pelvis (-0.0616 0.01000027 0.1011453)
      PathPoint P2: femur_r (0.003543541 -0.009012269 0.05246433)
      FiberForceLengthCurve: strain_at_zero_force=0.003039474 strain_at_one_norm_force=0.7000285
          stiffness_at_low_force=0.2 stiffness_at_one_norm_force=2.869486 curviness=0.75
    Millard2012EquilibriumMuscle glmin3_r: max_isometric_force=446.7738 optimal_fiber_length=0.0353855
        tendon_slack_length=0.04737233 pennation_angle_at_optimal=0.01745329 fiber_damping=0.01 default_activation=0.01
        minimum_activation=0.01
      PathPoint P1: pelvis (-0.0789 -0.0155 0.0798)
      PathPoint P2: femur_r (-0.003576137 -0.001266701 0.05126165)
      FiberForceLengthCurve: strain_at_zero_force=0.007461173 strain_at_one_norm_force=0.7002322
          stiffness_at_low_force=0.2 stiffness_at_one_norm_force=2.886957 curviness=0.75
    Millard2012EquilibriumMuscle grac_r: max_isometric_force=281.3115 optimal_fiber_length=0.2278008
        tendon_slack_length=0.1720144 pennation_angle_at_optimal=0.1720016 fiber_damping=0.01 default_activation=0.01
        minimum_activation=0.01
      PathPoint P1: pelvis (-0.04736 -0.12932 0.02456)
      PathPoint P2: tibia_r (-0.01842 -0.04755 -0.02961)
      PathPoint P3: tibia_r (0.00178 -0.06962 -0.01573)
      PathWrap: wrap_object=GR_at_condyles_r method=hybrid
      FiberForceLengthCurve: strain_at_zero_force=-0.1969779 strain_at_one_norm_force=0.8027483
          stiffness_at_low_force=0.2 stiffness_at_one_norm_force=2.000548 curviness=0.75
    Millard2012EquilibriumMuscle iliacus_r: max_isometric_force=1021.141 optimal_fiber_length=0.1066
        tendon_slack_length=0.09612071 pennation_angle_at_optimal=0.279914 fiber_damping=0.01 default_activation=0.01
        minimum_activation=0.01
      PathPoint P1: pelvis (-0.0605 0.0309 0.0843)
      PathPoint P2: pelvis (-0.0135 -0.0557 0.0756)
      PathPoint P3: femur_r (-0.0023 -0.0565 0.0139)
      PathPoint P4: femur_r (-0.0122 -0.0637 0.0196)
      PathWrap: wrap_object=IL_at_brim_r method=hybrid range=(2 3)
      FiberForceLengthCurve: strain_at_zero_force=-0.1703103 strain_at_one_norm_force=0.5005449
          stiffness_at_low_force=0.2 stiffness_at_one_norm_force=2.98127 curviness=0.75
    Millard2012EquilibriumMuscle perbrev_r: max_isometric_force=521.2016 optimal_fiber_length=0.0454
        tendon_slack_length=0.1475275 pennation_angle_at_optimal=0.2052361 fiber_damping=0.01 default_activation=0.01
        minimum_activation=0.01
      PathPoint P1: tibia_r (-0.0243 -0.2532 0.0251)
      PathPoint P2: tibia_r (-0.0339 -0.3893 0.0249)
      PathPoint P3: tibia_r (-0.0285 -0.4004 0.0255)
      PathPoint P4: calcn_r (0.0471 0.027 0.0233)
      PathPoint P5: calcn_r (0.0677 0.0219 0.0343)
      FiberForceLengthCurve: strain_at_zero_force=-0.04234068 strain_at_one_norm_force=0.6987541
          stiffness_at_low_force=0.2 stiffness_at_one_norm_force=2.69871 curviness=0.75
    Millard2012EquilibriumMuscle perlong_r: max_isometric_force=1115.371 optimal_fiber_length=0.0508
        tendon_slack_length=0.3322208 pennation_angle_at_optimal=0.2479525 fiber_damping=0.01 default_activation=0.01
        minimum_activation=0.01
      PathPoint P1: tibia_r (-0.02 -0.1373 0.0282)
      PathPoint P2: tibia_r (-0.0317 -0.39 0.0237)
      PathPoint P3: tibia_r (-0.0272 -0.4014 0.024)
      PathPoint P4: calcn_r (0.0438 0.023 0.0221)
      PathPoint P5: calcn_r (0.0681 0.0106 0.0284)
      PathPoint P6: calcn_r (0.0852 0.0069 0.0118)
      PathPoint P7: calcn_r (0.1203 0.0085 -0.0184)
      FiberForceLengthCurve: strain_at_zero_force=-0.1323481 strain_at_one_norm_force=0.6924185
          stiffness_at_low_force=0.2 stiffness_at_one_norm_force=2.424929 curviness=0.75
    Millard2012EquilibriumMuscle piri_r: max_isometric_force=1029.787 optimal_fiber_length=0.026
        tendon_slack_length=0.1149062 pennation_angle_at_optimal=0.1745329 fiber_damping=0.01 default_activation=0.01
        minimum_activation=0.01
      PathPoint P1: pelvis (-0.11381 -0.00653 0.01351)
      PathPoint P2: pelvis (-0.11402 -0.03066 0.06092)
      PathPoint P3: femur_r (-0.0148 -0.0036 0.0437)
      FiberForceLengthCurve: strain_at_zero_force=0.09922992 strain_at_one_norm_force=0.7028348
          stiffness_at_low_force=0.2 stiffness_at_one_norm_force=3.313426 curviness=0.75
    Millard2012EquilibriumMuscle psoas_r: max_isometric_force=1426.79 optimal_fiber_length=0.1169
        tendon_slack_length=0.09954317 pennation_angle_at_optimal=0.2155251 fiber_damping=0.01 default_activation=0.01
        minimum_activation=0.01
      PathPoint P1: pelvis (-0.0606 0.062 0.039)
      PathPoint P2: pelvis (-0.0205 -0.0654 0.0656)
      PathPoint P3: femur_r (-0.0132 -0.0467 0.0046)
      PathPoint P4: femur_r (-0.0235 -0.0524 0.0088)
      PathWrap: wrap_object=PS_at_brim_r method=hybrid range=(2 3)
      FiberForceLengthCurve: strain_at_zero_force=-0.09543841 strain_at_one_norm_force=0.5010382
          stiffness_at_low_force=0.2 stiffness_at_one_norm_force=3.353023 curviness=0.75
    Millard2012EquilibriumMuscle recfem_r: max_isometric_force=2191.741 optimal_fiber_length=0.07589949
        tendon_slack_length=0.4484905 pennation_angle_at_optimal=0.2170149 fiber_damping=0.01 default_activation=0.01
        minimum_activation=0.01
      PathPoint P1: pelvis (-0.024 -0.0388 0.0933)
      PathPoint P2: patella_r (0.01 0.049 0.0007)
      PathPoint P3: patella_r (0.0121 0.0437 -0.001)
      PathPoint P4: patella_r (0.005 0.00247 3e-5)
      PathPoint P5: tibia_r (0.0326 -0.06312 -0.00047)
      PathWrap: wrap_object=KnExt_at_fem_r method=hybrid
      FiberForceLengthCurve: strain_at_zero_force=0.1999726 strain_at_one_norm_force=0.8999622
          stiffness_at_low_force=0.2 stiffness_at_one_norm_force=2.857186 curviness=0.75
    Millard2012EquilibriumMuscle sart_r: max_isometric_force=249.4131 optimal_fiber_length=0.4030006
        tendon_slack_length=0.124 pennation_angle_at_optimal=0.02613542 fiber_damping=0.01 default_activation=0.01
        minimum_activation=0.01
      PathPoint P1: pelvis (-0.0195 -0.0156 0.1056)
      PathPoint P2: femur_r (-0.003 -0.3568 -0.0421)
      PathPoint P3: tibia_r (-0.0251 -0.0401 -0.0365)
      PathPoint P4: tibia_r (-0.0159 -0.0599 -0.0264)
      PathPoint P5: tibia_r (0.0136 -0.081 -0.0026)
      FiberForceLengthCurve: strain_at_zero_force=-0.1984568 strain_at_one_norm_force=0.7212821
          stiffness_at_low_force=0.2 stiffness_at_one_norm_force=2.17453 curviness=0.75
    Millard2012EquilibriumMuscle semimem_r: max_isometric_force=2200.987 optimal_fiber_length=0.06900039
        tendon_slack_length=0.3475879 pennation_angle_at_optimal=0.2545615 fiber_damping=0.01 default_activation=0.01
        minimum_activation=0.01
      PathPoint P1: pelvis (-0.0987 -0.125 0.0614)
      PathPoint P2: tibia_r (-0.01234001 -0.05587168 -0.03964744)
      PathWrap: wrap_object=SM_at_condyles_r method=hybrid
      FiberForceLengthCurve: strain_at_zero_force=0.1994426 strain_at_one_norm_force=0.7353994
          stiffness_at_low_force=0.2 stiffness_at_one_norm_force=3.731644 curviness=0.75
    Millard2012EquilibriumMuscle semiten_r: max_isometric_force=591.2951 optimal_fiber_length=0.1930012
        tendon_slack_length=0.2472005 pennation_angle_at_optimal=0.241295 fiber_damping=0.01 default_activation=0.01
        minimum_activation=0.01
      PathPoint P1: pelvis (-0.1038 -0.1388 0.0515)
      PathPoint P2: tibia_r (-0.0145 -0.065 -0.0429)
      PathPoint P3: tibia_r (0.0019 -0.0773 -0.0117)
      PathWrap: wrap_object=ST_at_condyles_r method=hybrid
      FiberForceLengthCurve: strain_at_zero_force=0.007279189 strain_at_one_norm_force=0.7803276
          stiffness_at_low_force=0.2 stiffness_at_one_norm_force=2.58716 curviness=0.75
    Millard2012EquilibriumMuscle soleus_r: max_isometric_force=6194.843 optimal_fiber_length=0.044
        tendon_slack_length=0.2767559 pennation_angle_at_optimal=0.3814289 fiber_damping=0.01 default_activation=0.01
        minimum_activation=0.01
      PathPoint P1: tibia_r (-0.0076 -0.0916 0.0098)
      PathPoint P2: calcn_r (0.0044 0.031 -0.0053)
      FiberForceLengthCurve: strain_at_zero_force=0.1569032 strain_at_one_norm_force=0.8506533
          stiffness_at_low_force=0.2 stiffness_at_one_norm_force=2.882882 curviness=0.75
    Millard2012EquilibriumMuscle tfl_r: max_isometric_force=411.2066 optimal_fiber_length=0.09313662
        tendon_slack_length=0.4406804 pennation_angle_at_optimal=0.05235988 fiber_damping=0.01 default_activation=0.01
        minimum_activation=0.01
      PathPoint P1: pelvis (-0.02033979 0.01085135 0.1292975)
      PathPoint P2: femur_r (0.0294 -0.0995 0.0597)
      PathPoint P3: femur_r (0.0107 -0.405 0.0324)
      PathPoint P4: tibia_r (0.0108 -0.041 0.0346)
      FiberForceLengthCurve: strain_at_zero_force=0.07118385 strain_at_one_norm_force=0.7197196
          stiffness_at_low_force=0.2 stiffness_at_one_norm_force=3.08387 curviness=0.75
    Millard2012EquilibriumMuscle tibant_r: max_isometric_force=1227.452 optimal_fiber_length=0.0683
        tendon_slack_length=0.240461 pennation_angle_at_optimal=0.1951828 fiber_damping=0.01 default_activation=0.01
        minimum_activation=0.01
      PathPoint P1: tibia_r (0.0154 -0.1312 0.0162)
      PathPoint P2: tibia_r (0.0251 -0.1906 0.0128)
      PathPoint P3: tibia_r (0.0233 -0.3659 -0.0132)
      PathPoint P4: calcn_r (0.1166 0.0178 -0.0305)
      FiberForceLengthCurve: strain_at_zero_force=0.1892237 strain_at_one_norm_force=0.7076768
          stiffness_at_low_force=0.2 stiffness_at_one_norm_force=3.85763 curviness=0.75
    Millard2012EquilibriumMuscle tibpost_r: max_isometric_force=1730.154 optimal_fiber_length=0.0378
        tendon_slack_length=0.2807796 pennation_angle_at_optimal=0.2264891 fiber_damping=0.01 default_activation=0.01
        minimum_activation=0.01
      PathPoint P1: tibia_r (-0.0041 -0.1304 0.0103)
      PathPoint P2: tibia_r (-0.0164 -0.3655 -0.0175)
      PathPoint P3: calcn_r (0.0417 0.0334 -0.0286)
      PathPoint P4: calcn_r (0.0772 0.0159 -0.0281)
      FiberForceLengthCurve: strain_at_zero_force=-0.1916705 strain_at_one_norm_force=0.6862359
          stiffness_at_low_force=0.2 stiffness_at_one_norm_force=2.278147 curviness=0.75
    Millard2012EquilibriumMuscle vasint_r: max_isometric_force=1697.361 optimal_fiber_length=0.09929882
        tendon_slack_length=0.2022083 pennation_angle_at_optimal=0.06309973 fiber_damping=0.01 default_activation=0.01
        minimum_activation=0.01
      PathPoint P1: femur_r (0.029 -0.1924 0.031)
      PathPoint P2: femur_r (0.0335 -0.2084 0.0285)
      PathPoint P3: patella_r (0.0058 0.048 -0.0006)
      PathPoint P4: patella_r (0.005 0.00247 -0.00039)
      PathPoint P5: tibia_r (0.03257 -0.0632 0.00043)
      PathWrap: wrap_object=KnExt_at_fem_r method=hybrid
      FiberForceLengthCurve: strain_at_zero_force=0.1999153 strain_at_one_norm_force=0.8514363
          stiffness_at_low_force=0.2 stiffness_at_one_norm_force=3.06974 curviness=0.75
    Millard2012EquilibriumMuscle vaslat_r: max_isometric_force=5148.767 optimal_fiber_length=0.09939901
        tendon_slack_length=0.2205991 pennation_angle_at_optimal=0.2528673 fiber_damping=0.01 default_activation=0.01
        minimum_activation=0.01
      PathPoint P1: femur_r (0.0048 -0.1854 0.0349)
      PathPoint P2: femur_r (0.0269 -0.2591 0.0409)
      PathPoint P3: patella_r (0.0103 0.0423 0.0141)
      PathPoint P4: patella_r (0.005 0.00247 0.00733)
      PathPoint P5: tibia_r (0.03254 -0.06338 0.00511)
      PathWrap: wrap_object=KnExtVL_at_fem_r method=hybrid
      FiberForceLengthCurve: strain_at_zero_force=0.1999632 strain_at_one_norm_force=0.8928189
          stiffness_at_low_force=0.2 stiffness_at_one_norm_force=2.886604 curviness=0.75
    Millard2012EquilibriumMuscle vasmed_r: max_isometric_force=2747.823 optimal_fiber_length=0.09679884
        tendon_slack_length=0.1999019 pennation_angle_at_optimal=0.4222225 fiber_damping=0.01 default_activation=0.01
        minimum_activation=0.01
      PathPoint P1: femur_r (0.014 -0.2099 0.0188)
      PathPoint P2: femur_r (0.0356 -0.2769 0.0009)
      PathPoint P3: patella_r (0.0063 0.0445 -0.017)
      PathPoint P4: patella_r (0.005 0.00247 -0.0085)
      PathPoint P5: tibia_r (0.0319 -0.06357 -0.00678)
      PathWrap: wrap_object=KnExt_at_fem_r method=hybrid
      FiberForceLengthCurve: strain_at_zero_force=0.1999354 strain_at_one_norm_force=0.8518332
          stiffness_at_low_force=0.2 stiffness_at_one_norm_force=3.067965 curviness=0.75
    Millard2012EquilibriumMuscle addbrev_l: max_isometric_force=625.8197 optimal_fiber_length=0.1031
        tendon_slack_length=0.03545029 pennation_angle_at_optimal=0.1147809 fiber_damping=0.01 default_activation=0.01
        minimum_activation=0.01
      PathPoint P1: pelvis (-0.0191 -0.094 -0.0154)
      PathPoint P2: femur_l (-0.002 -0.118 -0.0249)
      PathWrap: wrap_object=AB_at_femshaft_l method=hybrid
      FiberForceLengthCurve: strain_at_zero_force=-0.1927643 strain_at_one_norm_force=0.5015522
          stiffness_at_low_force=0.2 stiffness_at_one_norm_force=2.880531 curviness=0.75
    Millard2012EquilibriumMuscle addlong_l: max_isometric_force=916.8 optimal_fiber_length=0.1082
        tendon_slack_length=0.1317994 pennation_angle_at_optimal=0.1377704 fiber_damping=0.01 default_activation=0.01
        minimum_activation=0.01
      PathPoint P1: pelvis (-0.00758 -0.0889 -0.01888)
      PathPoint P2: femur_l (0.01126 -0.23937 -0.01583)
      PathWrap: wrap_object=AL_at_femshaft_l method=hybrid
      FiberForceLengthCurve: strain_at_zero_force=-0.1917374 strain_at_one_norm_force=0.5002995
          stiffness_at_low_force=0.2 stiffness_at_one_norm_force=2.890019 curviness=0.75
    Millard2012EquilibriumMuscle addmagDist_l: max_isometric_force=597.2951 optimal_fiber_length=0.1772
        tendon_slack_length=0.0873807 pennation_angle_at_optimal=0.194705 fiber_damping=0.01 default_activation=0.01
        minimum_activation=0.01
      PathPoint P1: pelvis (-0.07404 -0.13667 -0.03982)
      PathPoint P2: femur_l (0.01125 -0.2625 -0.0193)
      PathWrap: wrap_object=AMdist_at_femshaft_l method=hybrid
      FiberForceLengthCurve: strain_at_zero_force=-3.981963e-9 strain_at_one_norm_force=0.7 stiffness_at_low_force=0.2
          stiffness_at_one_norm_force=2.857143 curviness=0.75
    Millard2012EquilibriumMuscle addmagIsch_l: max_isometric_force=597.2951 optimal_fiber_length=0.1562
        tendon_slack_length=0.216343 pennation_angle_at_optimal=0.1680443 fiber_damping=0.01 default_activation=0.01
        minimum_activation=0.01
      PathPoint P1: pelvis (-0.08962 -0.14126 -0.04171)
      PathPoint P2: femur_l (0.00481 -0.38797 0.03273)
      PathWrap: wrap_object=AMisch_at_condyles_l method=hybrid
      FiberForceLengthCurve: strain_at_zero_force=0.007389956 strain_at_one_norm_force=0.7000392
          stiffness_at_low_force=0.2 stiffness_at_one_norm_force=2.887464 curviness=0.75
    Millard2012EquilibriumMuscle addmagMid_l: max_isometric_force=597.2951 optimal_fiber_length=0.1377
        tendon_slack_length=0.0466277 pennation_angle_at_optimal=0.2073076 fiber_damping=0.01 default_activation=0.01
        minimum_activation=0.01
      PathPoint P1: pelvis (-0.05266 -0.12575 -0.02854)
      PathPoint P2: femur_l (0.00242 -0.1624 -0.02922)
      PathWrap: wrap_object=AMmid_at_femshaft_l method=hybrid
      FiberForceLengthCurve: strain_at_zero_force=-3.981963e-9 strain_at_one_norm_force=0.7 stiffness_at_low_force=0.2
          stiffness_at_one_norm_force=2.857143 curviness=0.75
    Millard2012EquilibriumMuscle addmagProx_l: max_isometric_force=597.2951 optimal_fiber_length=0.1056
        tendon_slack_length=0.0403241 pennation_angle_at_optimal=0.3114833 fiber_damping=0.01 default_activation=0.01
        minimum_activation=0.01
      PathPoint P1: pelvis (-0.02848 -0.10755 -0.01365)
      PathPoint P2: femur_l (-0.01527 -0.07886 -0.03202)
      PathWrap: wrap_object=AMprox_at_femshaft_l method=hybrid
      FiberForceLengthCurve: strain_at_zero_force=-3.981963e-9 strain_at_one_norm_force=0.7 stiffness_at_low_force=0.2
          stiffness_at_one_norm_force=2.857143 curviness=0.75
    Millard2012EquilibriumMuscle bflh_l: max_isometric_force=1313.184 optimal_fiber_length=0.09760034
        tendon_slack_length=0.3252278 pennation_angle_at_optimal=0.1759182 fiber_damping=0.01 default_activation=0.01
        minimum_activation=0.01
      PathPoint P1: pelvis (-0.104 -0.1321 -0.0586)
      PathPoint P3: tibia_l (-0.02004936 -0.068 -0.04158327)
      FiberForceLengthCurve: strain_at_zero_force=0.1965607 strain_at_one_norm_force=0.7068715
          stiffness_at_low_force=0.2 stiffness_at_one_norm_force=3.91918 curviness=0.75
    Millard2012EquilibriumMuscle bfsh_l: max_isometric_force=557.1148 optimal_fiber_length=0.1103005
        tendon_slack_length=0.1058177 pennation_angle_at_optimal=0.2642232 fiber_damping=0.01 default_activation=0.01
        minimum_activation=0.01
      PathPoint P1: femur_l (0.009477016 -0.2352885 -0.02411525)
      PathPoint P2: tibia_l (-0.02026592 -0.06052 -0.04180951)
      FiberForceLengthCurve: strain_at_zero_force=0.115251 strain_at_one_norm_force=0.6888986
          stiffness_at_low_force=0.2 stiffness_at_one_norm_force=3.486462 curviness=0.75
    Millard2012EquilibriumMuscle edl_l: max_isometric_force=603.4982 optimal_fiber_length=0.0693
        tendon_slack_length=0.3688752 pennation_angle_at_optimal=0.2182582 fiber_damping=0.01 default_activation=0.01
        minimum_activation=0.01
      PathPoint P1: tibia_l (-0.016 -0.1157 -0.0205)
      PathPoint P2: tibia_l (0.0164 -0.376 -0.0112)
      PathPoint P3: calcn_l (0.0919 0.036 -0.0008)
      PathPoint P4: calcn_l (0.1616 0.0055 -0.013)
      PathPoint P5: toes_l (0.0003 0.0047 -0.0153)
      PathPoint P6: toes_l (0.0443 -0.0004 -0.025)
      FiberForceLengthCurve: strain_at_zero_force=0.1317998 strain_at_one_norm_force=0.7072192
          stiffness_at_low_force=0.2 stiffness_at_one_norm_force=3.475726 curviness=0.75
    Millard2012EquilibriumMuscle ehl_l: max_isometric_force=285.8675 optimal_fiber_length=0.0748
        tendon_slack_length=0.3267953 pennation_angle_at_optimal=0.1972681 fiber_damping=0.01 default_activation=0.01
        minimum_activation=0.01
      PathPoint P1: tibia_l (-0.014 -0.155 -0.0189)
      PathPoint P2: tibia_l (0.0071 -0.2909 -0.0164)
      PathPoint P3: tibia_l (0.02 -0.3693 0.0028)
      PathPoint P4: calcn_l (0.097 0.0389 0.0211)
      PathPoint P5: calcn_l (0.1293 0.0309 0.0257)
      PathPoint P6: calcn_l (0.1734 0.0139 0.028)
      PathPoint P7: toes_l (0.0298 0.0041 0.0245)
      PathPoint P8: toes_l (0.0563 0.0034 0.0186)
      FiberForceLengthCurve: strain_at_zero_force=0.1051406 strain_at_one_norm_force=0.7178208
          stiffness_at_low_force=0.2 stiffness_at_one_norm_force=3.264346 curviness=0.75
    Millard2012EquilibriumMuscle fdl_l: max_isometric_force=423.177 optimal_fiber_length=0.0446
        tendon_slack_length=0.3787729 pennation_angle_at_optimal=0.2248391 fiber_damping=0.01 default_activation=0.01
        minimum_activation=0.01
      PathPoint P1: tibia_l (-0.0023 -0.1832 0.0018)
      PathPoint P2: tibia_l (-0.0176 -0.3645 0.0124)
      PathPoint P3: calcn_l (0.0436 0.0315 0.028)
      PathPoint P4: calcn_l (0.0708 0.0176 0.0263)
      PathPoint P5: calcn_l (0.1658 -0.0081 -0.0116)
      PathPoint P6: toes_l (-0.0019 -0.0078 -0.0147)
      PathPoint P7: toes_l (0.0285 -0.0071 -0.0215)
      PathPoint P8: toes_l (0.0441 -0.006 -0.0242)
      FiberForceLengthCurve: strain_at_zero_force=-0.01205975 strain_at_one_norm_force=0.6997089
          stiffness_at_low_force=0.2 stiffness_at_one_norm_force=2.809902 curviness=0.75
    Millard2012EquilibriumMuscle fhl_l: max_isometric_force=907.8393 optimal_fiber_length=0.0527
        tendon_slack_length=0.3543397 pennation_angle_at_optimal=0.2580255 fiber_damping=0.01 default_activation=0.01
        minimum_activation=0.01
      PathPoint P1: tibia_l (-0.031 -0.2163 -0.02)
      PathPoint P2: tibia_l (-0.0242 -0.3671 0.0076)
      PathPoint P3: calcn_l (0.0374 0.0276 0.0241)
      PathPoint P4: calcn_l (0.1038 0.0068 0.0256)
      PathPoint P5: calcn_l (0.1726 -0.0053 0.0269)
      PathPoint P6: toes_l (0.0155 -0.0064 0.0265)
      PathPoint P7: toes_l (0.0562 -0.0102 0.0181)
      FiberForceLengthCurve: strain_at_zero_force=0.01130745 strain_at_one_norm_force=0.7002505
          stiffness_at_low_force=0.2 stiffness_at_one_norm_force=2.902997 curviness=0.75
    Millard2012EquilibriumMuscle gaslat_l: max_isometric_force=1575.059 optimal_fiber_length=0.05880007
        tendon_slack_length=0.3760706 pennation_angle_at_optimal=0.2102268 fiber_damping=0.01 default_activation=0.01
        minimum_activation=0.01
      PathPoint P1: femur_l (0.001840004 -0.3818574 -0.02802948)
      PathPoint P2: calcn_l (0.0044 0.031 0.0053)
      PathWrap: wrap_object=GasLat_at_shank_l method=hybrid
      PathWrap pathwrap_0: wrap_object=GasLat_at_condyles_l method=hybrid
      FiberForceLengthCurve: strain_at_zero_force=-0.05983233 strain_at_one_norm_force=0.7435102
          stiffness_at_low_force=0.2 stiffness_at_one_norm_force=2.489598 curviness=0.75
    Millard2012EquilibriumMuscle gasmed_l: max_isometric_force=3115.515 optimal_fiber_length=0.051
        tendon_slack_length=0.3987163 pennation_angle_at_optimal=0.1656816 fiber_damping=0.01 default_activation=0.01
        minimum_activation=0.01
      PathPoint P1: femur_l (0.008 -0.3788 0.0208)
      PathPoint P2: calcn_l (0.0044 0.031 0.0053)
      PathWrap shank: wrap_object=GasMed_at_shank_l method=hybrid
      PathWrap condyles: wrap_object=GasMed_at_condyles_l method=hybrid
      FiberForceLengthCurve: strain_at_zero_force=0.1998358 strain_at_one_norm_force=0.7902371
          stiffness_at_low_force=0.2 stiffness_at_one_norm_force=3.387526 curviness=0.75
    Millard2012EquilibriumMuscle glmax1_l: max_isometric_force=983.7836 optimal_fiber_length=0.147
        tendon_slack_length=0.04884089 pennation_angle_at_optimal=0.3540118 fiber_damping=0.01 default_activation=0.01
        minimum_activation=0.01
      PathPoint P1: pelvis (-0.1231 0.0345 -0.0563)
      PathPoint P2: pelvis (-0.1257 -0.0242 -0.0779)
      PathPoint P3: femur_l (-0.03701893 -0.04093292 -0.055661)
      PathPoint P4: femur_l (-0.02892331 -0.06021827 -0.0406384)
      PathWrap: wrap_object=Gmax1_at_pelvis_l method=hybrid
      FiberForceLengthCurve: strain_at_zero_force=-0.07534176 strain_at_one_norm_force=0.8468075
          stiffness_at_low_force=0.2 stiffness_at_one_norm_force=2.168846 curviness=0.75
    Millard2012EquilibriumMuscle glmax2_l: max_isometric_force=1406.046 optimal_fiber_length=0.157
        tendon_slack_length=0.06788715 pennation_angle_at_optimal=0.3673821 fiber_damping=0.01 default_activation=0.01
        minimum_activation=0.01
      PathPoint P1: pelvis (-0.1317 0.0087 -0.0462)
      PathPoint P2: pelvis (-0.1344 -0.0609 -0.0813)
      PathPoint P3: femur_l (-0.069 -0.0584 -0.0252)
      PathPoint P4: femur_l (-0.0396 -0.1016 -0.0419)
      PathWrap: wrap_object=Gmax2_at_pelvis_l method=hybrid
      FiberForceLengthCurve: strain_at_zero_force=0.199275 strain_at_one_norm_force=0.7164175
          stiffness_at_low_force=0.2 stiffness_at_one_norm_force=3.867406 curviness=0.75
    Millard2012EquilibriumMuscle glmax3_l: max_isometric_force=947.7541 optimal_fiber_length=0.167
        tendon_slack_length=0.06971661 pennation_angle_at_optimal=0.3824161 fiber_damping=0.01 default_activation=0.01
        minimum_activation=0.01
      PathPoint P1: pelvis (-0.154 -0.0525 -0.009)
      PathPoint P2: pelvis (-0.1513 -0.1263 -0.0435)
      PathPoint P3: femur_l (-0.0281 -0.1125 -0.0094)
      PathPoint P4: femur_l (-0.006 -0.1419 -0.0411)
      PathWrap: wrap_object=Gmax3_at_pelvis_l method=hybrid
      FiberForceLengthCurve: strain_at_zero_force=0.1989714 strain_at_one_norm_force=0.7121937
          stiffness_at_low_force=0.2 stiffness_at_one_norm_force=3.896947 curviness=0.75
    Millard2012EquilibriumMuscle glmed1_l: max_isometric_force=1093.467 optimal_fiber_length=0.07640202
        tendon_slack_length=0.05841807 pennation_angle_at_optimal=0.3165559 fiber_damping=0.01 default_activation=0.01
        minimum_activation=0.01
      PathPoint P1: pelvis (-0.049 0.026 -0.115)
      PathPoint P2: femur_l (-0.014 -0.018 -0.059)
      FiberForceLengthCurve: strain_at_zero_force=-3.729382e-9 strain_at_one_norm_force=0.7 stiffness_at_low_force=0.2
          stiffness_at_one_norm_force=2.857143 curviness=0.75
    Millard2012EquilibriumMuscle glmed2_l: max_isometric_force=765.0917 optimal_fiber_length=0.08455121
        tendon_slack_length=0.07557351 pennation_angle_at_optimal=0.3165559 fiber_damping=0.01 default_activation=0.01
        minimum_activation=0.01
      PathPoint P1: pelvis (-0.085 0.055 -0.082)
      PathPoint P2: femur_l (-0.022 -0.01 -0.056)
      FiberForceLengthCurve: strain_at_zero_force=0.06397124 strain_at_one_norm_force=0.7014005
          stiffness_at_low_force=0.2 stiffness_at_one_norm_force=3.137603 curviness=0.75
    Millard2012EquilibriumMuscle glmed3_l: max_isometric_force=871.1993 optimal_fiber_length=0.07824677
        tendon_slack_length=0.04848389 pennation_angle_at_optimal=0.3165559 fiber_damping=0.01 default_activation=0.01
        minimum_activation=0.01
      PathPoint P1: pelvis (-0.1 0.016 -0.064)
      PathPoint P2: femur_l (-0.0309 -0.0047 -0.0518)
      FiberForceLengthCurve: strain_at_zero_force=0.1252157 strain_at_one_norm_force=0.7030514
          stiffness_at_low_force=0.2 stiffness_at_one_norm_force=3.461191 curviness=0.75
    Millard2012EquilibriumMuscle glmin1_l: max_isometric_force=374.0459 optimal_fiber_length=0.08119896
        tendon_slack_length=0.01927016 pennation_angle_at_optimal=0.1745329 fiber_damping=0.01 default_activation=0.01
        minimum_activation=0.01
      PathPoint P1: pelvis (-0.03 0 -0.118)
      PathPoint P2: femur_l (0.005 -0.015 -0.056)
      FiberForceLengthCurve: strain_at_zero_force=-3.729382e-9 strain_at_one_norm_force=0.7 stiffness_at_low_force=0.2
          stiffness_at_one_norm_force=2.857143 curviness=0.75
    Millard2012EquilibriumMuscle glmin2_l: max_isometric_force=394.8197 optimal_fiber_length=0.06869564
        tendon_slack_length=0.03201591 pennation_angle_at_optimal=0 fiber_damping=0.01 default_activation=0.01
        minimum_activation=0.01
      PathPoint P1: pelvis (-0.0616 0.01 -0.101)
      PathPoint P2: femur_l (0.004 -0.009 -0.052)
      FiberForceLengthCurve: strain_at_zero_force=0.003039474 strain_at_one_norm_force=0.7000285
          stiffness_at_low_force=0.2 stiffness_at_one_norm_force=2.869486 curviness=0.75
    Millard2012EquilibriumMuscle glmin3_l: max_isometric_force=446.7738 optimal_fiber_length=0.03519014
        tendon_slack_length=0.0471108 pennation_angle_at_optimal=0.01745329 fiber_damping=0.01 default_activation=0.01
        minimum_activation=0.01
      PathPoint P1: pelvis (-0.0789 -0.0155 -0.0798)
      PathPoint P2: femur_l (-0.004 -0.001 -0.051)
      FiberForceLengthCurve: strain_at_zero_force=0.007461173 strain_at_one_norm_force=0.7002322
          stiffness_at_low_force=0.2 stiffness_at_one_norm_force=2.886957 curviness=0.75
    Millard2012EquilibriumMuscle grac_l: max_isometric_force=281.3115 optimal_fiber_length=0.2278006
        tendon_slack_length=0.1720142 pennation_angle_at_optimal=0.1720016 fiber_damping=0.01 default_activation=0.01
        minimum_activation=0.01
      PathPoint P1: pelvis (-0.04736 -0.12932 -0.02456)
      PathPoint P2: tibia_l (-0.01842 -0.04755 0.02961)
      PathPoint P3: tibia_l (0.00178 -0.06962 0.01573)
      PathWrap: wrap_object=GR_at_condyles_l method=hybrid
      FiberForceLengthCurve: strain_at_zero_force=-0.1969779 strain_at_one_norm_force=0.8027483
          stiffness_at_low_force=0.2 stiffness_at_one_norm_force=2.000548 curviness=0.75
    Millard2012EquilibriumMuscle iliacus_l: max_isometric_force=1021.141 optimal_fiber_length=0.1066
        tendon_slack_length=0.09612071 pennation_angle_at_optimal=0.279914 fiber_damping=0.01 default_activation=0.01
        minimum_activation=0.01
      PathPoint P1: pelvis (-0.0605 0.0309 -0.0843)
      PathPoint P2: pelvis (-0.0135 -0.0557 -0.0756)
      PathPoint P3: femur_l (-0.0023 -0.0565 -0.0139)
      PathPoint P4: femur_l (-0.0122 -0.0637 -0.0196)
      PathWrap: wrap_object=IL_at_brim_l method=hybrid range=(2 3)
      FiberForceLengthCurve: strain_at_zero_force=-0.1703103 strain_at_one_norm_force=0.5005449
          stiffness_at_low_force=0.2 stiffness_at_one_norm_force=2.98127 curviness=0.75
    Millard2012EquilibriumMuscle perbrev_l: max_isometric_force=521.2016 optimal_fiber_length=0.0454
        tendon_slack_length=0.1475275 pennation_angle_at_optimal=0.2052361 fiber_damping=0.01 default_activation=0.01
        minimum_activation=0.01
      PathPoint P1: tibia_l (-0.0243 -0.2532 -0.0251)
      PathPoint P2: tibia_l (-0.0339 -0.3893 -0.0249)
      PathPoint P3: tibia_l (-0.0285 -0.4004 -0.0255)
      PathPoint P4: calcn_l (0.0471 0.027 -0.0233)
      PathPoint P5: calcn_l (0.0677 0.0219 -0.0343)
      FiberForceLengthCurve: strain_at_zero_force=-0.04234068 strain_at_one_norm_force=0.6987541
          stiffness_at_low_force=0.2 stiffness_at_one_norm_force=2.69871 curviness=0.75
    Millard2012EquilibriumMuscle perlong_l: max_isometric_force=1115.371 optimal_fiber_length=0.0508
        tendon_slack_length=0.3322208 pennation_angle_at_optimal=0.2479525 fiber_damping=0.01 default_activation=0.01
        minimum_activation=0.01
      PathPoint P1: tibia_l (-0.02 -0.1373 -0.0282)
      PathPoint P2: tibia_l (-0.0317 -0.39 -0.0237)
      PathPoint P3: tibia_l (-0.0272 -0.4014 -0.024)
      PathPoint P4: calcn_l (0.0438 0.023 -0.0221)
      PathPoint P5: calcn_l (0.0681 0.0106 -0.0284)
      PathPoint P6: calcn_l (0.0852 0.0069 -0.0118)
      PathPoint P7: calcn_l (0.1203 0.0085 0.0184)
      FiberForceLengthCurve: strain_at_zero_force=-0.1323481 strain_at_one_norm_force=0.6924185
          stiffness_at_low_force=0.2 stiffness_at_one_norm_force=2.424929 curviness=0.75
    Millard2012EquilibriumMuscle piri_l: max_isometric_force=1029.787 optimal_fiber_length=0.026
        tendon_slack_length=0.1149062 pennation_angle_at_optimal=0.1745329 fiber_damping=0.01 default_activation=0.01
        minimum_activation=0.01
      PathPoint P1: pelvis (-0.10181 -0.00653 -0.01351)
      PathPoint P2: pelvis (-0.10202 -0.03066 -0.06092)
      PathPoint P3: femur_l (-0.0148 -0.0036 -0.0557)
      FiberForceLengthCurve: strain_at_zero_force=0.09922992 strain_at_one_norm_force=0.7028348
          stiffness_at_low_force=0.2 stiffness_at_one_norm_force=3.313426 curviness=0.75
    Millard2012EquilibriumMuscle psoas_l: max_isometric_force=1426.79 optimal_fiber_length=0.1169
        tendon_slack_length=0.09954317 pennation_angle_at_optimal=0.2155251 fiber_damping=0.01 default_activation=0.01
        minimum_activation=0.01
      PathPoint P1: pelvis (-0.0606 0.062 -0.039)
      PathPoint P2: pelvis (-0.0205 -0.0654 -0.0656)
      PathPoint P3: femur_l (-0.0132 -0.0467 -0.0046)
      PathPoint P4: femur_l (-0.0235 -0.0524 -0.0088)
      PathWrap: wrap_object=PS_at_brim_l method=hybrid range=(2 3)
      FiberForceLengthCurve: strain_at_zero_force=-0.09543841 strain_at_one_norm_force=0.5010382
          stiffness_at_low_force=0.2 stiffness_at_one_norm_force=3.353023 curviness=0.75
    Millard2012EquilibriumMuscle recfem_l: max_isometric_force=2191.741 optimal_fiber_length=0.07589965
        tendon_slack_length=0.4484915 pennation_angle_at_optimal=0.2170149 fiber_damping=0.01 default_activation=0.01
        minimum_activation=0.01
      PathPoint P1: pelvis (-0.024 -0.0388 -0.0933)
      PathPoint P2: patella_l (0.01 0.049 -0.0007)
      PathPoint P3: patella_l (0.0121 0.0437 0.001)
      PathPoint P4: patella_l (0.005 0.00247 -3e-5)
      PathPoint P5: tibia_l (0.0326 -0.06312 0.00047)
      PathWrap: wrap_object=KnExt_at_fem_l method=hybrid
      FiberForceLengthCurve: strain_at_zero_force=0.1999726 strain_at_one_norm_force=0.8999622
          stiffness_at_low_force=0.2 stiffness_at_one_norm_force=2.857186 curviness=0.75
    Millard2012EquilibriumMuscle sart_l: max_isometric_force=249.4131 optimal_fiber_length=0.4030004
        tendon_slack_length=0.1239999 pennation_angle_at_optimal=0.02613542 fiber_damping=0.01 default_activation=0.01
        minimum_activation=0.01
      PathPoint P1: pelvis (-0.0195 -0.0156 -0.1056)
      PathPoint P2: femur_l (-0.003 -0.3568 0.0421)
      PathPoint P3: tibia_l (-0.0251 -0.0401 0.0365)
      PathPoint P4: tibia_l (-0.0159 -0.0599 0.0264)
      PathPoint P5: tibia_l (0.0136 -0.081 0.0026)
      FiberForceLengthCurve: strain_at_zero_force=-0.1984568 strain_at_one_norm_force=0.7212821
          stiffness_at_low_force=0.2 stiffness_at_one_norm_force=2.17453 curviness=0.75
    Millard2012EquilibriumMuscle semimem_l: max_isometric_force=2200.987 optimal_fiber_length=0.06900027
        tendon_slack_length=0.3475873 pennation_angle_at_optimal=0.2545615 fiber_damping=0.01 default_activation=0.01
        minimum_activation=0.01
      PathPoint P1: pelvis (-0.0987 -0.125 -0.0614)
      PathPoint P2: tibia_l (-0.01234001 -0.05587168 0.03964744)
      PathWrap: wrap_object=SM_at_condyles_l method=hybrid
      FiberForceLengthCurve: strain_at_zero_force=0.1994426 strain_at_one_norm_force=0.7353994
          stiffness_at_low_force=0.2 stiffness_at_one_norm_force=3.731644 curviness=0.75
    Millard2012EquilibriumMuscle semiten_l: max_isometric_force=591.2951 optimal_fiber_length=0.1930008
        tendon_slack_length=0.2472 pennation_angle_at_optimal=0.241295 fiber_damping=0.01 default_activation=0.01
        minimum_activation=0.01
      PathPoint P1: pelvis (-0.1038 -0.1388 -0.0515)
      PathPoint P2: tibia_l (-0.0145 -0.065 0.0429)
      PathPoint P3: tibia_l (0.0019 -0.0773 0.0117)
      PathWrap: wrap_object=ST_at_condyles_l method=hybrid
      FiberForceLengthCurve: strain_at_zero_force=0.007279189 strain_at_one_norm_force=0.7803276
          stiffness_at_low_force=0.2 stiffness_at_one_norm_force=2.58716 curviness=0.75
    Millard2012EquilibriumMuscle soleus_l: max_isometric_force=6194.843 optimal_fiber_length=0.044
        tendon_slack_length=0.2767559 pennation_angle_at_optimal=0.3814289 fiber_damping=0.01 default_activation=0.01
        minimum_activation=0.01
      PathPoint P1: tibia_l (-0.0076 -0.0916 -0.0098)
      PathPoint P2: calcn_l (0.0044 0.031 0.0053)
      FiberForceLengthCurve: strain_at_zero_force=0.1569032 strain_at_one_norm_force=0.8506533
          stiffness_at_low_force=0.2 stiffness_at_one_norm_force=2.882882 curviness=0.75
    Millard2012EquilibriumMuscle tfl_l: max_isometric_force=411.2066 optimal_fiber_length=0.09316665
        tendon_slack_length=0.4408225 pennation_angle_at_optimal=0.05235988 fiber_damping=0.01 default_activation=0.01
        minimum_activation=0.01
      PathPoint P1: pelvis (-0.02 0.011 -0.129)
      PathPoint P2: femur_l (0.0294 -0.0995 -0.0597)
      PathPoint P3: femur_l (0.0107 -0.405 -0.0324)
      PathPoint P4: tibia_l (0.0108 -0.041 -0.0346)
      FiberForceLengthCurve: strain_at_zero_force=0.07118385 strain_at_one_norm_force=0.7197196
          stiffness_at_low_force=0.2 stiffness_at_one_norm_force=3.08387 curviness=0.75
    Millard2012EquilibriumMuscle tibant_l: max_isometric_force=1227.452 optimal_fiber_length=0.0683
        tendon_slack_length=0.240461 pennation_angle_at_optimal=0.1951828 fiber_damping=0.01 default_activation=0.01
        minimum_activation=0.01
      PathPoint P1: tibia_l (0.0154 -0.1312 -0.0162)
      PathPoint P2: tibia_l (0.0251 -0.1906 -0.0128)
      PathPoint P3: tibia_l (0.0233 -0.3659 0.0132)
      PathPoint P4: calcn_l (0.1166 0.0178 0.0305)
      FiberForceLengthCurve: strain_at_zero_force=0.1892237 strain_at_one_norm_force=0.7076768
          stiffness_at_low_force=0.2 stiffness_at_one_norm_force=3.85763 curviness=0.75
    Millard2012EquilibriumMuscle tibpost_l: max_isometric_force=1730.154 optimal_fiber_length=0.0378
        tendon_slack_length=0.2807796 pennation_angle_at_optimal=0.2264891 fiber_damping=0.01 default_activation=0.01
        minimum_activation=0.01
      PathPoint P1: tibia_l (-0.0041 -0.1304 -0.0103)
      PathPoint P2: tibia_l (-0.0164 -0.3655 0.0175)
      PathPoint P3: calcn_l (0.0417 0.0334 0.0286)
      PathPoint P4: calcn_l (0.0772 0.0159 0.0281)
      FiberForceLengthCurve: strain_at_zero_force=-0.1916705 strain_at_one_norm_force=0.6862359
          stiffness_at_low_force=0.2 stiffness_at_one_norm_force=2.278147 curviness=0.75
    Millard2012EquilibriumMuscle vasint_l: max_isometric_force=1697.361 optimal_fiber_length=0.09929919
        tendon_slack_length=0.202209 pennation_angle_at_optimal=0.06309973 fiber_damping=0.01 default_activation=0.01
        minimum_activation=0.01
      PathPoint P1: femur_l (0.029 -0.1924 -0.031)
      PathPoint P2: femur_l (0.0335 -0.2084 -0.0285)
      PathPoint P3: patella_l (0.0058 0.048 0.0006)
      PathPoint P4: patella_l (0.005 0.00247 0.00039)
      PathPoint P5: tibia_l (0.03257 -0.0632 -0.00043)
      PathWrap: wrap_object=KnExt_at_fem_l method=hybrid
      FiberForceLengthCurve: strain_at_zero_force=0.1999153 strain_at_one_norm_force=0.8514363
          stiffness_at_low_force=0.2 stiffness_at_one_norm_force=3.06974 curviness=0.75
    Millard2012EquilibriumMuscle vaslat_l: max_isometric_force=5148.767 optimal_fiber_length=0.09939932
        tendon_slack_length=0.2205998 pennation_angle_at_optimal=0.2528673 fiber_damping=0.01 default_activation=0.01
        minimum_activation=0.01
      PathPoint P1: femur_l (0.0048 -0.1854 -0.0349)
      PathPoint P2: femur_l (0.0269 -0.2591 -0.0409)
      PathPoint P3: patella_l (0.0103 0.0423 -0.0141)
      PathPoint P4: patella_l (0.005 0.00247 -0.00733)
      PathPoint P5: tibia_l (0.03254 -0.06338 -0.00511)
      PathWrap: wrap_object=KnExtVL_at_fem_l method=hybrid
      FiberForceLengthCurve: strain_at_zero_force=0.1999632 strain_at_one_norm_force=0.8928189
          stiffness_at_low_force=0.2 stiffness_at_one_norm_force=2.886604 curviness=0.75
    Millard2012EquilibriumMuscle vasmed_l: max_isometric_force=2747.823 optimal_fiber_length=0.09679921
        tendon_slack_length=0.1999026 pennation_angle_at_optimal=0.4222225 fiber_damping=0.01 default_activation=0.01
        minimum_activation=0.01
      PathPoint P1: femur_l (0.014 -0.2099 -0.0188)
      PathPoint P2: femur_l (0.0356 -0.2769 -0.0009)
      PathPoint P3: patella_l (0.0063 0.0445 0.017)
      PathPoint P4: patella_l (0.005 0.00247 0.0085)
      PathPoint P5: tibia_l (0.0319 -0.06357 0.00678)
      PathWrap: wrap_object=KnExt_at_fem_l method=hybrid
      FiberForceLengthCurve: strain_at_zero_force=0.1999354 strain_at_one_norm_force=0.8518332
          stiffness_at_low_force=0.2 stiffness_at_one_norm_force=3.067965 curviness=0.75
    Millard2012EquilibriumMuscle quad_fem_r: optimal_force=1 max_isometric_force=138.75 optimal_fiber_length=0.0637
        tendon_slack_length=0.0091 pennation_angle_at_optimal=0.065 max_contraction_velocity=10
        activation_time_constant=0.01 [seconds] deactivation_time_constant=0.04 [seconds] minimum_activation=0.01
      PathPoint P1: pelvis (-0.1143 -0.1151 0.052)
      PathPoint P2: femur_r (-0.0486 -0.0359 0.0366)
      ActiveForceLengthCurve: minimum_value=0
      FiberForceLengthCurve
    Millard2012EquilibriumMuscle obt_internus1_r: optimal_force=1 max_isometric_force=57.411
        optimal_fiber_length=0.0877 tendon_slack_length=0.0495 pennation_angle_at_optimal=0.0436
        minimum_activation=0.01
      PathPoint obt_int_r-P1: pelvis (-0.04740879 -0.07059094 0.0411667)
      PathPoint obt_int_r-P2: femur_r (-0.036 -0.01 0.035)
      PathWrap pathwrap_0: wrap_object=femHeadOISphere1_r method=hybrid
      ActiveForceLengthCurve: minimum_value=0
      FiberForceLengthCurve
    Millard2012EquilibriumMuscle obt_internus2_r: optimal_force=1 max_isometric_force=57.411
        optimal_fiber_length=0.0877 tendon_slack_length=0.0469 pennation_angle_at_optimal=0.0436
        minimum_activation=0.01
      PathPoint obt_int2_r-P1: pelvis (-0.04358845 -0.102801 0.0169339)
      PathPoint obt_int2_r-P2: femur_r (-0.0356 -0.0104 0.035)
      PathWrap pathwrap_0: wrap_object=femHeadOISphere2_r method=hybrid
      ActiveForceLengthCurve: minimum_value=0
      FiberForceLengthCurve
    Millard2012EquilibriumMuscle obt_internus3_r: optimal_force=1 max_isometric_force=57.411
        optimal_fiber_length=0.0877 tendon_slack_length=0.0406 pennation_angle_at_optimal=0.0436
        minimum_activation=0.01
      PathPoint obt_int_r3-P1: pelvis (-0.08892614 -0.11 0.03055858)
      PathPoint obt_int_r3-P2: femur_r (-0.04372695 -0.0104 0.035)
      PathWrap pathwrap_0: wrap_object=femHeadOISphere3_r method=hybrid
      ActiveForceLengthCurve: minimum_value=0
      FiberForceLengthCurve
    Millard2012EquilibriumMuscle obt_externus1_r: optimal_force=1 max_isometric_force=123.84
        optimal_fiber_length=0.0804 tendon_slack_length=0.021 pennation_angle_at_optimal=0.079 minimum_activation=0.01
      PathPoint obt_ext_r-P1: pelvis (-0.03651545 -0.1031187 0.024808)
      PathPoint obt_ext_r-P2: femur_r (-0.03445025 -0.02017453 0.02907675)
      PathWrap: wrap_object=femHeadSphere_OE1_r method=hybrid
      ActiveForceLengthCurve: minimum_value=0
      FiberForceLengthCurve
    Millard2012EquilibriumMuscle obt_externus2_r: optimal_force=1 max_isometric_force=123.84
        optimal_fiber_length=0.0804 tendon_slack_length=0.015 pennation_angle_at_optimal=0.079 minimum_activation=0.01
      PathPoint obt_ext2_r-P1: pelvis (-0.06455122 -0.1217164 0.03932585)
      PathPoint obt_ext2_r-P2: femur_r (-0.03820025 -0.02017453 0.02907675)
      PathWrap: wrap_object=femHeadSphere_OE2_r method=hybrid
      ActiveForceLengthCurve: minimum_value=0
      FiberForceLengthCurve
    Millard2012EquilibriumMuscle obt_externus3_r: optimal_force=1 max_isometric_force=123.84
        optimal_fiber_length=0.0804 tendon_slack_length=0.0206 pennation_angle_at_optimal=0.079 minimum_activation=0.01
      PathPoint obt_ext3_r-P1: pelvis (-0.03263117 -0.08787715 0.04163426)
      PathPoint obt_ext3_r-P2: femur_r (-0.03020025 -0.02017453 0.02907675)
      PathWrap: wrap_object=femHeadSphere_OE3_r method=hybrid
      ActiveForceLengthCurve: minimum_value=0
      FiberForceLengthCurve
    Millard2012EquilibriumMuscle gemelli_sup_r: optimal_force=1 max_isometric_force=88.4 optimal_fiber_length=0.0485
        tendon_slack_length=0.00632 pennation_angle_at_optimal=0.0118 minimum_activation=0.01
      PathPoint gem_sup_r-P1: pelvis (-0.105 -0.064 0.054)
      PathPoint gem_sup_r-P2: femur_r (-0.036 -0.01 0.059)
      PathWrap pathwrap_0: wrap_object=GEMsup_at_Ischium_r method=hybrid
      ActiveForceLengthCurve: minimum_value=0
      FiberForceLengthCurve
    Millard2012EquilibriumMuscle gemelli_inf_r: optimal_force=1 max_isometric_force=88.4 optimal_fiber_length=0.0546
        tendon_slack_length=0.00669 pennation_angle_at_optimal=0.0087 minimum_activation=0.01
      PathPoint gem_inf_r-P1: pelvis (-0.1062094 -0.09384321 0.06366018)
      PathPoint gem_inf_r-P2: femur_r (-0.036 -0.01 0.035)
      PathWrap: wrap_object=femHeadGEMinfSphere_r method=hybrid
      ActiveForceLengthCurve: minimum_value=0
      FiberForceLengthCurve
    Millard2012EquilibriumMuscle pect_r: optimal_force=1 max_isometric_force=232.8 optimal_fiber_length=0.1038
        tendon_slack_length=0.0182 pennation_angle_at_optimal=0.002967 minimum_activation=0.01
      PathPoint P1: pelvis (-0.017 -0.09 0.034)
      PathPoint P1_0: femur_r (-0.009281884 -0.08132697 0.0228727)
      ActiveForceLengthCurve: minimum_value=0
      FiberForceLengthCurve
    Millard2012EquilibriumMuscle quad_fem_l: optimal_force=1 max_isometric_force=293.177 optimal_fiber_length=0.0637
        tendon_slack_length=0.0091 pennation_angle_at_optimal=0.065 max_contraction_velocity=10
        activation_time_constant=0.01 deactivation_time_constant=0.04 minimum_activation=0.01
      PathPoint P1: pelvis (-0.1143 -0.1151 -0.052)
      PathPoint P2: femur_l (-0.0381 -0.0359 -0.0606)
      ActiveForceLengthCurve: minimum_value=0
      FiberForceLengthCurve
    Millard2012EquilibriumMuscle obt_internus1_l: optimal_force=1 max_isometric_force=57.411
        optimal_fiber_length=0.0877 tendon_slack_length=0.0495 pennation_angle_at_optimal=0.0436
        minimum_activation=0.01
      PathPoint obt_int_l-P1: pelvis (-0.04740879 -0.07059094 -0.0411667)
      PathPoint obt_int_r-P2: femur_l (-0.036 -0.01 -0.035)
      PathWrap pathwrap_0: wrap_object=femHeadOISphere1_l method=hybrid
      ActiveForceLengthCurve: minimum_value=0
      FiberForceLengthCurve
    Millard2012EquilibriumMuscle obt_internus2_l: optimal_force=1 max_isometric_force=57.411
        optimal_fiber_length=0.0877 tendon_slack_length=0.0469 pennation_angle_at_optimal=0.0436
        minimum_activation=0.01
      PathPoint obt_int2_l-P1: pelvis (-0.04358845 -0.102801 -0.0169339)
      PathPoint obt_int2_r-P2: femur_l (-0.0356 -0.0104 -0.035)
      PathWrap pathwrap_0: wrap_object=femHeadOISphere2_l method=hybrid
      ActiveForceLengthCurve: minimum_value=0
      FiberForceLengthCurve
    Millard2012EquilibriumMuscle obt_internus3_l: optimal_force=1 max_isometric_force=57.411
        optimal_fiber_length=0.0877 tendon_slack_length=0.0406 pennation_angle_at_optimal=0.0436
        minimum_activation=0.01
      PathPoint obt_int_l3-P1: pelvis (-0.08892614 -0.11 -0.03055858)
      PathPoint obt_int_r3-P2: femur_l (-0.04372695 -0.0104 -0.035)
      PathWrap pathwrap_0: wrap_object=femHeadOISphere3_l method=hybrid
      ActiveForceLengthCurve: minimum_value=0
      FiberForceLengthCurve
    Millard2012EquilibriumMuscle obt_externus1_l: optimal_force=1 max_isometric_force=123.849
        optimal_fiber_length=0.0804 tendon_slack_length=0.021 pennation_angle_at_optimal=0.079 minimum_activation=0.01
      PathPoint obt_ext_l-P1: pelvis (-0.03651545 -0.1031187 -0.024808)
      PathPoint obt_ext_l-P2: femur_l (-0.03445025 -0.02017453 -0.02907675)
      PathWrap: wrap_object=femHeadSphere_OE1_l method=hybrid
      ActiveForceLengthCurve: minimum_value=0
      FiberForceLengthCurve
    Millard2012EquilibriumMuscle obt_externus2_l: optimal_force=1 max_isometric_force=123.849
        optimal_fiber_length=0.0804 tendon_slack_length=0.0149 pennation_angle_at_optimal=0.079 minimum_activation=0.01
      PathPoint obt_ext2_l-P1: pelvis (-0.06455122 -0.1217164 -0.03932585)
      PathPoint obt_ext2_r-P2: femur_l (-0.03820025 -0.02017453 -0.02907675)
      PathWrap: wrap_object=femHeadSphere_OE2_l method=hybrid
      ActiveForceLengthCurve: minimum_value=0
      FiberForceLengthCurve
    Millard2012EquilibriumMuscle obt_externus3_l: optimal_force=1 max_isometric_force=123.849
        optimal_fiber_length=0.0804 tendon_slack_length=0.0206 pennation_angle_at_optimal=0.079 minimum_activation=0.01
      PathPoint obt_ext3_l-P1: pelvis (-0.03263117 -0.08787715 -0.047)
      PathPoint obt_ext3_r-P2: femur_l (-0.03520025 -0.02017453 -0.02907675)
      PathWrap: wrap_object=femHeadSphere_OE3_l method=hybrid
      ActiveForceLengthCurve: minimum_value=0
      FiberForceLengthCurve
    Millard2012EquilibriumMuscle gemelli_sup_l: optimal_force=1 max_isometric_force=87.404 optimal_fiber_length=0.0485
        tendon_slack_length=0.00632 pennation_angle_at_optimal=0.0118 minimum_activation=0.01
      PathPoint gem_sup_l-P1: pelvis (-0.105 -0.064 -0.054)
      PathPoint gem_sup_l-P2: femur_l (-0.036 -0.01 -0.059)
      PathWrap pathwrap_0: wrap_object=GEMsup_at_Ischium_l method=hybrid
      ActiveForceLengthCurve: minimum_value=0
      FiberForceLengthCurve
    Millard2012EquilibriumMuscle gemelli_inf_l: optimal_force=1 max_isometric_force=87.404 optimal_fiber_length=0.0546
        tendon_slack_length=0.00669 pennation_angle_at_optimal=0.0087 minimum_activation=0.01
      PathPoint obt_int_l-P1: pelvis (-0.106 -0.094 -0.064)
      PathPoint obt_int_l-P2: femur_l (-0.036 -0.01 -0.059)
      PathWrap: wrap_object=femHeadGEMinfSphere_l method=hybrid
      ActiveForceLengthCurve: minimum_value=0
      FiberForceLengthCurve
    Millard2012EquilibriumMuscle pect_l: optimal_force=1 max_isometric_force=232.759 optimal_fiber_length=0.1038
        tendon_slack_length=0.0182 pennation_angle_at_optimal=0.002967 minimum_activation=0.01
      PathPoint P1: pelvis (-0.017 -0.09 -0.034)
      PathPoint P1_0: femur_l (-0.009281884 -0.08132697 -0.0228727)
      ActiveForceLengthCurve: minimum_value=0
      FiberForceLengthCurve
    ObjectGroup subscap: members=(subscap10 subscap11 subscap_1 subscap_2 subscap_3 subscap_4 subscap_5 subscap_6 subscap_7 subscap_8 subscap_9)
    ObjectGroup delt_scap: members=(delt_scap10 delt_scap11 delt_scap_1 delt_scap_2 delt_scap_3 delt_scap_4 delt_scap_5 delt_scap_6 delt_scap_7 delt_scap_8 delt_scap_9)
    ObjectGroup delt_clav: members=(delt_clav_1 delt_clav_2 delt_clav_3 delt_clav_4)
    ObjectGroup infra: members=(infra_1 infra_2 infra_3 infra_4 infra_5 infra_6)
    ObjectGroup supra: members=(supra_1 supra_2 supra_3 supra_4)
    ObjectGroup trap_scap: members=(trap_scap10 trap_scap11 trap_scap_1 trap_scap_2 trap_scap_3 trap_scap_4 trap_scap_5 trap_scap_6 trap_scap_7 trap_scap_8 trap_scap_9)
    ObjectGroup trap_clav
    ObjectGroup lev_scap: members=(lev_scap_1 lev_scap_2)
    ObjectGroup ter_min: members=(ter_min_1 ter_min_2 ter_min_3)
    ObjectGroup ter_maj: members=(ter_maj_1 ter_maj_2 ter_maj_3 ter_maj_4)
    ObjectGroup pect_min: members=(pect_min_1 pect_min_2 pect_min_3 pect_min_4)
    ObjectGroup rhomboid: members=(rhomboid_1 rhomboid_2 rhomboid_3 rhomboid_4 rhomboid_5)
    ObjectGroup bic: members=(bic_l bic_s bic_l_l bic_s_l)
    ObjectGroup tric_long: members=(tric_long_1 tric_long_2 tric_long_3 tric_long_4)
    ObjectGroup pect_maj_t: members=(pect_maj_t_1 pect_maj_t_2 pect_maj_t_3 pect_maj_t_4 pect_maj_t_5 pect_maj_t_6)
    ObjectGroup pect_maj_c: members=(pect_maj_c_1 pect_maj_c_2)
    ObjectGroup tric_med: members=(tric_med_1 tric_med_2 tric_med_3 tric_med_4 tric_med_5)
    ObjectGroup brachialis: members=(brachialis_1 brachialis_2 brachialis_3 brachialis_4 brachialis_5 brachialis_6 brachialis_7)
    ObjectGroup brachiorad: members=(brachiorad_1 brachiorad_2 brachiorad_3)
    ObjectGroup pron_teres_hr: members=pron_teres_1
    ObjectGroup pron_teres_ur: members=pron_teres_2
    ObjectGroup supinator_ur: members=(supinator_1 supinator_2 supinator_3 supinator_4 supinator_5)
    ObjectGroup pron_quad: members=(pron_quad_1 pron_quad_2 pron_quad_3)
    ObjectGroup tric_lat: members=(tric_lat_1 tric_lat_2 tric_lat_3 tric_lat_4 tric_lat_5)
    ObjectGroup anconeus: members=(anconeus_1 anconeus_2 anconeus_3 anconeus_4 anconeus_5)
  MarkerSet:
    Marker CV7: torso (-0.0679267 0.413453 0)
    Marker RSIA: scapula_r (-0.1205801 -0.11377 -0.07981872)
    Marker LSIA: scapula_l (-0.12058 -0.11377 0.0798187)
    Marker TV10: torso (-0.0860541 0.156 0)
    Marker RSHO: humerus_r (0.01339213 0.05588723 -0.005545295)
    Marker LSHO: humerus_l (0.0133921 0.0558872 0.00554529)
    Marker RELBL: humerus_r (0.02034297 -0.2846351 0.03437414)
    Marker LELBL: humerus_l (0.020343 -0.284635 -0.0343741)
    Marker RHUM: humerus_r (0.02335566 -0.1257306 0.03617716)
    Marker LHUM: humerus_l (0.0233557 -0.125731 -0.0361772)
    Marker RFAR: ulna_r (-0.0381476 -0.114096 0.0333049)
    Marker LFAR: ulna_l (-0.03814755 -0.1140956 -0.03330493)
    Marker RRSP: radius_r (-0.001856114 -0.2259586 0.0464815)
    Marker LRSP: radius_l (-0.00185611 -0.225959 -0.0464815)
    Marker RUSP: ulna_r (-0.02216594 -0.2379469 0.008364818)
    Marker LUSP: ulna_l (-0.0221659 -0.237947 -0.00836482)
    Marker RELB: humerus_r (0.009963162 -0.2826347 -0.005435292)
    Marker LELB: humerus_l (0.009963162 -0.2826347 0.005435292)
    Marker RELBM: humerus_r (-0.0004166425 -0.2806344 -0.04524473)
    Marker LELBM: humerus_l (-0.000416643 -0.280634 0.0452447)
    Marker RPSI: pelvis (-0.153275 0.037797 0.0487993)
    Marker LPSI: pelvis (-0.153275 0.03779698 -0.04881139)
    Marker LASI: pelvis (0.0145615 0.00687632 -0.125785)
    Marker RASI: pelvis (0.01456148 0.006876318 0.1257851)
    Marker RKNEL: femur_r (0.01579828 -0.4069512 0.04824907)
    Marker LKNEL: femur_l (0.0157983 -0.406951 -0.0482491)
    Marker WO: torso (0.04442167 0.376216 0)
    Marker STRN: torso (0.103738 0.1921361 0)
    Marker HEAD: torso (0.09370885 0.5950171 0)
    Marker RHAND: hand_r (-0.02273671 -0.04912516 0.0004188069)
    Marker LHAND: hand_l (-0.0227367 -0.0491252 -0.000418807)
