# OpenSim document version 40500
Model:
  ConsoleReporter__double_ reporter: report_time_interval=1 [s]
      input_inputs=(/forceset/quadriceps|fiber_force /forceset/hamstrings|fiber_force /jointset/knee/knee_coord_0|value(knee_angle))
  Ground
  BodySet:
    Body femur: mass=0.5 [kg] mass_center=(0 0 0) inertia=(0 0 0 0 0 0)
      PhysicalOffsetFrame femurCenter: socket_parent=.. translation=(0 0.5 0) [meters]
        Ellipsoid femurCenter_geom_1: radii=(0.1 0.5 0.1)
    Body tibia: mass=1 mass_center=(0 0 0) inertia=(0 0 0 0 0 0)
      PhysicalOffsetFrame tibiaCenter: socket_parent=.. translation=(0 0.5 0)
        Ellipsoid tibiaCenter_geom_1: radii=(0.1 0.5 0.1)
    Body foot: mass=0.5 mass_center=(0 0 0) inertia=(0 0 0 0 0 0)
      PhysicalOffsetFrame ankleCenter: socket_parent=.. translation=(0 0.25 0)
        Ellipsoid ankleCenter_geom_1: radii=(0.1 0.5 0.1)
  JointSet:
    PinJoint hip: socket_parent_frame=ground_offset socket_child_frame=femur_offset
      Coordinate hip_coord_0
      PhysicalOffsetFrame ground_offset: socket_parent=/ground translation=(0 0 0)
      PhysicalOffsetFrame femur_offset: socket_parent=/bodyset/femur translation=(0 0.5 0)
    PinJoint knee: socket_parent_frame=femur_offset socket_child_frame=tibia_offset
      Coordinate knee_coord_0
      PhysicalOffsetFrame femur_offset: socket_parent=/bodyset/femur translation=(0 0 0)
      PhysicalOffsetFrame tibia_offset: socket_parent=/bodyset/tibia translation=(0 1 0)
    PinJoint ankle: socket_parent_frame=tibia_offset socket_child_frame=foot_offset
      Coordinate ankle_coord_0
      PhysicalOffsetFrame tibia_offset: socket_parent=/bodyset/tibia translation=(0 0 0)
      PhysicalOffsetFrame foot_offset: socket_parent=/bodyset/foot translation=(0 0.5 0)
  ControllerSet:
    PrescribedController: actuator_list=(quadriceps hamstrings)
      FunctionSet ControlFunctions:
        StepFunction: transition_start_time=0.1 transition_end_time=0.2 start_value=0.3 end_value=0.3
        StepFunction: transition_start_time=0.5 transition_end_time=1 start_value=2.3 end_value=3
  ForceSet:
    Millard2012EquilibriumMuscle quadriceps: min_control=0.01 max_control=1 max_isometric_force=300
        optimal_fiber_length=0.6 tendon_slack_length=0.55 pennation_angle_at_optimal=0 [radians]
      PathPoint origin: femur (0 0.8 0)
      PathPoint insertion: tibia (0 0.7 0)
      ActiveForceLengthCurve: minimum_value=0
      ForceVelocityCurve: concentric_slope_at_vmax=0 concentric_slope_near_vmax=0.25 isometric_slope=5
          eccentric_slope_at_vmax=0 eccentric_slope_near_vmax=0.15 max_eccentric_velocity_force_multiplier=1.4
      FiberForceLengthCurve
      TendonForceLengthCurve
    Millard2012EquilibriumMuscle hamstrings: min_control=0.01 max_control=1 max_isometric_force=200
        optimal_fiber_length=0.6 tendon_slack_length=0.55 pennation_angle_at_optimal=0
      PathPoint origin: femur (0 0.2 0)
      PathPoint insertion: tibia (0 1 0)
      ActiveForceLengthCurve: minimum_value=0
      ForceVelocityCurve: concentric_slope_at_vmax=0 concentric_slope_near_vmax=0.25 isometric_slope=5
          eccentric_slope_at_vmax=0 eccentric_slope_near_vmax=0.15 max_eccentric_velocity_force_multiplier=1.4
      FiberForceLengthCurve
      TendonForceLengthCurve
