# OpenSim document version 30000
ScaleTool 3DGaitModel2392-CP-scaled:
  mass: 93 [kg]
  height: -1
  age: -1
  ModelScaler:
    apply: true
    scaling_order: measurements
    marker_file: C:/Data/ARCLP/AchillesTendon-GriffithAIS/Processing/ElaboratedData/TestCP/20180202/scaling/../staticElaborations/Static_1/S01/Static_1.trc
    time_range: 0.004 4.22
    preserve_mass_distribution: true
    MeasurementSet:
      Measurement Pelvis_w: apply=true
        MarkerPair: markers=(RHJC LHJC)
        BodyScale pelvis: axes=Y
      Measurement Pelvis_d: apply=true
        MarkerPair: markers=(LASI LPSI)
        MarkerPair: markers=(RPSI RASI)
        BodyScale pelvis: axes=X
      Measurement femur_r: apply=true
        MarkerPair: markers=(RHJC RKJC)
        BodyScale femur_r: axes=(X Y Z)
      Measurement femur_l: apply=true
        MarkerPair: markers=(LHJC LKJC)
        BodyScale femur_l: axes=(X Y Z)
      Measurement tibia_r: apply=true
        MarkerPair: markers=(RKJC RAJC)
        BodyScale tibia_r: axes=(X Y Z)
      Measurement tibia_l: apply=true
        MarkerPair: markers=(LKJC LAJC)
        BodyScale tibia_l: axes=(X Y Z)
      Measurement foot_r: apply=true
        MarkerPair: markers=(RCAL1 RTOE)
        BodyScale talus_r: axes=(X Y Z)
        BodyScale calcn_r: axes=(X Y Z)
        BodyScale toes_r: axes=(X Y Z)
      Measurement foot_l: apply=true
        MarkerPair: markers=(LCAL1 LTOE)
        BodyScale talus_l: axes=(X Y Z)
        BodyScale calcn_l: axes=(X Y Z)
        BodyScale toes_l: axes=(X Y Z)
      Measurement torso_h: apply=true
        MarkerPair: markers=(RPSI C7)
        MarkerPair: markers=(LPSI C7)
        BodyScale torso: axes=Y
      Measurement torso_w: apply=true
        MarkerPair: markers=(RSHO LSHO)
        BodyScale torso: axes=Z
      Measurement torso_d: apply=true
        MarkerPair: markers=(STR T10)
        BodyScale torso: axes=X
      Measurement Pelvis_h: apply=true
        MarkerPair: markers=(LASI LHJC)
        MarkerPair: markers=(RASI RHJC)
        BodyScale pelvis: axes=Z
  MarkerPlacer:
    apply: true
    marker_file: C:/Data/ARCLP/AchillesTendon-GriffithAIS/Processing/ElaboratedData/TestCP/20180202/scaling/../staticElaborations/Static_1/S01/Static_1.trc
    time_range: 0.004 4.22
    max_marker_movement: -1
    IKTaskSet:
      IKMarkerTask STR: apply=true weight=1
      IKMarkerTask CLAV: apply=true weight=1
      IKMarkerTask C7: apply=true weight=1
      IKMarkerTask T10: apply=true weight=1
      IKMarkerTask RSHO: apply=true weight=1
      IKMarkerTask LSHO: apply=true weight=1
      IKMarkerTask RASI: apply=true weight=1000
      IKMarkerTask RPSI: apply=true weight=1000
      IKMarkerTask LASI: apply=true weight=1000
      IKMarkerTask LPSI: apply=true weight=1000
      IKMarkerTask RIC: apply=false weight=100
      IKMarkerTask LIC: apply=false weight=100
      IKMarkerTask RTH1: apply=false weight=1
      IKMarkerTask RTH4: apply=false weight=1
      IKMarkerTask RTH3: apply=false weight=1
      IKMarkerTask RLFC: apply=true weight=100
      IKMarkerTask RMFC: apply=true weight=100
      IKMarkerTask RTIB3: apply=false weight=1
      IKMarkerTask RTIB2: apply=false weight=1
      IKMarkerTask RTIB4: apply=false weight=1
      IKMarkerTask RLMAL: apply=true weight=30
      IKMarkerTask RMMAL: apply=true weight=30
      IKMarkerTask RCAL1: apply=true weight=10
      IKMarkerTask RST: apply=false weight=1
      IKMarkerTask RPT: apply=false weight=1
      IKMarkerTask RVMB: apply=true weight=10
      IKMarkerTask RFMB: apply=true weight=10
      IKMarkerTask RTOE: apply=true weight=10
      IKMarkerTask LTH1: apply=false weight=1
      IKMarkerTask LTH4: apply=false weight=1
      IKMarkerTask LTH3: apply=false weight=1
      IKMarkerTask LLFC: apply=true weight=100
      IKMarkerTask LMFC: apply=true weight=100
      IKMarkerTask LTIB3: apply=false weight=1
      IKMarkerTask LTIB2: apply=false weight=1
      IKMarkerTask LTIB4: apply=false weight=1
      IKMarkerTask LLMAL: apply=true weight=30
      IKMarkerTask LMMAL: apply=true weight=30
      IKMarkerTask LCAL1: apply=true weight=10
      IKMarkerTask LST: apply=false weight=1
      IKMarkerTask LPT: apply=false weight=1
      IKMarkerTask LVMB: apply=true weight=10
      IKMarkerTask LFMB: apply=true weight=10
      IKMarkerTask LTOE: apply=true weight=10
      IKMarkerTask RTH2: apply=false weight=1
      IKMarkerTask LTH2: apply=false weight=1
      IKMarkerTask LTIB1: apply=false weight=1
      IKMarkerTask RTIB1: apply=false weight=1
      IKMarkerTask RHJC: apply=false weight=1
      IKMarkerTask LHJC: apply=false weight=1
      IKMarkerTask RKJC: apply=false weight=1
      IKMarkerTask LKJC: apply=false weight=1
      IKMarkerTask RAJC: apply=false weight=1
      IKMarkerTask LAJC: apply=false weight=1
      IKCoordinateTask ankle_angle_r: apply=false weight=50 value_type=manual_value value=0
      IKCoordinateTask ankle_angle_l: apply=false weight=50 value_type=manual_value value=0
